<?xml version="1.0" ?>
<Node name="root" dt="0.02" showBoundingTree="0">
    <RequiredPlugin name="Sofa.Component.SolidMechanics.FEM.HyperElastic"/>
    <RequiredPlugin name="Sofa.Component.IO.Mesh"/>
    <RequiredPlugin name="Sofa.Component.Collision"/>
    <RequiredPlugin name="Sofa.Component.Mass"/>
    <RequiredPlugin name="Sofa.Component.Topology"/>
    <RequiredPlugin name="Sofa.Component.ODESolver"/>
    <RequiredPlugin name="Sofa.Component.LinearSolver"/>
    <RequiredPlugin name="Sofa.Component.Constraint"/>
    <RequiredPlugin name="SofaEngine"/>

        <Node name="MooneyRivlin-Model" activated="1">
            <EulerImplicitSolver rayleighMass="0.1" rayleighStiffness="0.1"/>
            <SparseLDLSolver saveMatrixToFile="0" />

            <MeshVTKLoader filename="cylinderPDMS12724Vol.vtk" name="loader" />
            <MechanicalObject src="@loader" name="Volume" />

            <TetrahedronSetTopologyContainer name="Container" src="@loader" />
            <TetrahedronSetTopologyModifier name="Modifier" />
            <TetrahedronSetGeometryAlgorithms template="Vec3d" name="GeomAlgo" />
            <MeshMatrixMass name="mass" lumping="1" printMass="0" massDensity="965" />

            <BoxROI box="-0.05 -0.05 -0.002   0.15 0.05 0.0" drawBoxes="1"  name="fixedBox1"/>
            <FixedConstraint indices="@fixedBox1.indices"/>

            <TetrahedronHyperelasticityFEMForceField name="FEM" materialName="MooneyRivlin" ParameterSet="151065.460 101709.668 1e07"/>
	</Node>
	<Node>	<!-- target obtained from experimental data with a silicon with known mechanical properties-->
            <MechanicalObject position="0 -0.11625 0.128"/>
            <SphereCollisionModel radius='0.002' color="white"/>
        </Node>
</Node>
