<!-- BilateralInteractionLagrangianConstraint example -->
<Node name="root" dt="0.001" gravity="0 -981 0">
    <VisualStyle displayFlags="showForceFields" />
    <FreeMotionAnimationLoop />
    <BlockGaussSeidelConstraintSolver maxIterations="100" tolerance="1e-3" />
    <CollisionPipeline  depth="6" verbose="0" draw="0" />
    <BruteForceBroadPhase/>
    <BVHNarrowPhase/>
    <LocalMinDistance name="Proximity" alarmDistance="0.2" contactDistance="0.09" angleCone="0.0" />
    <CollisionResponse  name="Response" response="FrictionContactConstraint" />
    <DefaultCollisionGroupManager  name="Group" />
    <Node name="CUBE_0">
        <MechanicalObject dy="2.5" />
        <Node name="Visu">
            <OglModel name="Visual" fileMesh="mesh/cube.obj" color="1 0 0 1" dy="2.5" />
        </Node>
        <Node name="Constraints">
            <MechanicalObject name="points" tags="mecaConstraint" template="Vec3d" position="1 1.25 1" />
        </Node>
    </Node>
    <Node name="CUBE_1">
        <EulerImplicitIntegrationScheme  printLog="false"  rayleighStiffness="0.1" rayleighMass="0.1" />
        <CGLinearSolver iterations="25" tolerance="1.0e-9" threshold="1.0e-9" />
        <MechanicalObject template="Rigid3d" scale="1.0" dx="0.0" dy="0" dz="0.0" />
        <UniformMass totalMass="0.1" />
        <UncoupledConstraintCorrection />
        <Node name="Visu">
            <OglModel name="Visual" fileMesh="mesh/cube.obj" color="1 1 0 1.0" />
            <RigidMapping input="@../" output="@./" />
        </Node>
        <Node name="Constraints">
            <MechanicalObject name="points" tags="mecaConstraint" template="Vec3d" position="1 1.25 1&#x09;-1.25 -1.25 1.25" />
            <RigidMapping />
        </Node>
    </Node>
    <BilateralLagrangianConstraint template="Vec3d" object1="@CUBE_0/Constraints/points" object2="@CUBE_1/Constraints/points" first_point="0" second_point="0" />
</Node>
