<?xml version="1.0"?>
<Node name="root"  gravity="0 -10 0"  dt="0.1"  time="0"  animate="0"  >
    <RequiredPlugin pluginName="Sofa.Component.Constraint.Projective"/> <!-- Needed to use components [FixedProjectiveConstraint] -->
    <RequiredPlugin pluginName="Sofa.Component.LinearSolver.Iterative"/> <!-- Needed to use components [CGLinearSolver] -->
    <RequiredPlugin pluginName="Sofa.Component.Mass"/> <!-- Needed to use components [UniformMass] -->
    <RequiredPlugin pluginName="Sofa.Component.IntegrationScheme.Backward"/> <!-- Needed to use components [EulerImplicitIntegrationScheme] -->
    <RequiredPlugin pluginName="Sofa.Component.SceneUtility"/> <!-- Needed to use components [InfoComponent] -->
    <RequiredPlugin pluginName="Sofa.Component.SolidMechanics.Spring"/> <!-- Needed to use components [SpringForceField] -->
    <RequiredPlugin pluginName="Sofa.Component.StateContainer"/> <!-- Needed to use components [MechanicalObject] -->

    <DefaultAnimationLoop/>
    <EulerImplicitIntegrationScheme name="eulerImplicitSolver1" rayleighStiffness="0" rayleighMass="0"/>
    <CGLinearSolver template="GraphScattered" name="cGLinearSolver1" iterations="3000"  tolerance="1e-09"  threshold="1e-9"/>

    <Node name="fixedPointNode"  >
        <MechanicalObject template="Vec3d" name="fixedPoint"  position="0 2 0"  velocity="0 0 0"  force="0 0 0"  externalForce="0 0 0"  restScale="1"  showObject="1"  showObjectScale="5"  showIndices="1"  showIndicesScale="0.0001" />
        <FixedProjectiveConstraint template="Vec3d" name="FixedProjectiveConstraint"  indices="0" />
    </Node>

    <Node name="MassNode"  >
        <MechanicalObject template="Vec3d" name="Mass"  position="0 1 0"  velocity="0 0 0" restScale="1"  showObject="1"  showObjectScale="5"  showIndices="1"  showIndicesScale="0.0001" />
        <UniformMass template="Vec3d" name="uniformMass1"  totalMass="10" />
    </Node>

    <SpringForceField template="Vec3d" name="jointSpring" object1="@fixedPointNode" object2="@MassNode" spring="0 0 100 0 1" drawMode="1"/>
</Node>
