<?xml version="1.0"?>

<Node 	name="Root" gravity="0 0 0" time="0" animate="0"  dt="0.5" showAxis="true">
<RequiredPlugin name="Sofa.Component.StateContainer"/> <!-- Needed to use components [MechanicalObject] -->
<RequiredPlugin name="Sofa.Component.Topology.Container.Constant"/> <!-- Needed to use components [MeshTopology] -->
<!--Mechanical Object-->
<MechanicalObject name="DOFs" showObject="1"  showObjectScale="5"  showIndices="1"  showIndicesScale="0.0003" position="0 0 0 1 0 0 1 1 0 0 1 0 0 0 1 1 0 1 1 1 1 0 1 1" />

<!--Topology Tetrahedra-->
<MeshTopology name="hexa"  hexahedra="0 1 2 3 4 5 6 7 "  drawHexahedra="1" position="@DOFs.position"/>

<!--<TetrahedronSetTopologyContainer name="TetraContainer" tetrahedra="@tetra.tetrahedra"/>
<TetrahedronSetTopologyModifier />
<TetrahedronSetGeometryAlgorithms template="Vec3d" />-->
<!--<TetrahedronFEMForceField name="FEM" youngModulus="1000" poissonRatio="0.4" computeGlobalMatrix="false" method="svd" />-->

</Node>
