<?xml version="1.0"?>
<Node 	 name="root"  gravity="0 -10 0"  dt="0.01"  time="0"  animate="0"  >
	<RequiredPlugin  name='SofaValidation'/>
        <NewmarkImplicitSolver name="default0"  tags="meca" rayleighStiffness="0" rayleighMass="0"/>
        <CGLinearSolver template="GraphScattered" name="cGLinearSolver1" iterations="3000"  tolerance="1e-09"  threshold="1e-9"/>

	<Node 	 name="fixedPointNode"  >
		<MechanicalObject template="Vec3d" name="fixedPoint"  position="0 2 0"  velocity="0 0 0"  force="0 0 0"  externalForce="0 0 0"  restScale="1"  showObject="1"  showObjectScale="5"  showIndices="1"  showIndicesScale="0.0001" />
		<FixedConstraint template="Vec3d" name="fixedConstraint"  indices="0" />
	</Node>

	<Node 	 name="MassNode"  >
		<MechanicalObject template="Vec3d" name="Mass"  position="0 1 0"  velocity="0 0 0" restScale="1"  showObject="1"  showObjectScale="5"  showIndices="1"  showIndicesScale="0.0001" />
                <UniformMass template="Vec3d" name="uniformMass1"  totalMass="10" />
<Monitor template="Vec3d" name="Springtest_positions_newmark_solver_M_10_K_100_D_0_dt0.01" indices="0" ExportPositions="1"  showPositions="1" PositionsColor="1 1 0 1"/>
	</Node>

	<StiffSpringForceField template="Vec3d" name="jointSpring" object1="@fixedPointNode" object2="@MassNode" spring="0 0 100 0 1" drawMode="1"/>
</Node>
