import Sofa

# TODO standardize plugins python directory, then use something like
# Sofa.plugin_path('Compliant')

import sys
sys.path.append( Sofa.src_dir() + '/applications/plugins/Compliant/python' )

from Compliant import Rigid

def createScene(root):

    # root node setup
    root.createObject('RequiredPlugin', pluginName = 'Compliant')
	root.createObject('RequiredPlugin', pluginName = 'ColladaSceneLoader')

    root.createObject('VisualStyle', displayFlags="showBehavior" )

    # simuation parameters
    root.dt = 1e-2
    root.gravity = [0, -9.8, 0]

    # ode solver
    ode = root.createObject('AssembledSolver')
    ode.stabilization = True

    # numerical solver
    num = root.createObject('MinresSolver')
    num.iterations = 500

    # scene node
    scene = root.createChild('scene')

    # script variables
    n = 20
    length = 2

    # objects creation
    obj = []

    for i in xrange(n):
	# rigid bodies
        body = Rigid.Body()
        body.name = 'link-' + str(i)
        body.dofs.translation = [0, length * i, 0]

        body.inertia_forces = 'true'

        obj.append( body )
        # insert the object into the scene node, saves the created
        # node in body_node
        body.node = body.insert( scene )

    # joints creation
    for i in xrange( n-1 ):
	# the joint
        j = Rigid.SphericalJoint()

        # joint offset definitions
        up = Rigid.Frame()
        up.translation = [0, length /2 , 0]

        down = Rigid.Frame()
        down.translation = [0, -length /2 , 0]

        # append node/offset to the joint
        j.append( obj[i].node, up ) # parent
        j.append( obj[i+1].node, down) # child

        j.insert(scene)

    # attach first node
    obj[0].node.createObject('FixedConstraint', indices='0')
