<?xml version="1.0"?>
<!-- An oscillator made of a string of particles connected by soft distance constraints -->
<!-- François Faure, 2012 -->

<Node 	name="Root" gravity="1 0 0" time="0" animate="0"  dt="0.01" >
<VisualStyle displayFlags="hideVisualModels showBehaviorModels showMappings showForceFields" />
<CompliantAttachButtonSetting button="Left" />
<Node 	name="complianceSolverScene" >
    <ComplianceSolver verbose="0" implicitVelocity="0.5" implicitPosition="1" rayleighStiffness="0" rayleighMass="0"/>

    <!-- resolution = number of particles (including the fixed one) -->
    <!-- scale = total length of the pendulum -->
    <StringMeshCreator name="loader" resolution="2" scale="1 0 0" />
    <MeshTopology name="mesh" src="@loader" />
    <MechanicalObject name="defoDOF" template="Vec3d"  src="@loader" />
    <BoxConstraint box="-0.005 -0.005 -0.005    0.005 0.005 0.005  " />

    <!-- mass of one particle = total mass/number of particles (including the fixed one) -->
    <UniformMass  name="mass" totalMass="2"/>
    <Node name="extensionsNode" >
        <MechanicalObject template="Vec1d"  name="extensionsDOF" />
        <EdgeSetTopologyContainer edges="@../mesh.edges" />
        <ExtensionMapping  />

        <!-- Non-null compliance for elasticity. Compliance=1/stiffness -->
        <UniformCompliance name="ucomp" template="Vec1d" compliance="1" dampingRatio="0.0"  isCompliance="1" />
    </Node>
</Node>
</Node>
