<?xml version="1.0"?>
<!-- A pendulum made of a string of particles connected by distance constraints -->
<!-- François Faure, 2012 -->

<Node 	name="Root" gravity="0 -1 0" time="0" animate="0"  dt="0.01" >
<VisualStyle displayFlags="hideVisualModels showBehaviorModels showMappings showForceFields" />
<CompliantAttachButtonSetting button="Left" />

      <RequiredPlugin pluginName="Flexible"/>
      <RequiredPlugin pluginName="Compliant"/>

<Node 	name="complianceSolverScene" >
    <AssembledSolver use_velocity="false" implicitVelocity="0.5" implicitPosition="1"/>
      <LDLTSolver/>

    <!-- resolution = number of particles (including the fixed one) -->
    <!-- scale = total length of the pendulum -->
    <StringMeshCreator name="loader" resolution="3" scale="2 1 0" />
    <MeshTopology name="mesh" src="@loader" />
    <MechanicalObject name="defoDOF" template="Vec3d"  src="@loader" />
    <BoxConstraint box="-0.005 -0.005 -0.005    0.005 0.005 0.005  " />

    <!-- mass of one particle = total mass/number of particles (including the fixed one) -->
    <UniformMass  name="mass" totalMass="3"/>
    <Node name="extensionsNode" >
        <MechanicalObject template="Vec1d"  name="extensionsDOF" />
        <EdgeSetTopologyContainer edges="@../mesh.edges" />
        <ExtensionMapping  />

        <!-- Null compliance for perfect rigidity -->
        <UniformCompliance name="ucomp" template="Vec1d" compliance="0" dampingRatio="0.0"  isCompliance="1" />
    </Node>
</Node>
</Node>
