<?xml version="1.0"?>
<Node 	 name="Root"  printLog="1"  dt="0.0001"  >
	<VisualStyle name="visualStyle0"  displayFlags="hideVisual showBehaviorModels hideForceFields hideInteractionForceFields hideCollision hideMapping hideOptions" />
	<Node 	 name="RigidBody"  printLog="1"  >
		<ComplianceSolver name="minresSolver4"  implicitVelocity="1"  implicitPosition="1"  rayleighStiffness="0"  rayleighMass="0" />
		<MechanicalObject template="Rigid" name="arbDOF"  position="1 0 0 0 0 0 1"  velocity="0 0 0 0 0 0"  force="0 0 0 0 0 0"  externalForce="0 0 0 0 0 0"  derivX="0 0 0 0 0 0"  restScale="1"  translation="0 0 0"  rotation="0 0 0"  scale3d="1 1 1" />
		<UniformMass template="Rigid" name="uniformMass1" />
		<Node 	 name="Joint"  printLog="1"  >
			<MechanicalObject template="Rigid" name="mObject5"  position="0 0 0 0 0 0 1"  velocity="0 0 0 0 0 0"  force="0 0 0 0 0 0"  externalForce="0 0 0 0 0 0"  derivX="0 0 0 0 0 0"  restScale="1" />
			<DisplacementMapping template="Rigid,Rigid" name="displacementMap17"  mapMasses="1"  reference="1 0 0 0 0 0 1"  input="@../"  output="@./" />
			<Node 	 name="Log"  printLog="1"  >
				<MechanicalObject template="Vec6d" name="logDOF"  position="0 0 0 0 0 0"  velocity="0 0 0 0 0 0"  force="0 0 0 0 0 0"  externalForce="0 0 0 0 0 0"  derivX="0 0 0 0 0 0"  restScale="1" />
				<LogRigidMapping template="Rigid,Vec6d" name="logRigidMap"  mapMasses="1"  input="@../"  output="@./" />
				<DiagonalCompliance template="Vec6d" name="diagonalCompliance0"  compliance="0 0 0 0.01 0.01 0.01"  dampingRatio="0" />
			</Node>
		</Node>
	</Node>
</Node>
