<?xml version="1.0"?>
<Node name="Root" gravity="0 -1 0" time="0" animate="0"  dt="10" >

  <VisualStyle displayFlags="hideVisualModels showBehaviorModels showMappings showForceFields" />

  <RequiredPlugin name="Compliant" />

  <CompliantAttachButtonSetting compliance="1e-2"/>

<!--  <Node name="compliance - hard" >

      <CompliantNLImplicitSolver precision="1e-10" iterations="100" newtonStepLength="1" stabilization="0" static="0"/>
      <LDLTSolver/>

      <GridMeshCreator name="loader" filename="nofile" resolution="5 5" trianglePattern="0" rotation="90 0 0 " scale="1 1 0" />
      <MeshTopology name="mesh" src="@loader" />
      <MechanicalObject name="defoDOF" template="Vec3d"  src="@loader" />
      <BoxConstraint box="-0.005 -0.005 -0.005    1.005 0.005 0.005  " />
      <UniformMass  name="mass" />
      <Node name="extensionsNode" >
	  <MechanicalObject template="Vec1d"  name="extensionsDOF" />
	  <EdgeSetTopologyContainer edges="@../mesh.edges" />
	  <DistanceMapping  />
	  <UniformCompliance name="ucomp" template="Vec1d" compliance="1e-30" isCompliance="1" />
      </Node>

  </Node>-->

<!--  <Node name="stiffness - hard" >

      <CompliantNLImplicitSolver precision="1e-10" iterations="100" newtonStepLength="1" stabilization="0"/>
      <LDLTSolver/>

      <GridMeshCreator name="loader" filename="nofile" resolution="5 5" trianglePattern="0" rotation="90 0 0 " scale="1 1 0" />
      <MeshTopology name="mesh" src="@loader" />
      <MechanicalObject name="defoDOF" template="Vec3d"  src="@loader" />
      <BoxConstraint box="-0.005 -0.005 -0.005    1.005 0.005 0.005  " />
      <UniformMass  name="mass" />
      <Node name="extensionsNode" >
          <MechanicalObject template="Vec1d"  name="extensionsDOF" />
          <EdgeSetTopologyContainer edges="@../mesh.edges" />
          <DistanceMapping  />
          <UniformCompliance name="ucomp" template="Vec1d" compliance="1e-20" isCompliance="0" />
      </Node>

  </Node>


    <Node name="compliance - soft" >

      <CompliantNLImplicitSolver precision="1e-10" iterations="100" newtonStepLength="1" stabilization="0"/>
      <LDLTSolver/>

      <GridMeshCreator name="loader" filename="nofile" resolution="5 5" trianglePattern="0" rotation="90 0 0 " scale="1 1 0" translation="1.5 0 0" />
      <MeshTopology name="mesh" src="@loader" />
      <MechanicalObject name="defoDOF" template="Vec3d"  src="@loader" />
      <BoxConstraint box="-0.005 -0.005 -0.005    2.505 0.005 0.005  " />
      <UniformMass  name="mass" />
      <Node name="extensionsNode" >
          <MechanicalObject template="Vec1d"  name="extensionsDOF" />
          <EdgeSetTopologyContainer edges="@../mesh.edges" />
          <DistanceMapping  />
          <UniformCompliance name="ucomp" template="Vec1d" compliance="1e-3" isCompliance="1" />
      </Node>

  </Node>
  -->

  <Node name="stiffness - soft" >

      <CompliantNLImplicitSolver precision="1e-10" iterations="100" newtonStepLength="1" stabilization="0"/>
      <LDLTSolver/>

      <GridMeshCreator name="loader" filename="nofile" resolution="5 5" trianglePattern="0" rotation="90 0 0 " scale="1 1 0"  translation="1.5 0 0"/>
      <MeshTopology name="mesh" src="@loader" />
      <MechanicalObject name="defoDOF" template="Vec3d"  src="@loader" />
      <BoxConstraint box="-0.005 -0.005 -0.005    2.505 0.005 0.005  " />
      <UniformMass  name="mass" />
      <Node name="extensionsNode" >
          <MechanicalObject template="Vec1d"  name="extensionsDOF" />
          <EdgeSetTopologyContainer edges="@../mesh.edges" />
          <DistanceMapping  />
          <UniformCompliance name="ucomp" template="Vec1d" compliance="1e-3" isCompliance="0" />
      </Node>

  </Node>

</Node>
