<?xml version="1.0"?>
<!-- file "/tmp/skeleton.scn", generated by LuaXML -->

<Node gravity="0 -9.8 0" name="Root" dt="0.01">
  <VisualStyle displayFlags="hideCollisionModels showVisual showBehaviorModels" />
  <DefaultPipeline depth="6" />
  <BruteForceDetection />
        <RequiredPlugin pluginName="Flexible"/>
      <RequiredPlugin pluginName="Compliant"/>
  <MinProximityIntersection alarmDistance="0.4" contactDistance="0.2" />
  <DefaultContactManager response="ContactResponse" />
  <TreeCollisionGroupManager />
  <Node name="scene">
    <AssembledSolver warm_start="true" />
    <MinresSolver precision="1e-20" relative="true" iterations="100" />
    <Node name="body">
      <MechanicalObject name="dofs" template="Rigid" position="11.8623 15.5236 2.05424 0.706506 -0.376313 -0.597098 0.0520782 10.7278 11.5503 3.17104 0.695557 -0.123404 -0.70773 -0.00954468 11.5463 4.81082 4.22438 0.670842 0.0780172 -0.714159 0.184015 12.2064 0.993304 5.07081 0.530504 -0.536389 -0.602765 -0.259858 11.0979 0.995457 5.43486 0.343524 -0.59917 0.295425 0.660084 11.8839 15.5086 0.888661 -0.615886 -0.046291 0.696191 0.365869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" />
      <UniformMass template="Rigid" />
      <Node name="joint_frames">
        <MechanicalObject name="dofs" template="Rigid" position="0 0 0 0 0 0 1 0 0 0 0 0 0 1 0 0 0 0 0 0 1 0 0 0 0 0 0 1 0 0 0 0 0 0 1 0 0 0 0 0 0 1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" />
        <AssembledRigidRigidMapping template="Rigid,Rigid" source="10 1.5654221812156e-06 0.95748048666384 4.1972883302321e-05 0.0608080613243 0.01590954863448 -0.0276965892299 0.99763867579802 11 0 -0.961064 0 0 0 0 1 11 -1.8083894026688e-06 0.96108826942916 -2.9465335723344e-05 0.1068831645534 -0.0056270746983201 0.0012240071548 0.99425505663596 12 0 -0.797038 0 0 0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" />
        <Node name="joint_space">
          <MechanicalObject name="dofs" template="Vec6d" position="0 0 0 0 0 0 0 0 0 0 0 0 0 0 0 0 0 0 0 0 0 0 0 0 0 0 0 0 0 0 0 0 0 0 0 0 0 0 0 0 0 0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" />
          <RigidJointMapping template="Rigid,Vec6d" pairs="0 1 2 3 4 5 6 7 8 9 10 11 12 13 14 15 16 17 18 19 20 21 22 23 24 25 26 27 28 29 30 31 32 33 34 35 36 37 38 39 40 41 42 43 44 45 46 47 48 49 50 51" />
          <DiagonalCompliance dampingRatio="0" template="Vec6d" compliance="0 0 0 1e-06 1e-06 1e-06 0 0 0 1e-06 1e-06 1e-06 0 0 0 1e-06 1e-06 1e-06 0 0 0 1e-06 1e-06 1e-06 0 0 0 1e-06 1e-06 1e-06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" />
        </Node>
      </Node>
      <FixedConstraint indices="0" />
    </Node>
  </Node>
</Node>
