<Node>
  <GridMeshCreator name="loader" filename="nofile" resolution="20 20" trianglePattern="0" rotation="90 0 0 " translation="-0.5 1 -0.5" scale="1 1 0" />
  <MeshTopology name="mesh" src="@loader" />
  <MechanicalObject name="defoDOF" template="Vec3d"  src="@loader" showObject="1" showObjectScale=".015" drawMode="1"/>

  <UniformMass  name="mass" totalMass="10" rayleighMass="0"/>

  <Node name="extensionsNode" >
	<MechanicalObject template="Vec1d"  name="extensionsDOF" />
	<EdgeSetTopologyContainer edges="@../mesh.edges" />
	<DistanceMapping  showObjectScale="0.007"/>
	<UniformCompliance name="ucomp" template="Vec1d" compliance="1e-15" isCompliance="1" />
	<ConstraintValue/>
  </Node>

  <Node name="Visual" >
	<VisualModel  color="green"/>
	<IdentityMapping />
  </Node>

  <SphereCollisionModel radius="0.01" />
</Node>
