<?xml version="1.0"?>
<Node 	name="Root" gravity="0 0 0" dt="1"  >
    <VisualStyle displayFlags="showBehaviorModels showMechanicalMappings showForceFields" />

    <EulerImplicitSolver />
    <CGLinearSolver  />

    <MechanicalObject  template="Vec3d" position="0 0 1   0 1 0   1 0 0   -1 -1 0 "  name="parent"  />
    <UniformMass mass="1" />
    <ShepardShapeFunction position="@parent.rest_position" power="2"/>

    <Node 	name="Child"   >
        <MechanicalObject template="Vec3d" position="0 0.1 0.8   0 0 0.5" name="child"/>
    	<LinearMapping template="Mapping&lt;Vec3d,Vec3d&gt;"/>
    </Node>
</Node>
