<Node name="root" dt="0.003" gravity="0 -9.81 0" showBehaviorModels="1" showCollisionModels="1" showVisualModels="1">
	<MasterContactSolver/>
	<LCPConstraintSolver mu="0.05" tolerance="1e-10"/>
        <CollisionPipeline verbose="0" />
        <BruteForceDetection name="N2" />
        <CollisionResponse name="Response" response="FrictionContact" />
        <CollisionGroup name="Group" />
	<LocalMinDistance name="Proximity" alarmDistance="0.04" contactDistance="0.002" />

        <EulerImplicit rayleighStiffness="0.01" name="cg_odesolver" printLog="false" rayleighMass="0.1" />
        <CGLinearSolver iterations="25" name="linear solver" tolerance="1.0e-9" threshold="1.0e-9" />
	<Node name="tracking">
		<VRPNImager name="imageData" template="Rigid" listening="true" serverName="134.206.18.181" serverPort="3883" deviceName="TestImage" />
	</Node>
	<Node name="proxy">
                <!--<TransformEngine name="transform" template="Rigid" rotation="0 0 0" translation="0.42 0.095 0" scale="1.0 1.0 1.0" input_position="@../tracking/imageData.rigidPosition"/>
                <MechanicalObject name="mechCenterTool" template="Rigid" position="@[-1].output_position" debugViewIndices="true" />-->
		<MechanicalObject name="mechCorner" template="Rigid" position="@../tracking/imageData.rigidPosition" debugViewIndices="true" />
		<Node name="center">
			<MechanicalObject name="mechCenter" template="Rigid" debugViewIndices="true" />
	                <UniformMass  mass="0.1" showAxisSizeFactor="0.01"/>
			<RigidRigidMapping initialPoints="0.22 0.095 0  0 0 0 1"/>
		</Node>
	</Node>
       <Node name="cage">
                <MechanicalObject template="Rigid" position="0 0 -1.15 0 0 0 1"/>
                <UniformMass  vertexMass="0.001" showAxisSizeFactor="0.01"/>
		<RestShapeSpringsForceField points="0" external_points="0" external_rest_shape="@../proxy/center/mechCenter" stiffness="2000" angularStiffness="50000"/>
                <UncoupledConstraintCorrection compliance="0.0005 0.00002 0 0  0.00002  0 0.00002"/>
                <Node name="Visu">
			<OglModel name="Visual" fileMesh="mesh/box_outside_duriez.obj" color="1 0 0 0.7"/>
                        <RigidMapping input="@.." output="@Visual" />
                </Node>
                <Node name="Surf2">
			<MeshLoader name="meshLoader" filename="mesh/box_inside_duriez.obj" triangulate="true"/>
                        <Mesh />
                        <MechanicalObject/>
                        <TriangleCollisionModel />
                        <LineCollisionModel />
                        <PointCollisionModel />
                        <RigidMapping />
                </Node>
        </Node>
        <Node name="CUBE">
		<MechanicalObject template="Rigid" position="0 0 -1.15 0 0 0 1" />
                <UniformMass  vertexMass="0.01 0.00001 0.0001 0 0 0 0.0001 0 0 0 0.0001" showAxisSizeFactor="0.01"/>
                <UncoupledConstraintCorrection/>
                <Node name="Visu">
                        <OglModel name="Visual" fileMesh="mesh/smCube27.obj" color="0.0 0.5 0.5 1.0" scale="0.01"/>
                        <RigidMapping input="@.." output="@Visual" />
                </Node>
                <Node name="Surf2">
                        <MeshLoader name="meshLoader" filename="mesh/smCube27.obj" triangulate="true"/>
                        <Mesh />
                        <MechanicalObject scale="0.01"/>
                        <TriangleCollisionModel />
                        <LineCollisionModel />
                        <PointCollisionModel />
                        <RigidMapping />
                </Node>
	</Node>


</Node>
