<?xml version="1.0"?>
<Node name="root" gravity="0 0 0" dt="1">
    	<VisualStyle displayFlags="showBehavior showVisual" />
	<EulerImplicitSolver rayleighStiffness="0.5"  rayleighMass="0.5" printLog="0" verbose="0"/>
	<CGLinearSolver template="GraphScattered" iterations="150"  threshold="1e-008" />

	<Node name="Beam">
<!--		<MechanicalObject template="FrameAffine" name="DOFs" useMask="0" position="0 0 -1 [1 0 0, 0 1 0, 0 0 1] 0 0 1 [1 0 0, 0 1 0, 0 0 1] "/>-->
		<MechanicalObject template="FrameAffine" name="DOFs" useMask="0" rest_position="0 0 -1 [1 0 0, 0 1 0, 0 0 1] 0 0 1 [1 0 0, 0 1 0, 0 0 1] " position="0 0 -1 [1 0 0,0 1 0,0 0 1] -2.64131e-15 3.15661e-14 0.663231 [2.53633e-28 1 1.19699e-14,-1 1.5651e-29 1.98817e-14,1.98817e-14 -1.19699e-14 1]"/>
		<HookeMaterial3 template="Material3" bulkModulus="0" youngModulus="1" poissonRatio="0" />
		<FrameDiagonalMass template="AffineFrame3x12dMass" showAxisSizeFactor="0.2"/>
		<ConstantForceField template="FrameAffine"   points="1" forces="0 0 0  [0 -0.1 0,  0.1 0 0,   0 0 0]" />
		<FrameFixedConstraint template="FrameAffine" indices="0" allowed="0 0 0 0 0 0 0 0 0 0 0 0" />
 		<FrameRigidConstraint template="FrameAffine" indices="1" />


		<Node name="Physics">
			<MechanicalObject template="DeformationGradient331" name="PointSet" useMask="0"  position="1 0 0  1 0 0 0 1 0 0 0 1      -1 0 0  1 0 0 0 1 0 0 0 1 "  showObject="1" showObjectScale="0.05"/>
			<FrameBlendingMapping template="MechanicalMapping&lt;FrameAffine,DeformationGradient331&gt;"  input="@../DOFs"  output="@PointSet"  />
			<CorotationalForceField template="DeformationGradient331"   printLog="0" />
		</Node>

	</Node>
</Node>
