<?xml version="1.0"?>
<Node name="Scene" gravity="0 0 0" dt="1" >
    	<VisualStyle displayFlags="showBehavior showVisual" />
	<EulerImplicitSolver rayleighStiffness="0.5"  rayleighMass="0.5" />
	<CGLinearSolver template="GraphScattered" iterations="150"  threshold="1e-008" />


	<Node name="BeamLinear">
		<MechanicalObject template="Rigid" name="DOFs" useMask="0" rest_position="0 0 -1 0 0 0 1 0 0 1 0 0 0 1" position="0 0 -1 0 0 0 1    0 0 1  0 0 0 1"/>
		<FrameDiagonalMass template="RigidFrame3x6dMass" showAxisSizeFactor="0.2"/>
		<HookeMaterial3 template="Material3" />

		<FrameFixedConstraint template="Rigid" indices="0" allowed="0 0 0 0 0 0 0 0 0"/>

		<Node name="Physics">
			<MechanicalObject template="DeformationGradient332" useMask="0" name="PointSet" showObject="1" showObjectScale="0.05" position="0 0 0 1 0 0 0 1 0 0 0 1 0 0 0 0 0 0 0 0 0 0 0 0 0 0 0 0 0 0 0 0 0 0 0 0 0 0 0 " />
<!--
			<MeshObjLoader name="MeshLoader" filename="mesh/beam.obj"/>
			<Mesh src="@MeshLoader" />
     			<MechanicalObject  template="DeformationGradient332" name="PointSet"  useMask="0"  showObject="1" showObjectScale="0.05"/>
-->

			<FrameBlendingMapping template="Rigid,DeformationGradient332"  name="PMapping" input="@../DOFs"  output="@PointSet"  />
			<GreenLagrangeForceField template="DeformationGradient332"   printLog="0" />
		</Node>
		<Node name="Collision">
			<MeshObjLoader name="MeshLoader" filename="mesh/beam.obj"/>
    		  	<Mesh src="@MeshLoader" color="green" />
     		 	<MechanicalObject  name="PointSet"  />
			<FrameBlendingMapping template="Rigid,Vec3d" name="CMapping" input="@../DOFs"  output="@PointSet" />
		</Node>
		<Node name="Visu">
			<OglModel name="Beam" fileMesh="mesh/beam.obj" normals="0"   color="0.5 .4 .15 1" />
			<FrameBlendingMapping template="Rigid,ExtVec3f" name="VMapping"  input="@../DOFs"  output="@Beam"/>
		</Node>

		<!-- frame/frame mapping -->
		<!-- <Node name="AffineFrameMapping">
			<MechanicalObject template="FrameAffine" name="MappedDOFs" useMask="0" position="0 0 0 [1 0 0, 0 1 0, 0 0 1]" showObject="1" showObjectScale="0.5"/>
			<FrameBlendingMapping template="MechanicalMapping&lt;Rigid,FrameAffine;" input="@../DOFs"  output="@MappedDOFs" />
		</Node>
		<Node name="RigidFrameMapping">
			<MechanicalObject template="Rigid" name="MappedDOFs" useMask="0" position="0 0 0 0 0 0 1" showObject="1" showObjectScale="0.5"/>
			<FrameBlendingMapping template="MechanicalMapping&lt;Rigid,Rigid;" input="@../DOFs"  output="@MappedDOFs" />
		</Node>-->
	</Node>


	<Node name="BeamDualQuat">
		<MechanicalObject template="Rigid" name="DOFs" useMask="0" rest_position="0 0 -1 0 0 0 1 0 0 1 0 0 0 1" position="1 0 -1 0 0 0 1    1 0 1  0 0 0 1"/>
		<FrameDiagonalMass template="RigidFrame3x6dMass" showAxisSizeFactor="0.2"/>
		<HookeMaterial3 template="Material3" />

		<FrameFixedConstraint template="Rigid" indices="0" allowed="0 0 0 0 0 0 0 0 0"/>

		<Node name="Physics">
			<MechanicalObject template="DeformationGradient332" useMask="0" name="PointSet" showObject="1" showObjectScale="0.05" position="0 0 0 1 0 0 0 1 0 0 0 1 0 0 0 0 0 0 0 0 0 0 0 0 0 0 0 0 0 0 0 0 0 0 0 0 0 0 0    0 0 -0.5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" />
<!--
			<MeshObjLoader name="MeshLoader" filename="mesh/beam.obj"/>
			<Mesh src="@MeshLoader" />
     			<MechanicalObject  template="DeformationGradient332" name="PointSet"  useMask="0"  showObject="1" showObjectScale="0.05"/>
-->

			<FrameBlendingMapping template="Rigid,DeformationGradient332"  name="PMappingDQ" useDQ="1" input="@../DOFs"  output="@PointSet"  />
			<GreenLagrangeForceField template="DeformationGradient332"   printLog="0" />
		</Node>
		<Node name="Collision">
			<MeshObjLoader name="MeshLoader" filename="mesh/beam.obj"/>
    		  	<Mesh src="@MeshLoader" color="green" />
     		 	<MechanicalObject  name="PointSet"  />
      			<Triangle />
			<FrameBlendingMapping template="Rigid,Vec3d" name="CMappingDQ" useDQ="1" input="@../DOFs"  output="@PointSet" />
		</Node>
		<Node name="Visu">
			<OglModel name="Beam" fileMesh="mesh/beam.obj" normals="0"   color="0.5 .4 1 1" />
			<FrameBlendingMapping template="Rigid,ExtVec3f" name="VMappingDQ"  useDQ="1" input="@../DOFs"  output="@Beam"/>
		</Node>

		<!-- frame/frame mapping -->
		<!-- <Node name="AffineFrameMapping">
			<MechanicalObject template="FrameAffine" name="MappedDOFs" useMask="0" position="0 0 0 [1 0 0, 0 1 0, 0 0 1]" showObject="1" showObjectScale="0.5"/>
			<FrameBlendingMapping template="MechanicalMapping&lt;Rigid,FrameAffine;" useDQ="1" input="@../DOFs"  output="@MappedDOFs" />
		</Node>
		<Node name="RigidFrameMapping">
			<MechanicalObject template="Rigid" name="MappedDOFs" useMask="0" position="0 0 0 0 0 0 1" showObject="1" showObjectScale="0.5"/>
			<FrameBlendingMapping template="MechanicalMapping&lt;Rigid,Rigid;" useDQ="1" input="@../DOFs"  output="@MappedDOFs" />
		</Node>-->
	</Node>

</Node>
