<?xml version="1.0"?>
<Node 	name="sceneRoot" gravity="0 0 0" time="0" animate="0"  dt="0.02" >
  <RequiredPlugin pluginName="Flexible"/>
  <RequiredPlugin pluginName="Compliant"/>
  <VisualStyle displayFlags="showVisualModels showBehaviorModels showForceFields" />

  <Node name="Patch" >
    <CompliantImplicitSolver/>
    <LDLTSolver/>
    <LDLTResponse/>

    <!--Nodes-->
    <MechanicalObject template="Affine" position="0 0 0 [1 0 0,0 1 0,0 0 1] 20 0 0 [1 0 0,0 1 0,0 0 1]" name="DOFs" showObject="1"  showObjectScale="5" showIndices="1"/>
    <MeshTopology name="mesh" lines="0 1" position="@DOFs.position" drawEdges="true"/>

    <!--Mass-->
    <UniformMass name="mass" totalMass="1"/>

    <!--Shape function-->
    <BarycentricShapeFunction name="baryShapeFunction" template="ShapeFunctiond" />

    <!--Elasticity-->
    <Node 	name="Elasticity" >
      <TopologyGaussPointSampler name="sampler" inPosition="@../mesh.position" showSamplesScale="0" method="0" order="1" />
    </Node>

    <!--Visualisation-->
    <Node 	name="Visualisation" >
    </Node>

  </Node>

</Node>
