<?xml version="1.0"?>
<Node name="Root" >
    <RequiredPlugin name="SofaOpenglVisual"/>

    <RequiredPlugin pluginName="Flexible"/>

      <Mesh name="mesh" position="0 0 0  1 0 0  0 1 0  0 0 1" tetrahedra="0 1 2 3" triangles="0 1 2  0 1 3  0 2 3  1 2 3" />

	<MechanicalObject template="Vec3d" name="parent"/>

        <BarycentricShapeFunction name="SF"  />

        <MeshObjLoader name="meshLoader_0" filename="mesh/torus.obj" handleSeams="1" />
        <OglModel name="Visual" src="@meshLoader_0" />


        <Node 	name="child"   >

	    <MechanicalObject  template="Vec3d" position="0 0 0" />
            <LinearMapping template="Vec3d,Vec3d"  input="@../parent" output="@." />

        </Node>

  </Node>
