<?xml version="1.0"?>
<Node 	name="sceneRoot" gravity="0 0 0" time="0" animate="0"  dt="0.02" >
  <RequiredPlugin pluginName="Flexible"/>
  <RequiredPlugin pluginName="Compliant"/>
  <VisualStyle displayFlags="showVisualModels showBehaviorModels showForceFields" />

  <Node name="Patch" >
    <CompliantImplicitSolver/>
    <LDLTSolver/>

    <!--Nodes-->
    <MechanicalObject name="defoDOF" showObject="1"  showObjectScale="5"  showIndices="1"  showIndicesScale="0.0003" />
    <RegularGrid name ="loader" nx="2" ny="2" nz="2" xmin="0" xmax="1" ymin="0" ymax="1" zmin="0" zmax="1" position="@defoDOF.position" drawHexahedra="true" />

    <!--Constraint and roi-->
    <BoxROI name="Box" box="-0.1 -0.1 -0.1  1.1 1.1 1.1"/>
    <AffineMovementConstraint name="affineConstraint" indices="@Box.indices" meshIndices = "@Box.indices" drawConstrainedPoints="1" endConstraintTime="0.02"/>

    <!--Mass-->
    <UniformMass name="mass" totalMass="1"/>

    <!--Shape function-->
    <BarycentricShapeFunction name="baryShapeFunction" template="ShapeFunctiond" useLocalOrientation="false"/>

    <!--Elasticity-->
    <Node 	name="Elasticity" >
      <TopologyGaussPointSampler name="sampler" inPosition="@../loader.position" showSamplesScale="0" method="0" order="1" />
    </Node>

    <!--Visualisation-->
    <Node 	name="Visualisation" >
    </Node>

  </Node>

</Node>
