<?xml version="1.0"?>
<Node 	name="Root" gravity="0 -0.5 0 " dt="0.3"  >

    <RequiredPlugin pluginName="Flexible"/>

    <VisualStyle displayFlags="showBehaviorModels showForceFields" />
    <DefaultAnimationLoop />
    <DefaultVisualManagerLoop />

    <Node 	name="CorotationalStrain"   >
	<EulerImplicitSolver />
	<CGLinearSolver  />
        <MeshGmshLoader name="loader" filename="mesh/torus_low_res.msh" />
	<Mesh name="mesh" src="@loader" />
	<MechanicalObject template="Vec3d" name="parent" showObject="false" showObjectScale="0.05" />
        <UniformMass totalMass="250" />

        <BoxROI template="Vec3d" box="0 -2 0 5 2 5" position="@mesh.position" name="FixedROI"/>
        <FixedConstraint indices="@FixedROI.indices" />

        <BarycentricShapeFunction  />

        <Node 	name="behavior"   >
	    <TopologyGaussPointSampler name="sampler" inPosition="@../mesh.position" showSamplesScale="0" method="0" order="1" />
	    <MechanicalObject  template="F331" name="F"  showObject="0" showObjectScale="0.05" />
    	    <LinearMapping template="Mapping&lt;Vec3d,F331&gt;" assemble="0" />

	    <Node 	name="Strain"   >
		<MechanicalObject  template="E331" name="E"  />
	    	<CorotationalStrainMapping template="Mapping&lt;F331,E331&gt;"   method="polar" assemble="0"/>
	        <HookeForceField  template="E331" name="ff" youngModulus="2000.0" poissonRatio="0.2" viscosity="0"  assemble="0"  />
	    </Node>
        </Node>

	<Node name="Visual"  >
	     <VisualModel  fileMesh="mesh/torus.obj" />
             <LinearMapping template="MechanicalMapping&lt;Vec3d,ExtVec3f&gt;" assemble="0"/>
	</Node>
    </Node>


    <Node 	name="CorotationalMesh"   >
	<EulerImplicitSolver />
	<CGLinearSolver  />
        <MeshGmshLoader name="loader" filename="mesh/torus_low_res.msh" />
	<Mesh name="mesh" src="@loader" />
	<MechanicalObject template="Vec3d" name="parent" showObject="false" showObjectScale="0.05" />
        <UniformMass totalMass="250" />

        <BoxROI template="Vec3d" box="0 -2 0 5 2 5" position="@mesh.position" name="FixedROI"/>
        <FixedConstraint indices="@FixedROI.indices" />

        <BarycentricShapeFunction  />

        <Node 	name="Rotated nodes"   >
	    <MechanicalObject  name="pts" template="Vec3d" showObject="0" showObjectScale="5" />
	    <CorotationalMeshMapping name="mapping" inputTetrahedra="@../mesh.tetrahedra"/>

	    <Mesh name="mesh" src="@mapping" position="@pts.position"/>

		<Node name="Visual"  >
		    <VisualModel  color="0 1 0"/>
        	     <IdentityMapping />
		</Node>

        <BarycentricShapeFunction  />

        <Node 	name="behavior"   >
	    <TopologyGaussPointSampler name="sampler" inPosition="@../mesh.position" showSamplesScale="0" method="0" order="1" />
	    <MechanicalObject  template="F331" name="F"   />
    	    <LinearMapping template="Mapping&lt;Vec3d,F331&gt;" assemble="0" showDeformationGradientScale="0"/>

	    <Node 	name="Strain"   >
		<MechanicalObject  template="E331" name="E"  />
	    	<CauchyStrainMapping template="Mapping&lt;F331,E331&gt;"  assemble="0"/>
	        <HookeForceField  template="E331" name="ff" youngModulus="2000.0" poissonRatio="0.2" viscosity="0"   assemble="0" />
	    </Node>
        </Node>


        </Node>

	<Node name="Visual"  >
	     <VisualModel  fileMesh="mesh/torus.obj" color="1 0 0"/>
             <LinearMapping template="MechanicalMapping&lt;Vec3d,ExtVec3f&gt;" assemble="0"/>
	</Node>

    </Node>


</Node>
