<?xml version="1.0"?>

<!-- WARNING YOU MUST HAVE MGDIFFUSION LIBRARY THAT WILL BE DELIVERED SOON -->


<Node 	name="Root" gravity="0 0 0" dt="0.05"  >
    <RequiredPlugin name="SofaOpenglVisual"/>
    <RequiredPlugin pluginName="image"/>
    <RequiredPlugin pluginName="Flexible"/>
    <RequiredPlugin pluginName='SofaGeneralEngine'/>
    <RequiredPlugin pluginName='SofaImplicitOdeSolver'/>
    <RequiredPlugin pluginName='SofaLoader'/>


    <VisualStyle displayFlags="showVisual showBehaviorModels" />

    <DefaultAnimationLoop />
    <DefaultVisualManagerLoop />

  <ImageContainer name="loader" filename="../data/mesh/steak-seg-highres.ppm" drawBB="false" />
  <ImageFilter name="selectchannel" src="@loader" filter="21" param="0"/>
  <ImageFilter name="extruder" inputImage="@selectchannel.outputImage" filter="20" param="-5 -3.75 -1 65 65 16 0.15 0.15 0.15 0" inputTransform="-5 -3.75 0 0 0 0 0.025 0.025 0.8 0 1 0"/>

  <ImageContainer name="image" image="@extruder.outputImage" transform="@extruder.outputTransform" drawBB="false"/>

  <TransferFunction name="youngM" template="ImageUC,ImageD" inputImage="@extruder.outputImage" param="0 0 1 20000 254 5000 255 15000000000"/>
<!--  <ImageViewer template="ImageD" name="viewer" image="@youngM.outputImage" transform="@extruder.outputTransform" /> -->

  <TransferFunction name="densityTF" template="ImageUC,ImageD" inputImage="@extruder.outputImage" param="0 0 1 0.01"/>


  <EulerImplicitSolver rayleighStiffness="0.05"  rayleighMass="0.05" />
  <CGLinearSolver template="GraphScattered" iterations="10"  threshold="1e-008" />

 <Node 	name="Flexible"   >

	    <ImageSampler template="ImageUC" name="sampler" src="@../image" method="1" param="1" fixedPosition="2.4 0.45 0 1.5 2.5 0" />
            <MergeMeshes name="merged" nbMeshes="2" position1="@sampler.fixedPosition"  position2="@sampler.position" />
            <MechanicalObject template="Affine" name="parent"  showObject="true" src="@merged" showObjectScale="1"/>
	    <FixedConstraint indices="0" />

              <DiffusionShapeFunction template="ShapeFunction3d,ImageD"  name="SF" position="@parent.rest_position" image="@../youngM.outputImage" transform="@../extruder.outputTransform" clearData="0" iterations="10000000" tolerance="1e-3" solver="2 - CG" bias="1" nbRef="2" outsideDiffusion="0"/>

             <Node name="SFDisplay">
                 <ImageShapeFunctionSelectNode template="ImageD" name="selectNode" shapeFunctionWeights="@../SF.weights" shapeFunctionIndices="@../SF.indices" nodeIndex="1" />
                 <ImageViewer template="ImageD" name="viewerImage" image="@selectNode.nodeWeights" transform="@../../extruder.outputTransform" plane="5 5 5"/>
             </Node>


   	<!--   <ImageViewer template="ImageUI" name="viewer" image="@SF.indices" transform="@SF.transform" plane="-1 -1 4"/>  -->
	<!--   <ImageViewer template="ImageD" name="viewer" image="@SF.weights" transform="@SF.transform" plane="-1 -1 4"/>   -->

    <ImageDensityMass template="Affine,ShapeFunction3d" densityImage="@../densityTF.outputImage" transform="@../extruder.outputTransform" lumping="0" />

    <Node 	name="behavior"   >

<!--             <ImageFilter template="ImageUC,ImageUC" name="converter" inputImage="@../../extruder.outputImage" filter="13" param="1 255" inputTransform="@../../extruder.outputTransform"/> -->
<!--             <ImageContainer template="ImageUC" name="mask" image="@converter.outputImage" transform="@converter.outputTransform" drawBB="true"/> -->
<!--             <ImageViewer template="ImageUC" name="viewerImage" image="@mask.image" transform="@mask.transform" plane="5 5 5"/> -->
<!-- 	<ImageGaussPointSampler name="sampler" indices="@../SF.indices" weights="@../SF.weights" transform="@../SF.transform" method="2" order="4" showSamplesScale="0" printLog="false" targetNumber="1"  mask="@mask.image" maskLabels="1"/> -->

        <ImageGaussPointSampler name="sampler" indices="@../SF.indices" weights="@../SF.weights" transform="@../SF.transform" method="2" order="4" showSamplesScale="0" printLog="false" targetNumber="1" />

	<MechanicalObject template="F332" name="F"  />
    	<LinearMapping template="Affine,F332"  />

	<Node 	name="E"   >
	    <ImageValuesFromPositions name="youngM" position="@../sampler.position" image="@../../../youngM.outputImage" transform="@../../../extruder.outputTransform" />

	    <MechanicalObject  template="E332" name="E"  />
<!-- 	    <GreenStrainMapping template="F332,E332"  /> -->
            <CorotationalStrainMapping template="F332,E332" geometricStiffness="false" method="svd" />
	    <HookeForceField  template="E332" name="ff" youngModulus="@youngM.values" poissonRatio="0" viscosity="0"  />
	</Node>

    </Node>
		<Node name="Collision">
		        <VisualStyle displayFlags="hideBehaviorModels" />
			<MeshObjLoader name="MeshLoader" filename="../data/mesh/steak.obj"/>
			<MeshTopology src="@MeshLoader" />
                        <MechanicalObject  name="PointSet"  />
<!--                         <UniformMass totalMass="1000"/> -->
			<LinearMapping template="Affine,Vec3d"/>
		</Node>

		<Node name="Visu">
			<MeshObjLoader name="meshLoader_0" filename="../data/mesh/steak.obj" handleSeams="1" />
			<OglModel name="Beam" src="@meshLoader_0" texturename="../data/mesh/steak.png" normals="0" />
			<LinearMapping template="Affine,Vec3d"/>
		</Node>
    </Node>
</Node>
