<?xml version="1.0"?>
<Node 	name="Root" gravity="0 0 0 " dt="1"  >
    <VisualStyle displayFlags="showWireframe  " />
    <DefaultAnimationLoop />
    <DefaultVisualManagerLoop />

  <MeshObjLoader name="mesh" filename="mesh/beam.obj" triangulate="1"/>


  <Node name="hexaFEM"  >
    <EulerImplicitSolver />
    <CGLinearSolver iterations="200" tolerance="1e-15" threshold="1e-15"/>

	<MechanicalObject template="Vec3d" name="parent" showObject="false" />
       <RegularGrid
                   n="5 5 21"
                   min="-0.2 -0.2  -1"
                   max=" 0.2  0.2   1"/>

        <BoxROI template="Vec3d" box="-1 -1 -1.1 1 1 -0.99" />
        <FixedConstraint indices="@[-1].indices" />

       <BoxROI template="Vec3d" box="-1 -1 0.99 1 1 1.1 "  drawBoxes="0" />
       <ConstantForceField template="Vec3d" points="@[-1].indices" totalForce="0 -1 0"/>

	<UniformMass totalMass="10" />

	<HexahedronFEMForceField youngModulus="1000.0" poissonRatio="0.4" method="polar" updateStiffnessMatrix="false" />

	<Node name="Visual"  >
	     <VisualModel  fileMesh="mesh/beam.obj"  color="blue" />
	     <BarycentricMapping input="@.." output="@." />
	</Node>
  </Node>

  <Node name="tetFEM">
    <EulerImplicitSolver />
    <CGLinearSolver iterations="200" tolerance="1e-15" threshold="1e-15"/>

       <MechanicalObject template="Vec3d" name="Triangles"   />
       <RegularGrid
                   n="5 5 21"
                   min="-0.2 -0.2  -1"
                   max=" 0.2  0.2   1"/>
       <TriangleSetTopologyModifier name="Modifier" />
       <TriangleSetTopologyAlgorithms template="Vec3d" name="TopoAlgo" />
       <TriangleSetGeometryAlgorithms template="Vec3d" name="GeomAlgo" />
       <TriangleModel name="CollisionModel" />

	<UniformMass totalMass="10" />

      	<TetrahedronFEMForceField method="polar"  youngModulus="1000"  poissonRatio="0.4"  />

        <BoxROI template="Vec3d" box="-1 -1 -1.1 1 1 -0.99" />
        <FixedConstraint indices="@[-1].indices" />

       <BoxROI template="Vec3d" box="-1 -1 0.99 1 1 1.1 "  drawBoxes="0" />
       <ConstantForceField template="Vec3d" points="@[-1].indices" totalForce="0 -1 0"/>

       <Node 	name="VisualNode">
            <OglModel template="ExtVec3f" name="Visual" color="red" />
            <IdentityMapping template="Mapping&lt;Vec3d,ExtVec3f&gt;" name="default1"  object1="../../Triangles"  object2="../Visual" />
       </Node>
  </Node>


    <Node 	name="Flexible_OneElaston"   >
    	<VisualStyle displayFlags="showWireframe  " />
    	<EulerImplicitSolver />
    	<CGLinearSolver iterations="200" tolerance="1e-15" threshold="1e-15"/>

          <!--  <MeshToImageEngine template="ImageUC" name="rasterizer" src="@../mesh" voxelSize="0.02" padSize="1" rotateImage="true" />-->
	    <ImageContainer template="ImageUC" name="image" filename="mesh/beam.raw" drawBB="false"/>

<!-- param = DESIRED NUMBER OF FRAMES -->
	    <ImageSampler template="ImageUC" name="sampler" src="@image" method="1" param="0" fixedPosition="0 0 -0.99 0 0 0.99" printLog="false"/>
            <MergeMeshes name="merged" nbMeshes="2" position1="@sampler.fixedPosition"  position2="@sampler.position" />
	    <MechanicalObject template="Affine" name="parent" useMask="0" showObject="true" src="@merged" />


	    <FixedConstraint indices="0" />

	    <VoronoiShapeFunction name="SF" position="@parent.rest_position" src="@image" useDijkstra="true" method="0" nbRef="5" />
<!--    	    <ImageViewer template="ImageD" name="viewer" image="@SF.weights" transform="@SF.transform" plane="6 6 30"/>  -->
	    <Node 	name="behavior"   >

<!-- targetNumber = DESIRED NUMBER OF GAUSS POINTS -->
		<ImageGaussPointSampler name="sampler" indices="@../SF.indices" weights="@../SF.weights" transform="@../SF.transform" method="2" order="4" showSamples="true" printLog="false" targetNumber="1"/>

<!--	       <ImageViewer template="ImageD" name="viewer" image="@sampler.error" transform="@sampler.transform" plane="6 6 30"/> -->
<!--	       <ImageViewer template="ImageUI" name="viewer" image="@sampler.region" transform="@sampler.transform" plane="6 6 30"/> -->
		<MechanicalObject template="F332" name="F"  useMask="0"  showObject="1" showObjectScale="0.05" />
	    	<LinearMapping template="Mapping&lt;Affine,F332&gt;" assembleJ="false"/>

		<Node 	name="E"   >
		    <MechanicalObject  template="E332" name="E"  />
		    <CorotationalStrainMapping template="Mapping&lt;F332,E332&gt;" assembleJ="false" method="polar" />
		    <HookeForceField  template="E332" name="ff" youngModulus="1000.0" poissonRatio="0.4" viscosity="0"/>
		</Node>

	    </Node>

	<Node 	name="mass"   >
	     <MechanicalObject position="@../behavior/sampler.position"  />
	     <UniformMass totalMass="10" />
	     <LinearMapping template="Mapping&lt;Affine,Vec3d&gt;" assembleJ="false"/>
        </Node>

	    <Node 	name="collision"   >
		<MeshObjLoader name="MeshLoader" filename="mesh/beam.obj"/>
		<Mesh name="mesh" src="@MeshLoader" />
		<MechanicalObject  template="Vec3d" name="pts"  useMask="0"  />
<!--
        <BoxROI template="Vec3d" box="-1 -1 -1.1 1 1 -0.99" position="@mesh.position" name="FixedROI"/>
        <FixedConstraint template="Vec3d" indices="@FixedROI.indices" />
-->
		<BoxROI template="Vec3d" box="-1 -1 0.99 1 1 1.1"  position="@mesh.position" />
		<ConstantForceField template="Vec3d" points="@[-1].indices" totalForce="0 -1 0"/>

	    	<LinearMapping template="MechanicalMapping&lt;Affine,Vec3d&gt;"/>
	    </Node>

	    <Node 	name="visual"   >
		<OglModel template="ExtVec3f" name="Visual" fileMesh="mesh/beam.obj" color="1 0.5 0.5"/>
	    	<LinearMapping template="MechanicalMapping&lt;Affine,ExtVec3f&gt;"/>
	    </Node>
    </Node>


    <Node 	name="Flexible"   >
    	<VisualStyle displayFlags="hideWireframe  " />
    	<EulerImplicitSolver />
    	<CGLinearSolver iterations="200" tolerance="1e-15" threshold="1e-15"/>

          <!--  <MeshToImageEngine template="ImageUC" name="rasterizer" src="@../mesh" voxelSize="0.02" padSize="1" rotateImage="true" />-->
	    <ImageContainer template="ImageUC" name="image" filename="mesh/beam.raw" drawBB="false"/>

<!-- param = DESIRED NUMBER OF FRAMES -->
	    <ImageSampler template="ImageUC" name="sampler" src="@image" method="1" param="30" fixedPosition="0 0 -0.99 0.19 0.19 -0.99 -0.19 0.19 -0.99 0.19 -0.19 -0.99 -0.19 -0.19 -0.99" printLog="false"/>
            <MergeMeshes name="merged" nbMeshes="2" position1="@sampler.fixedPosition"  position2="@sampler.position" />
	    <MechanicalObject template="Affine" name="parent" useMask="0" showObject="true" src="@merged" />


	    <FixedConstraint indices="0 1 2 3 4" />

	    <VoronoiShapeFunction name="SF" position="@parent.rest_position" src="@image" useDijkstra="true" method="0" nbRef="5" />
<!--    	    <ImageViewer template="ImageD" name="viewer" image="@SF.weights" transform="@SF.transform" plane="6 6 30"/>  -->
	    <Node 	name="behavior"   >

<!-- targetNumber = DESIRED NUMBER OF GAUSS POINTS -->
		<ImageGaussPointSampler name="sampler" indices="@../SF.indices" weights="@../SF.weights" transform="@../SF.transform" method="2" order="4" showSamples="true" printLog="false" targetNumber="1000"/>

<!--	       <ImageViewer template="ImageD" name="viewer" image="@sampler.error" transform="@sampler.transform" plane="6 6 30"/> -->
<!--	       <ImageViewer template="ImageUI" name="viewer" image="@sampler.region" transform="@sampler.transform" plane="6 6 30"/> -->
		<MechanicalObject template="F332" name="F"  useMask="0"  showObject="1" showObjectScale="0.05" />
	    	<LinearMapping template="Mapping&lt;Affine,F332&gt;" assembleJ="false"/>

		<Node 	name="E"   >
		    <MechanicalObject  template="E332" name="E"  />
		    <CorotationalStrainMapping template="Mapping&lt;F332,E332&gt;" assembleJ="false" method="polar" />
		    <HookeForceField  template="E332" name="ff" youngModulus="1000.0" poissonRatio="0.4" viscosity="0"/>
		</Node>

	    </Node>

	<Node 	name="mass"   >
	     <MechanicalObject position="@../behavior/sampler.position"  />
	     <UniformMass totalMass="10" />
	     <LinearMapping template="Mapping&lt;Affine,Vec3d&gt;" assembleJ="false"/>
        </Node>

	    <Node 	name="collision"   >
		<MeshObjLoader name="MeshLoader" filename="mesh/beam.obj"/>
		<Mesh name="mesh" src="@MeshLoader" />
		<MechanicalObject  template="Vec3d" name="pts"  useMask="0"  />
<!--
        <BoxROI template="Vec3d" box="-1 -1 -1.1 1 1 -0.99" position="@mesh.position" name="FixedROI"/>
        <FixedConstraint template="Vec3d" indices="@FixedROI.indices" />
-->
		<BoxROI template="Vec3d" box="-1 -1 0.99 1 1 1.1"  position="@mesh.position" />
		<ConstantForceField template="Vec3d" points="@[-1].indices" totalForce="0 -1 0"/>

	    	<LinearMapping template="MechanicalMapping&lt;Affine,Vec3d&gt;"/>
	    </Node>

	    <Node 	name="visual"   >
		<OglModel template="ExtVec3f" name="Visual" fileMesh="mesh/beam.obj" color="1 0.8 0.8"/>
	    	<LinearMapping template="MechanicalMapping&lt;Affine,ExtVec3f&gt;"/>
	    </Node>
    </Node>


</Node>
