<?xml version="1.0"?>
<Node 	name="Root" gravity="0 0 0" time="0" animate="0"  dt="0.02" >
  <RequiredPlugin pluginName="Flexible"/>
  <VisualStyle displayFlags="showVisualModels showBehaviorModels showForceFields" />

  <Node name="Patch" >
    <EulerImplicitSolver verbose="0" />
    <CGSolver verbose="0" tolerance="1.0e-9" threshold="1.0e-9" />

    <!--Nodes-->
    <RegularGrid name ="loader" nx="4" ny="4" nz="4" xmin="0" xmax="1" ymin="0" ymax="1" zmin="0" zmax="1" />
    <MechanicalObject name="defoDOF" src="@loader"  showIndices="true" showIndicesScale="0.0002"/>

    <!--Constraint and roi-->
    <BoxROI name="Box" box="-0.1 -0.1 -0.1  1.1 1.1 1.1"/>
    <PairBoxROI name="PairBox" inclusiveBox="-0.1 -0.1 -0.1  1.1 1.1 1.1" includedBox="0.1 0.1 0.1 0.9 0.9 0.9"/>
    <BilinearMovementConstraint name="bilinearConstraint" indices="@PairBox.indices" meshIndices = "@Box.indices" constrainedPoints="@PairBox.pointsInROI" cornerMovements=" 0 0 -0.2
                                                                                                                                                                                               0.1 -0.1 -0.6
                                                                                                                                                                                               0.1 0.1 -0.1
                                                                                                                                                                                              0 0 0
                                                                                                                                                                                              -0.5 -0.1 0.1
                                                                                                                                                                                               -0.1 0 0
                                                                                                                                                                                               0.2 0.1 0
                                                                                                                                                                                              -0.3 0.1 0.1"/>

    <!--Mass-->
    <UniformMass  name="mass" totalMass="1"/>

    <!--Shape function-->
    <BarycentricShapeFunction template="ShapeFunctiond" />

    <!--Elasticity-->
    <Node 	name="Elasticity" >
      <TopologyGaussPointSampler name="sampler" inPosition="@../loader.position" showSamplesScale="0" method="0" order="1" />
      <MechanicalObject template="F332"  name="MoElasticity" showObject="1" />
      <LinearMapping template="Mapping&lt;Vec3,F332&gt;"  />

      <!--Material-->
      <Node 	name="Material" >
        <MechanicalObject template="E332"  name="VoigtStrainDOF" />
        <CorotationalStrainMapping template="Mapping&lt;F332,E332&gt;" method="polar"/>
        <HookeForceField template="E332" youngModulus="1000" poissonRatio="0" />
      </Node>

    </Node>

    <!--Visualisation-->
    <Node 	name="Visualisation" >
      <VisualModel  />
      <IdentityMapping />
    </Node>

  </Node>

</Node>
