<?xml version="1.0"?>

<!-- file "/tmp/skeleton.scn", generated by LuaXML -->

<Node name="Root" dt="1e-03">
  <RequiredPlugin pluginName="Flexible"/>
  <VisualStyle displayFlags="hideVisual showBehaviorModels hideForceFields hideInteractionForceFields hideCollision hideMapping hideOptions" />
  <Node name="RigidBody">
    <MinresSolver rayleighMass="0" rayleighStiffness="0" implicitVelocity="1" implicitPosition="1" />
    <MechanicalObject template="Rigid" position=" -3.18832 15.5276 42.8748 0.949998 -0.309158 0.0437321 0.00343016 -3.72934 11.2454 41.8289 0.987295 0.0225775 0.0417905 -0.151631 -3.57507 4.37388 42.564 0.973281 0.00550239 0.04718 0.224651 -3.87245 0.511514 43.3129 0.786262 -0.112943 -0.0504368 -0.605386 -4.2502 0.199901 41.7861 0.169966 -0.671159 0.721566 -0.000237303 -1.61459 15.6579 42.6943 -0.914231 -0.375407 0.149514 0.0299483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" />
    <UniformMass />
    <Node name="Joints">
      <MechanicalObject template="Rigid" position=" 0 0 0 0 0 0 0 0 0 0 0 0 0 0 0 0 0 0 0 0 0 0 0 0 0 0 0 0 0 0 0 0 0 0 0 0 0 0 0 0 0 0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" />
      <JointRigidMapping template="Rigid,Rigid" source=" 11 0 -0.95444 0 0 0 0 1 10 0 0.958557 0 0 0 0 1 12 0 -0.919778 0 0 0 0 1 11 0 0.95444 0 0 0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" />
      <Node name="Relative">
        <MechanicalObject template="Rigid" position=" 0 0 0 0 0 0 0 0 0 0 0 0 0 0 0 0 0 0 0 0 0 0 0 0 0 0 0 0 0 0 0 0 0 0 0 0 0 0 0 0 0 0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" />
        <RelativeRigidMapping edges="0 1 2 3 4 5 6 7 8 9 10 11 12 13 14 15 16 17 18 19 20 21 22 23 24 25 26 27 28 29 30 31 32 33 34 35 36 37 38 39 40 41 42 43 44 45 46 47 48 49 50 51 " template="Rigid,Rigid" />
        <Node name="Rest">
          <MechanicalObject template="Rigid" position=" 0 0 0 0 0 0 0 0 0 0 0 0 0 0 0 0 0 0 0 0 0 0 0 0 0 0 0 0 0 0 0 0 0 0 0 0 0 0 0 0 0 0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" />
          <DisplacementMapping template="Rigid,Rigid" reference=" 8.19751e-16 -3.56686e-15 -1.23454e-16 0.0346821 0.000268725 -0.0190646 0.999217 1.06473e-15 1.62147e-14 -1.19585e-14 0.147913 0.00753391 0.0399078 0.988166 7.1168e-16 -2.41571e-15 7.5507e-15 -0.155086 0.0362065 -0.00518882 0.987224 -1.25786e-15 3.61183e-15 -8.10235e-15 -0.2278 0.0325761 -0.0290323 0.97273 -2.66298e-15 2.62881e-15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" />
          <Node name="Log">
            <MechanicalObject template="Vec6d" position=" 0 0 0 0 0 0 0 0 0 0 0 0 0 0 0 0 0 0 0 0 0 0 0 0 0 0 0 0 0 0 0 0 0 0 0 0 0 0 0 0 0 0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" />
            <LogRigidMapping template="Rigid,Vec6d" />
            <DiagonalCompliance compliance=" 0 0 0 1e-05 1e-05 1e-05 0 0 0 1e-05 1e-05 1e-05 0 0 0 1e-05 1e-05 1e-05 0 0 0 1e-05 1e-05 1e-05 0 0 0 1e-05 1e-05 1e-05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" template="Vec6d" dampingRatio="0.001" />
          </Node>
        </Node>
      </Node>
    </Node>
  </Node>
</Node>
