<?xml version="1.0"?>
<Node 	name="Root" gravity="0 0 0" dt="1"  >
    <RequiredPlugin pluginName="Flexible"/>
<!--    <MechanicalObject  template="Rigid" position="0 -1 0 0 0 0 1    0 0 0 0 0 0 1    0 1 0 0 0 0 1"  name="parent"  /> -->
<!--
    <MechanicalObject  template="Vec3d" position="0 0 1   0 1 0   1 0 0   -1 -1 0 "  name="parent"  />
    <ShepardShapeFunction position="@parent.rest_position" power="2"/>
-->

    <MeshGmshLoader name="loader" filename="mesh/torus_low_res.msh" />
    <Mesh src="@loader" />
    <MechanicalObject src="@loader" name="parent" />
    <BarycentricShapeFunction position="@parent.rest_position" />

    <EulerImplicitSolver />
    <CGLinearSolver  />
    <UniformMass mass="1" />

    <Node 	name="Child"   >
         <MeshObjLoader name="loader" filename="mesh/torus_for_collision.obj" />
         <MechanicalObject src="@loader" name="child" />
<!--
       <MechanicalObject template="Vec3d" position="0 0.1 0.8   0 0 0.5" name="child"/>
-->
       <LinearMapping template="Mapping&lt;Vec3d,Vec3d&gt;"/>
    </Node>

    <Node 	name="visual"   >
	<OglModel template="ExtVec3f" name="Visual" fileMesh="mesh/torus.obj"/>
    	<LinearMapping template="MechanicalMapping&lt;Vec3d,ExtVec3f&gt;"/>
    </Node>
</Node>
