<?xml version="1.0"?>
<Node name="Buffoon">
	<CGImplicit  iterations="10" rayleighMass="0.05" rayleighStiffness="0.1" vdamping="0.01" tolerance="1e-6" threshold="1e-6"/>
	<MechanicalObject dz="0.0" dy="0.0" dx="0.0" position="
				-0.17 -0.17 0 -0.113333 -0.17 0 -0.0566667 -0.17 0 0 -0.17 0 0.0566667 -0.17 0 0.113333 -0.17 0 0.17 -0.17 0 -0.17 -0.113333 0 -0.113333 -0.113333 0 -0.0566667 -0.113333 0 0 -0.113333 0 0.0566667 -0.113333 0 0.113333 -0.113333 0 0.17 -0.113333 0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"
			/>
	<UniformMass totalmass="1"/>
	<FittedRegularGrid nx="7" ny="7" nz="14" xmin="-0.17" xmax="0.17" ymin="-0.17" ymax="0.17" zmin=" 0.0" zmax="0.7" />
	<BoxConstraint box="-0.2 -0.2 -0.01 0.2 0.2 0.11" />
	<!--	<RegularGridSpringForceField" name="Springs" stiffness="250" damping="0" />-->
	<TetrahedronFEMForceField" name="FEM" youngModulus="10000000" poissonRatio="0.4" method="large" localStiffnessFactor="1 1 1 0.8 0.8 0.6 0.4 0.4 0.4 1 1 0.05 0.05" />

	<Node name="Collision">
		<Sphere name="Sphere" filename="buffoon.sph" scale="1.0" contactStiffness="1000" />
		<BarycentricMapping />
	</Node>

	<Node name="VisuSpring">
		<VisualModel name="Visual" filename="BuffoonSpring.obj" scale="1.0" />
		<BarycentricMapping object1="../.." object2="Visual" />
	</Node>
	<Node name="VisuSkin">
		<VisualModel name="Visual" filename="BuffoonHeadSkin.obj" scale="1.0" texturename="Buffoon.png" />
		<BarycentricMapping object1="../.." object2="Visual" />
	</Node>
	<Node name="VisuRed">
		<VisualModel name="Visual" filename="BuffoonHeadRed.obj" scale="1.0" />
		<BarycentricMapping object1="../.." object2="Visual" />
	</Node>
	<Node name="VisuPurple">
		<VisualModel name="Visual" filename="BuffoonHeadPurple.obj" scale="1.0" />
		<BarycentricMapping object1="../.." object2="Visual" />
	</Node>
	<Node name="VisuYellow">
		<VisualModel name="Visual" filename="BuffoonHeadYellow.obj" scale="1.0" />
		<BarycentricMapping object1="../.." object2="Visual" />
	</Node>
	<Node name="BoxRed">
		<VisualModel name="Visual" filename="BoxRed.obj" scale="1.0" dz="0.0" dy="0.0" dx="0.0" />
	</Node>
	<Node name="BoxPurple">
		<VisualModel name="Visual" filename="BoxPurple.obj" scale="1.0" dz="0.0" dy="0.0" dx="0.0" />
	</Node>
</Node>
