<Node 	name="Root"   >
    <RequiredPlugin name="SofaOpenglVisual"/>
	<MeshSTEPLoader name="loader"  filename="Product.stp"  deflection="0.1"  debug="0"  keepDuplicate="1" />
	<Node 	name="obj1"  >
	  <MeshTopology name="topology" />
        <STEPShapeExtractor input="@../loader" output="@topology" shapeNumber="0" />
	  <OglModel name="vis" src="@topology"   />
	</Node>
	<Node 	name="obj2"  >
		<MeshTopology name="topology" />
        <STEPShapeExtractor input="@../loader" output="@topology" shapeNumber="1" />
		<OglModel src="@topology"/>
    </Node>
</Node>
