<?xml version="1.0"?>
<Node animate="1" gravity="0 0 -1">
    <RequiredPlugin name="SofaOpenglVisual"/>
  <RequiredPlugin pluginName="optiTrackNatNet"/>
  <VisualStyle displayFlags="showVisual showCollisionModels" />
    <DefaultPipeline verbose="0" />
    <BruteForceBroadPhase/>
    <BVHNarrowPhase/>
    <DefaultContactManager response="default" />
    <MinProximityIntersection name="Proximity" alarmDistance="2" contactDistance="1" />

  <OptiTrackNatNetClient serverName="169.254.165.78" scale="1000" drawOtherMarkersSize="2" drawTrackedMarkersSize="0" />
  <Node name="Head">
    <OptiTrackNatNetDevice name="HeadDevice" trackableName="Head" isGlobalFrame="1" inMarkersMeshFile="./data/optitrack-markers-Head.obj" simMarkersMeshFile="./data/markers-Head.obj" drawMarkersColor="0 1 0 1" drawAxisSize="50 10 50" drawMarkersSize="2" />
<!--
    <Node name="HeadVisual">
      <OglModel name="vm" filename="./data/head_low.obj" />
      <RigidMapping />
    </Node>
-->
  </Node>
  <Node name="Cystitome">
    <MechanicalObject name="ms1" template="Rigid3d" />
    <OptiTrackNatNetDevice name="CutDevice" trackableName="Cut" inGlobalFrame="@../Head/HeadDevice.frame" inMarkersMeshFile="./data/optitrack-markers-Cystitome.obj" simMarkersMeshFile="./data/markers_cystitome.obj" controlNode="1" drawMarkersColor="1 0 1 1" drawAxisSize="10 10 10" drawMarkersSize="2" />
    <Node name="CutEdges">
<!--      <MeshTopology position="0 0.0167 -0.0424 0 0.1959 0.2303" edges="0 1" /> -->
<!--      <MeshTopology position="0 -0.1625 -0.3151    0 0.1959 0.2303" edges="0 1" /> -->
      <MeshTopology position="0 -0.7001 -1.1332    0 0.1959 0.2303" edges="0 1" />
<!--      <MeshTopology position="0 -1.7753 -2.7694    0 0.1959 0.2303" edges="0 1" /> -->
      <MechanicalObject name="vertices" />
      <LineCollisionModel name="CM" group="2" simulated="0" moving="1" contactStiffness="0" />
      <RigidMapping />
    </Node>
    <Node name="Surface">
      <MeshTopology position="
0 0.1063 0.0939
0 -0.0300 1.3480
0 -0.3800 2.5480
0 -0.8800 3.5980
0 -1.6800 4.7480
0 -1.7000 4.8600
0 -1.7000 8.2993" edges="0 1 1 2 2 3 3 4 4 5 5 6" />
      <MechanicalObject name="vertices" />
      <PointCollisionModel group="2" />
      <LineCollisionModel group="2" />
      <RigidMapping />
    </Node>
    <Node name="Visual">
      <OglModel name="vm" filename="./data/cystitome.obj" />
      <RigidMapping />
    </Node>
  </Node>
  <Node name="Grab">
    <MechanicalObject name="ms1" template="Rigid3d" />
    <OptiTrackNatNetDevice name="GrabDevice" trackableName="Grab" inGlobalFrame="@../Head/HeadDevice.frame" inMarkersMeshFile="./data/optitrack-markers-Grab.obj" simMarkersMeshFile="./data/markers-Grab.obj"  controlNode="1" distanceMarkersID="5 6" closedDistance="46" openDistance="48" jointCenter="0 33.7158 17.7522" jointAxis="0 4 -2.8" jointOpenAngle="5" jointClosedAngle="-0.1" drawMarkersColor="1 1 0 1" drawAxisSize="10 10 10" drawMarkersSize="2" drawMarkersIDSize="2" />
    <Node name="GrabPoint">
      <MechanicalObject name="vertices" position="0 -2.7482 -40.7508 0 -1.5256 -40.7505" />
      <SphereCollisionModel name="CM" radius="2" contactResponse="stick" group="1" simulated="0" moving="1" contactStiffness="1000" />
      <RigidMapping index="0" />
      <GraspingManager name="Grasping" active="@../GrabDevice.closed" printLog="1" />
    </Node>
    <Node name="GrabSurfaceL">
      <MeshObjLoader name="loaderPince" filename="./data/pince_cm_left.obj" triangulate="1" createSubelements="true" />
      <MeshTopology src="@loaderPince" />
      <MechanicalObject name="vertices" src="@loaderPince" />
      <TriangleCollisionModel group="1" simulated="0" moving="1" />
      <LineCollisionModel group="1" simulated="0" moving="1" />
      <PointCollisionModel group="1" simulated="0" moving="1" />
      <RigidMapping index="1" />
    </Node>
    <Node name="GrabSurfaceR">
      <MeshObjLoader name="loaderPince" filename="./data/pince_cm_right.obj" triangulate="1" createSubelements="true"/>
      <MeshTopology src="@loaderPince" />
      <MechanicalObject name="vertices" src="@loaderPince" />
      <TriangleCollisionModel group="1" simulated="0" moving="1" />
      <LineCollisionModel group="1" simulated="0" moving="1" />
      <PointCollisionModel group="1" simulated="0" moving="1" />
      <RigidMapping index="2" />
    </Node>
    <Node name="GrabVisualL">
      <OglModel name="vm" filename="./data/pince_left.obj" />
      <RigidMapping index="1" />
    </Node>
    <Node name="GrabVisualR">
      <OglModel name="vm" filename="./data/pince_right.obj" />
      <RigidMapping index="2" />
    </Node>
  </Node>
<!--
  <Node name="Phaco">
    <OptiTrackNatNetDevice name="PhacoDevice" trackableName="Phaco" inGlobalFrame="@../Head/HeadDevice.frame" inMarkersMeshFile="./data/optitrack-markers-Phaco.obj" simMarkersMeshFile="./data/markers-Phaco.obj" drawMarkersColor="0 1 1 1" drawAxisSize="10 10 10" drawMarkersSize="2" />
  </Node>
-->
    <Node name="SquareGravity">
        <EulerImplicitSolver name="cg_odesolver" printLog="false"  rayleighStiffness="0.1" rayleighMass="0.1" />
        <CGLinearSolver iterations="25" name="linear solver" tolerance="1.0e-9" threshold="1.0e-9" />
        <MeshGmshLoader name="meshLoader" filename="mesh/square3.msh" scale="100" createSubelements="true"/>
        <include href="Objects/TriangleSetTopology.xml" src="@meshLoader" />
        <MechanicalObject rx2="0" dx2="-50" dy2="-50" dz2="30" />
        <DiagonalMass massDensity="0.15" />
        <FixedConstraint indices="0 1 2 3" />
        <TriangularFEMForceField name="FEM" youngModulus="6000" poissonRatio="0.35" method="large" showStressValue="false" showStressVector="false"
			showFracturableTriangles="true" hosfordExponant="10.0" criteriaValue="10000" computePrincipalStress="true"/>
<!--        <TriangularFEMForceField name="FEM" youngModulus="6000" poissonRatio="0.35" method="large" />-->
        <TriangularBendingSprings name="FEM-Bend" stiffness="3000" damping="1.0" />
        <TriangleCollisionModel name="cmTriangles" contactStiffness="5000" />
        <LineCollisionModel name="cmLines" contactStiffness="5000" />
        <PointCollisionModel name="cmPoints" contactStiffness="5000" />
        <Node name="VM">
            <OglModel name="Visual" color="red" />
            <IdentityMapping />
        </Node>
        <MICSCuttingManager modelSurface="cmTriangles" modelTool="/Cystitome/CutEdges/CM" pointedTip="1" minDistance="0.5" maxDistance="5" printLog="1" triangleInfo="@FEM.triangleInfo" fractureStress="-9000" radius="50"/>
<!--        <CuttingManager modelSurface="cmTriangles" modelTool="/Cystitome/CutEdges/CM" pointedTip="1" minDistance="1" maxDistance="10" printLog="1" />-->
        <BruteForceBroadPhase/>
        <BVHNarrowPhase/>
        <DiscreteIntersection name="CutIntersection" />
    </Node>

<!--
  <Node name="Floor">
    <OglModel name="FloorV" filename="mesh/floor.obj" scale="1" dy="-100" />
  </Node>
-->
</Node>
