<Node 	name="Root"  >
        <EulerImplicitSolver />
        <CGLinearSolver template="GraphScattered" />
        <MechanicalObject template="Vec1d" />
        <Node 	name="myTestingNode" >
                <MechanicalObject template="Vec3d" />
                <MyMapping template="Vec3d" input="@.." output="@."/>
                <MyFakeComponent name="aMyFakeComponent" />
                <OtherFakeComponent name="aOtherFakeComponent" />
        </Node>
</Node>
