<Node 	name="Root" dt="0.02"  >
    <RequiredPlugin name="SofaOpenglVisual"/>

	<!-- <BackgroundSetting color="0.2 0.2 0.25" /> -->
    <Gravity name="G" gravity="0 -9.81 0" />
    <!-- <ViewerSetting name="viewer" resolution="800 800" cameraMode="Orthographic" /> -->
    <VisualStyle displayFlags="showVisualModels hideBehaviorModels showCollisionModels hideMappings hideForceFields" />

    <RequiredPlugin name="Razer Hydra Driver" pluginName="SixenseHydra" />

	<CollisionPipeline name="pipeline" depth="6" />
    <BruteForceBroadPhase/>
    <BVHNarrowPhase/>
    <!-- <NewProximityIntersection alarmDistance="0.02" contactDistance="0.01" /> -->
	<DiscreteIntersection />
    <DefaultContactManager name="Response" response="PenalityContactForceField" />

	<RazerHydraDriver name="RazerHydraDriver"  listening="true" displayTools="false" scale="0.002" positionBase="0 0.2 -0.4" orientationBase="0.7071 0 0 0.7071" />
	<!-- http://www.onlineconversion.com/quaternions.htm -->

	<EulerImplicitSolver vdamping="2.0"  rayleighStiffness="0.1" rayleighMass="0.1" />
    <CGLinearSolver iterations="30"  tolerance="1e-6" threshold="1e-6" />

	<Node name="ControlledFist" >
		<VisualStyle displayFlags="showVisualModels hideBehaviorModels showCollisionModels hideMappings hideForceFields" />
		<Node name="controller1">
			<Gravity name="Gravity" gravity="0 0 0" />
			<QuatToRigidEngine name="controllerRigid" template="Vec3d" positions="@../../RazerHydraDriver.positionFirstTool" orientations="@../../RazerHydraDriver.orientationFirstTool" />
			<MechanicalObject name="controller1State" template="Rigid3d" position="@./controllerRigid.rigids" />
			<UniformMass name="uniformMass" template="Rigid3d"  totalmass="0.1" />
			<Node name="Collision_Model" >
				<MechanicalObject name="collisDOFs" template="Vec3d" position="@../controllerRigid.rigids" />
				<SphereCollisionModel name="colliSphere" contactStiffness="100" group="1" radius="0.05"/>
				<IdentityMapping/>
			</Node>
		</Node>

		<Node name="controller2">
			<Gravity name="Gravity" gravity="0 0 0" />
			<QuatToRigidEngine name="controllerRigid" template="Vec3d" positions="@../../RazerHydraDriver.positionSecondTool" orientations="@../../RazerHydraDriver.orientationSecondTool" />
			<MechanicalObject name="controller1State" template="Rigid3d" position="@./controllerRigid.rigids" />
			<UniformMass name="uniformMass" template="Rigid3d"  totalmass="0.1" />
			<Node name="Collision_Model" >
				<MechanicalObject name="collisDOFs" template="Vec3d" position="@../controllerRigid.rigids" />
				<SphereCollisionModel name="colliSphere" contactStiffness="100" group="1" radius="0.05"/>
				<IdentityMapping/>
			</Node>
		</Node>
	</Node>

	<Node name="Buffoon" activated="true">
        <MechanicalObject name="DOFs" dz="0.0" dy="0.0" dx="0.0" position="
                                -0.17 -0.17 0 -0.113333 -0.17 0 -0.0566667 -0.17 0 0 -0.17 0 0.0566667 -0.17 0 0.113333 -0.17 0 0.17 -0.17 0 -0.17 -0.113333 0 -0.113333 -0.113333 0 -0.0566667 -0.113333 0 0 -0.113333 0 0.0566667 -0.113333 0 0.113333 -0.113333 0 0.17 -0.113333 0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"
                        />
        <RegularGridTopology nx="7" ny="7" nz="14" xmin="-0.17" xmax="0.17" ymin="-0.17" ymax="0.17" zmin=" 0.0" zmax="0.7" />
        <!-- <MechanicalObject name="DOFs" /> -->
		<UniformMass totalmass="1"/>
		<BoxROI name="ROI" box="-0.2 -0.2 -0.01 0.2 0.2 0.11" />
        <FixedConstraint indices="@ROI.indices" />
        <TetrahedronFEMForceField name="FEM" youngModulus="10000" poissonRatio="0.4" method="large" localStiffnessFactor="1 1 1 0.8 0.8 0.6 0.4 0.4 0.4 1 1 0.05 0.05" />

		<Node name="Collision">
			<SphereLoader name="loader" filename="OBJs/buffoon.sph" />
			<MechanicalObject name="sphereDOFs"  position="@loader.position" />
			<SphereCollisionModel listRadius="@loader.listRadius" />
			<BarycentricMapping input="@../DOFs" output="@sphereDOFs" />
		</Node>

		<Node name="VisuSpring">
			<OglModel name="Visual" filename="OBJs/BuffoonSpring.obj" scale="1.0" />
			<BarycentricMapping input="@../DOFs" output="@Visual" />
		</Node>
		<Node name="VisuSkin">
			<OglModel name="Visual" filename="OBJs/BuffoonHeadSkin.obj" scale="1.0" texturename="OBJs/Buffoon.png" />
			<BarycentricMapping input="@../DOFs" output="@Visual" />
		</Node>
		<Node name="VisuRed">
			<OglModel name="Visual" filename="OBJs/BuffoonHeadRed.obj" scale="1.0" />
			<BarycentricMapping input="@../DOFs" output="@Visual" />
		</Node>
		<Node name="VisuPurple">
			<OglModel name="Visual" filename="OBJs/BuffoonHeadPurple.obj" scale="1.0" />
			<BarycentricMapping input="@../DOFs" output="@Visual" />
		</Node>
		<Node name="VisuYellow">
			<OglModel name="Visual" filename="OBJs/BuffoonHeadYellow.obj" scale="1.0" />
			<BarycentricMapping input="@../DOFs" output="@Visual" />
		</Node>
		<Node name="BoxRed">
			<OglModel name="Visual" filename="OBJs/BoxRed.obj" scale="1.0" dz="0.0" dy="0.0" dx="0.0" />
		</Node>
		<Node name="BoxPurple">
			<OglModel name="Visual" filename="OBJs/BoxPurple.obj" scale="1.0" dz="0.0" dy="0.0" dx="0.0" />
		</Node>
    </Node>

</Node>
