<?xml version="1.0" ?>
<!-- For more details see: https://wiki.sofa-framework.org/tdev/wiki/Notes/NewLoaderArchitecture -->
<Node name="Root" gravity="0 -9.81 0" dt="0.02">
    <RequiredPlugin pluginName="SofaAssimp" />
    <VisualStyle displayFlags="showVisual showBehaviorModels showForceFields showCollision showMapping" />
    <DefaultPipeline name="DefaultCollisionPipeline" verbose="0" draw="0" depth="6" />
    <BruteForceDetection name="Detection" />
    <MinProximityIntersection name="Proximity" alarmDistance="0.3" contactDistance="0.2" />
    <DefaultContactManager name="Response" response="default" />
    <TreeCollisionGroupManager name="Group" />
    <Node name="obj file">
        <AssimpLoader name="ObjLoader" filename="mesh/Sofa.fbx" />
        <MechanicalObject name="dofs" src="@ObjLoader" />
        <Node name="triangulation">
            <TriangleSetTopologyContainer name="triangles" src="@../ObjLoader" />
            <TriangleSetGeometryAlgorithms name="triGeo" drawEdges="1" />
        </Node>
        <Node name="quad_topology">
            <QuadSetTopologyContainer name="quads" src="@../ObjLoader" />
            <QuadSetGeometryAlgorithms name="quadGeo" drawQuads="1" />
        </Node>
        <Node name="visu">
            <OglModel name="VisualModel" src="@../ObjLoader" texturename="textures/floor.bmp" />
        </Node>
    </Node>
</Node>
