<?xml version="1.0" ?>
<Node name="root" gravity="0 -9.81 0" dt="0.01">
    <RequiredPlugin pluginName="Sofa.Component.Constraint.Projective"/>
    <RequiredPlugin pluginName="Sofa.Component.Engine.Select"/>
    <RequiredPlugin pluginName="Sofa.Component.LinearSolver.Iterative"/>
    <RequiredPlugin pluginName="Sofa.Component.Mass"/>
    <RequiredPlugin pluginName="Sofa.Component.IntegrationScheme.Backward"/>
    <RequiredPlugin pluginName="Sofa.Component.SolidMechanics.FEM.Elastic"/>
    <RequiredPlugin pluginName="Sofa.Component.Topology.Container.Constant"/>
    <RequiredPlugin pluginName="Sofa.Component.Topology.Container.Grid"/>
    <RequiredPlugin pluginName="Sofa.Component.Topology.Mapping"/>
    <RequiredPlugin pluginName="Sofa.Component.Visual"/>
    <RequiredPlugin pluginName="SofaCUDA"/>

    <VisualStyle displayFlags="showBehaviorModels showForceFields" />
    <DefaultAnimationLoop />
    <DefaultVisualManagerLoop />

    <Node name="Prism">
        <Node name="Beam">
            <RegularGridTopology name="grid" n="40 10 10" min="0 6 -2" max="16 10 2" />
        </Node>

        <Node name="Simulated">
            <EulerImplicitIntegrationScheme name="cg_odesolver" rayleighStiffness="0.1" rayleighMass="0.1" />
            <CGLinearSolver iterations="20" name="linear solver" tolerance="1.0e-12" threshold="1.0e-12" />

            <MechanicalObject position="@../Beam/grid.position" name="Volume" template="CudaVec3f"/>

            <MeshTopology name="Container" />
            <Hexa2PrismTopologicalMapping input="@../Beam/grid" output="@Container" />

            <NodalMassDensity property="0.2"/>
            <FEMMass template="CudaVec3f,Prism"/>
            <BoxROI name="ROI1" box="-0.1 5 -3 0.1 11 3" drawBoxes="1" />

            <FixedProjectiveConstraint indices="@ROI1.indices" />
            <CudaCorotationalFEMForceField name="FEM" template="CudaVec3f,Prism"
                                           youngModulus="2000" poissonRatio="0.3"/>
        </Node>
    </Node>

</Node>
