<?xml version="1.0" ?>
<Node name="root" gravity="0 -9.81 0" dt="0.01">
    <RequiredPlugin pluginName="Sofa.Component.Constraint.Projective"/>
    <RequiredPlugin pluginName="Sofa.Component.Engine.Select"/>
    <RequiredPlugin pluginName="Sofa.Component.LinearSolver.Iterative"/>
    <RequiredPlugin pluginName="Sofa.Component.Mass"/>
    <RequiredPlugin pluginName="Sofa.Component.ODESolver.Backward"/>
    <RequiredPlugin pluginName="Sofa.Component.SolidMechanics.FEM.Elastic"/>
    <RequiredPlugin pluginName="Sofa.Component.Topology.Container.Dynamic"/>
    <RequiredPlugin pluginName="Sofa.Component.Topology.Container.Grid"/>
    <RequiredPlugin pluginName="Sofa.Component.Visual"/>
    <RequiredPlugin pluginName="SofaCUDA"/>

    <VisualStyle displayFlags="showBehaviorModels showForceFields" />
    <DefaultAnimationLoop />
    <DefaultVisualManagerLoop />

    <Node name="Tetrahedron">
        <Node name="Beam">
            <RegularGridTopology name="grid" n="40 10 10" min="0 6 -2" max="16 10 2" />
            <TetrahedronSetTopologyContainer name="BeamTopo" />
            <TetrahedronSetTopologyModifier name="Modifier" />

            <Hexa2TetraTopologicalMapping input="@grid" output="@BeamTopo" />
        </Node>


        <Node name="Simulated">
            <EulerImplicitSolver name="cg_odesolver" rayleighStiffness="0.1" rayleighMass="0.1" />
            <CGLinearSolver iterations="20" name="linear solver" tolerance="1.0e-12" threshold="1.0e-12" />

            <MechanicalObject position="@../Beam/grid.position" name="Volume" template="CudaVec3f"/>

            <TetrahedronSetTopologyContainer name="Container" src="@../Beam/BeamTopo"/>
            <TetrahedronSetTopologyModifier name="Modifier" />
            <TetrahedronSetGeometryAlgorithms name="GeomAlgo" template="CudaVec3f" />

            <DiagonalMass totalMass="50.0" />
            <BoxROI name="ROI1" box="-0.1 5 -3 0.1 11 3" drawBoxes="1" />

            <FixedProjectiveConstraint indices="@ROI1.indices" />
            <TetrahedronCorotationalFEMForceField name="FEM" template="CudaVec3f"
                                              youngModulus="2000" poissonRatio="0.3" />
        </Node>
    </Node>

</Node>
