<?xml version="1.0" ?>
<Node name="root" gravity="0 -9 0" dt="0.02">
    <RequiredPlugin pluginName="Sofa.Component.Constraint.Projective"/> <!-- Needed to use components [FixedProjectiveConstraint] -->
    <RequiredPlugin pluginName="Sofa.Component.Engine.Select"/> <!-- Needed to use components [BoxROI] -->
    <RequiredPlugin pluginName="Sofa.Component.LinearSolver.Iterative"/> <!-- Needed to use components [CGLinearSolver] -->
    <RequiredPlugin pluginName="Sofa.Component.Mapping.Linear"/> <!-- Needed to use components [IdentityMapping] -->
    <RequiredPlugin pluginName="Sofa.Component.Mass"/> <!-- Needed to use components [DiagonalMass] -->
    <RequiredPlugin pluginName="Sofa.Component.IntegrationScheme.Backward"/> <!-- Needed to use components [EulerImplicitIntegrationScheme] -->
    <RequiredPlugin pluginName="Sofa.Component.SolidMechanics.FEM.Elastic"/> <!-- Needed to use components [TetrahedronCorotationalFEMForceField] -->
    <RequiredPlugin pluginName="Sofa.Component.StateContainer"/> <!-- Needed to use components [MechanicalObject] -->
    <RequiredPlugin pluginName="Sofa.Component.Topology.Container.Dynamic"/> <!-- Needed to use components [HexahedronSetTopologyContainer,HexahedronSetTopologyModifier,QuadSetTopologyContainer,QuadSetTopologyModifier] -->
    <RequiredPlugin pluginName="Sofa.Component.Topology.Container.Grid"/> <!-- Needed to use components [RegularGridTopology] -->
    <RequiredPlugin pluginName="Sofa.Component.Topology.Mapping"/> <!-- Needed to use components [Hexa2QuadTopologicalMapping] -->
    <RequiredPlugin pluginName="Sofa.Component.Visual"/> <!-- Needed to use components [VisualStyle] -->
    <RequiredPlugin pluginName="Sofa.GL.Component.Rendering3D"/> <!-- Needed to use components [OglModel] -->
    <RequiredPlugin pluginName="SofaCUDA"/> <!-- Needed to use components [OglModel] -->

    <VisualStyle displayFlags="showBehaviorModels showVisual" />

    <DefaultAnimationLoop />
    <DefaultVisualManagerLoop />

    <Node name="TetrahedronCorotationalFEMForceField-GPU-Green">
        <Node name="Beam">
            <RegularGridTopology name="grid" n="40 10 10" min="0 6 -2" max="16 10 2" />
            <TetrahedronSetTopologyContainer name="BeamTopo" />
            <TetrahedronSetTopologyModifier name="Modifier" />

            <Hexa2TetraTopologicalMapping input="@grid" output="@BeamTopo" />
        </Node>

        <Node name="Simulated">
            <EulerImplicitIntegrationScheme name="cg_odesolver" rayleighStiffness="0.1" rayleighMass="0.1" />
            <CGLinearSolver iterations="20" name="linear solver" tolerance="1.0e-12" threshold="1.0e-12" />

            <MechanicalObject position="@../Beam/grid.position" name="Volume" template="CudaVec3f"/>

            <TetrahedronSetTopologyContainer name="Container" src="@../Beam/BeamTopo"/>

            <DiagonalMass totalMass="50.0" />
            <BoxROI name="ROI1" box="-0.1 5 -3 0.1 11 3" drawBoxes="1" />

            <FixedProjectiveConstraint indices="@ROI1.indices" />
            <TetrahedronCorotationalFEMForceField name="FEM" template="CudaVec3f" youngModulus="2000" poissonRatio="0.3" />
            <Node name="surface">
                <TriangleSetTopologyContainer name="Container" />
                <TriangleSetTopologyModifier name="Modifier" />
                <TriangleSetGeometryAlgorithms template="CudaVec3f" name="GeomAlgo" />

                <Tetra2TriangleTopologicalMapping input="@../Container" output="@Container" />
                <Node name="Visu">
                    <OglModel name="Visual" color="green" />
                    <IdentityMapping input="@../../Volume" output="@Visual" />
                </Node>
            </Node>
        </Node>
    </Node>


    <Node name="TetrahedronCorotationalFEMForceField-CPU-red">
        <Node name="Beam">
            <RegularGridTopology name="grid" n="40 10 10" min="0 6 -2" max="16 10 2" />
            <TetrahedronSetTopologyContainer name="BeamTopo" />
            <TetrahedronSetTopologyModifier name="Modifier" />

            <Hexa2TetraTopologicalMapping input="@grid" output="@BeamTopo" />
        </Node>

        <Node name="Simulated">
            <EulerImplicitIntegrationScheme name="cg_odesolver" rayleighStiffness="0.1" rayleighMass="0.1" />
            <CGLinearSolver iterations="20" name="linear solver" tolerance="1.0e-12" threshold="1.0e-12" />

            <MechanicalObject position="@../Beam/grid.position" name="Volume" template="Vec3d"/>

            <TetrahedronSetTopologyContainer name="Container" src="@../Beam/BeamTopo"/>

            <DiagonalMass totalMass="50.0" />
            <BoxROI name="ROI1" box="-0.1 5 -3 0.1 11 3" drawBoxes="1" />

            <FixedProjectiveConstraint indices="@ROI1.indices" />
            <TetrahedronCorotationalFEMForceField name="FEM" youngModulus="2000" poissonRatio="0.3" />
            <Node name="surface">
                <TriangleSetTopologyContainer name="Container" />
                <TriangleSetTopologyModifier name="Modifier" />
                <TriangleSetGeometryAlgorithms template="Vec3d" name="GeomAlgo" />

                <Tetra2TriangleTopologicalMapping input="@../Container" output="@Container" />
                <Node name="Visu">
                    <OglModel name="Visual" color="red" />
                    <IdentityMapping input="@../../Volume" output="@Visual" />
                </Node>
            </Node>
        </Node>
    </Node>
</Node>
