<?xml version="1.0" ?>
<Node name="root" gravity="0 -9 0" dt="0.001">
    <RequiredPlugin pluginName="Sofa.Component.Collision.Detection.Algorithm"/> <!-- Needed to use components [BVHNarrowPhase BruteForceBroadPhase CollisionPipeline] -->
    <RequiredPlugin pluginName="Sofa.Component.Collision.Detection.Intersection"/> <!-- Needed to use components [DiscreteIntersection] -->
    <RequiredPlugin pluginName="Sofa.Component.Collision.Response.Contact"/> <!-- Needed to use components [CollisionResponse] -->
    <RequiredPlugin pluginName="Sofa.Component.IntegrationSchemes.Forward"/> <!-- Needed to use components [CentralDifferenceIntegrationScheme] -->
    <RequiredPlugin pluginName="Sofa.Component.Topology.Container.Dynamic"/> <!-- Needed to use components [TetrahedronSetTopologyContainer TetrahedronSetTopologyModifier TriangleSetTopologyContainer TriangleSetTopologyModifier] -->
    <RequiredPlugin pluginName="Sofa.Component.Topology.Container.Grid"/> <!-- Needed to use components [RegularGridTopology] -->
    <RequiredPlugin pluginName="Sofa.Component.Topology.Mapping"/> <!-- Needed to use components [Hexa2TetraTopologicalMapping Tetra2TriangleTopologicalMapping] -->
    <RequiredPlugin pluginName="Sofa.Component.Visual"/> <!-- Needed to use components [VisualStyle] -->
    <RequiredPlugin pluginName="Sofa.GL.Component.Rendering3D"/> <!-- Needed to use components [OglModel] -->
    <RequiredPlugin pluginName="SofaCUDA"/> <!-- Needed to use components [BoxROI CudaTetrahedronTLEDForceField DiagonalMass FixedProjectiveConstraint IdentityMapping MechanicalObject TetrahedronSetGeometryAlgorithms TriangleSetGeometryAlgorithms] -->

    <VisualStyle displayFlags="showBehaviorModels showVisual" />

    <DefaultAnimationLoop />
    <DefaultVisualManagerLoop />
    <CollisionPipeline name="CollisionPipeline" verbose="0" />
    <BruteForceBroadPhase/>
    <BVHNarrowPhase/>
    <CollisionResponse name="collision response" response="PenalityContactForceField" />
    <DiscreteIntersection/>

    <Node name="Beam">
        <RegularGridTopology name="grid" n="40 10 10" min="0 6 -2" max="16 10 2" />=
    </Node>

    <Node name="TetrahedronFEMForceField-GPU-Green">
        <CentralDifferenceIntegrationScheme rayleighMass="5"/>

        <MechanicalObject position="@../Beam/grid.position" name="Volume" template="CudaVec3f"/>

        <HexahedronSetTopologyContainer name="Container" src="@../Beam/grid"/>
        <HexahedronSetTopologyModifier name="Modifier" />
        <HexahedronSetGeometryAlgorithms name="GeomAlgo" template="CudaVec3f" />

        <DiagonalMass totalMass="50.0" />
        <BoxROI name="ROI1" box="-0.1 5 -3 0.1 11 3" drawBoxes="1" />

        <FixedProjectiveConstraint indices="@ROI1.indices" />
        <CudaHexahedronTLEDForceField name="FEM" computeGlobalMatrix="false" method="large" poissonRatio="0.3" youngModulus="2000" />

        <Node name="tetra">
            <TetrahedronSetTopologyContainer name="tetra" />
            <TetrahedronSetTopologyModifier name="Modifier" />

            <Hexa2TetraTopologicalMapping input="@../Container" output="@tetra" />

            <Node name="surface">
                <TriangleSetTopologyContainer name="Container" />
                <TriangleSetTopologyModifier name="Modifier" />
                <TriangleSetGeometryAlgorithms template="CudaVec3f" name="GeomAlgo" />

                <Tetra2TriangleTopologicalMapping input="@../tetra" output="@Container" />
                <Node name="Visu">
                    <OglModel name="Visual" color="green" />
                    <IdentityMapping input="@../../../Volume" output="@Visual" />
                </Node>
            </Node>
        </Node>

    </Node>
</Node>
