<?xml version="1.0" ?>
<Node name="root" gravity="0 -9 0" dt="0.01">
    <RequiredPlugin pluginName="Sofa.Component.Collision.Detection.Algorithm"/> <!-- Needed to use components [BVHNarrowPhase BruteForceBroadPhase CollisionPipeline] -->
    <RequiredPlugin pluginName="Sofa.Component.Collision.Detection.Intersection"/> <!-- Needed to use components [DiscreteIntersection] -->
    <RequiredPlugin pluginName="Sofa.Component.Collision.Response.Contact"/> <!-- Needed to use components [CollisionResponse] -->
    <RequiredPlugin pluginName="Sofa.Component.LinearSolver.Iterative"/> <!-- Needed to use components [CGLinearSolver] -->
    <RequiredPlugin pluginName="Sofa.Component.IntegrationSchemes.Backward"/> <!-- Needed to use components [EulerImplicitIntegrationScheme] -->
    <RequiredPlugin pluginName="Sofa.Component.Topology.Container.Dynamic"/> <!-- Needed to use components [TetrahedronSetTopologyContainer TetrahedronSetTopologyModifier TriangleSetTopologyContainer TriangleSetTopologyModifier] -->
    <RequiredPlugin pluginName="Sofa.Component.Topology.Container.Grid"/> <!-- Needed to use components [RegularGridTopology] -->
    <RequiredPlugin pluginName="Sofa.Component.Topology.Mapping"/> <!-- Needed to use components [Hexa2TetraTopologicalMapping Tetra2TriangleTopologicalMapping] -->
    <RequiredPlugin pluginName="Sofa.Component.Visual"/> <!-- Needed to use components [VisualStyle] -->
    <RequiredPlugin pluginName="Sofa.GL.Component.Rendering3D"/> <!-- Needed to use components [OglModel] -->
    <RequiredPlugin pluginName="SofaCUDA"/> <!-- Needed to use components [BoxROI DiagonalMass FixedProjectiveConstraint IdentityMapping MechanicalObject TetrahedronFEMForceField TetrahedronSetGeometryAlgorithms TriangleSetGeometryAlgorithms] -->

    <VisualStyle displayFlags="showBehaviorModels showVisual" />

    <DefaultAnimationLoop />
    <DefaultVisualManagerLoop />
    <CollisionPipeline name="CollisionPipeline" verbose="0" />
    <BruteForceBroadPhase/>
    <BVHNarrowPhase/>
    <CollisionResponse name="collision response" response="PenalityContactForceField" />
    <DiscreteIntersection/>

    <Node name="Beam">
        <RegularGridTopology name="grid" n="40 10 10" min="0 6 -2" max="16 10 2" />
        <TetrahedronSetTopologyContainer name="BeamTopo" />
        <TetrahedronSetTopologyModifier name="Modifier" />

        <Hexa2TetraTopologicalMapping input="@grid" output="@BeamTopo" />
    </Node>


    <Node name="TetrahedronFEMForceField-GPU-Green">
        <EulerImplicitIntegrationScheme name="cg_odesolver" rayleighStiffness="0.1" rayleighMass="0.1" />
        <CGLinearSolver iterations="20" name="linear solver" tolerance="1.0e-6" threshold="1.0e-6" />

        <MechanicalObject position="@../Beam/grid.position" name="Volume" template="CudaVec3f"/>

        <TetrahedronSetTopologyContainer name="Container" src="@../Beam/BeamTopo"/>
        <TetrahedronSetTopologyModifier name="Modifier" />
        <TetrahedronSetGeometryAlgorithms name="GeomAlgo" template="CudaVec3f" />

        <DiagonalMass totalMass="50.0" />
        <BoxROI name="ROI1" box="-0.1 5 -3 0.1 11 3" drawBoxes="1" />

        <FixedProjectiveConstraint indices="@ROI1.indices" />
        <TetrahedronFEMForceField template="CudaVec3f" name="FEM" computeGlobalMatrix="false" method="large" poissonRatio="0.3" youngModulus="2000" />

        <Node name="surface">
            <TriangleSetTopologyContainer name="Container" />
            <TriangleSetTopologyModifier name="Modifier" />
            <TriangleSetGeometryAlgorithms template="CudaVec3f" name="GeomAlgo" />

            <Tetra2TriangleTopologicalMapping input="@../Container" output="@Container" />
            <Node name="Visu">
                <OglModel name="Visual" color="green" />
                <IdentityMapping input="@../../Volume" output="@Visual" />
            </Node>
        </Node>
    </Node>
</Node>
