<?xml version="1.0"?>
<Node name="root" dt="0.002" gravity="0 -9 0">
    <RequiredPlugin name="SofaGeneralExplicitOdeSolver"/> <!-- Needed to use components [RungeKutta4Solver] -->
    <RequiredPlugin name="SofaOpenglVisual"/> <!-- Needed to use components [OglModel] -->
    <RequiredPlugin name="SofaCUDA"/> <!-- Needed to use components [BoxROI, FixedConstraint, IdentityMapping, MechanicalObject, MeshSpringForceField, UniformMass] -->
    <RequiredPlugin name="SofaTopologyMapping"/> <!-- Needed to use components [Hexa2TetraTopologicalMapping] -->
    <RequiredPlugin name="SofaBoundaryCondition"/> <!-- Needed to use components [FixedConstraint] -->
    <RequiredPlugin name="SofaDeformable"/> <!-- Needed to use components [MeshSpringForceField] -->
    <RequiredPlugin name="SofaEngine"/> <!-- Needed to use components [BoxROI] -->

    <VisualStyle displayFlags="showBehaviorModels" />

    <DefaultAnimationLoop/>
	<DefaultVisualManagerLoop/>
	<DefaultPipeline depth="6" verbose="0" draw="0"/>
	<BruteForceBroadPhase/>
    <BVHNarrowPhase/>
	<MinProximityIntersection name="Proximity" alarmDistance="0.5" contactDistance="0.3" />
	<DefaultContactManager name="Response" response="PenalityContactForceField" />

    <Node name="Beam">
        <RegularGridTopology name="grid" n="40 10 10" min="0 6 -2" max="16 10 2" />
        <TetrahedronSetTopologyContainer name="BeamTopo" />
        <TetrahedronSetTopologyModifier name="Modifier" />

        <Hexa2TetraTopologicalMapping input="@grid" output="@BeamTopo" />
    </Node>

    <Node name="MeshSpringForceField-GPU-Green">
        <RungeKutta4Solver />

        <MechanicalObject position="@../Beam/grid.position" name="Volume" template="CudaVec3f"/>
        <TetrahedronSetTopologyContainer name="Container" src="@../Beam/BeamTopo"/>
        <TetrahedronSetTopologyModifier name="Modifier" />

        <BoxROI name="ROI1" box="-0.1 5 -3 0.1 11 3" drawBoxes="1" />
        <FixedConstraint indices="@ROI1.indices" />

        <UniformMass totalMass="100" />
        <MeshSpringForceField name="Springs" tetrasStiffness="1200" tetrasDamping="0" template="CudaVec3f"/>

        <Node name="MeshVisu">
			<OglModel name="Visual" topology="@../Container" position="@../Volume.position" color="green"/>
			<IdentityMapping input="@../Volume" output="@Visual" />
		</Node>
    </Node>

    <Node name="MeshSpringForceField-CPU-Red">
        <RungeKutta4Solver />

        <MechanicalObject position="@../Beam/grid.position" name="Volume" template="Vec3"/>
        <TetrahedronSetTopologyContainer name="Container" src="@../Beam/BeamTopo"/>
        <TetrahedronSetTopologyModifier name="Modifier" />

        <BoxROI name="ROI1" box="-0.1 5 -3 0.1 11 3" drawBoxes="1" />
        <FixedConstraint indices="@ROI1.indices" />

        <UniformMass totalMass="100" />

        <MeshSpringForceField name="Springs" tetrasStiffness="1200" tetrasDamping="0" template="Vec3"/>

        <Node name="MeshVisu">
			<OglModel name="Visual" topology="@../Container" position="@../Volume.position" color="red"/>
			<IdentityMapping input="@../Volume" output="@Visual" />
		</Node>
    </Node>
</Node>
