<?xml version="1.0" ?>
<Node name="root" gravity="0 -9 0" dt="0.01">
    <RequiredPlugin name="SofaBoundaryCondition"/> <!-- Needed to use components [FixedConstraint] -->
    <RequiredPlugin name="SofaCUDA"/> <!-- Needed to use components [BoxROI, DiagonalMass, FixedConstraint, IdentityMapping, MechanicalObject, TetrahedronFEMForceField, TetrahedronSetGeometryAlgorithms, TriangleSetGeometryAlgorithms] -->
    <RequiredPlugin name="SofaEngine"/> <!-- Needed to use components [BoxROI] -->
    <RequiredPlugin name="SofaImplicitOdeSolver"/> <!-- Needed to use components [EulerImplicitSolver] -->
    <RequiredPlugin name="SofaOpenglVisual"/> <!-- Needed to use components [OglModel] -->
    <RequiredPlugin name="SofaSimpleFem"/> <!-- Needed to use components [TetrahedronFEMForceField] -->
    <RequiredPlugin name="SofaTopologyMapping"/> <!-- Needed to use components [Hexa2TetraTopologicalMapping, Tetra2TriangleTopologicalMapping] -->
    <VisualStyle displayFlags="showBehaviorModels showVisual" />

    <DefaultAnimationLoop />
    <DefaultVisualManagerLoop />
    <DefaultPipeline verbose="0" />
    <BruteForceBroadPhase/>
    <BVHNarrowPhase/>
    <DefaultContactManager response="default" />
    <DiscreteIntersection/>

    <Node name="Beam">
        <RegularGridTopology name="grid" n="40 10 10" min="0 6 -2" max="16 10 2" />
        <TetrahedronSetTopologyContainer name="BeamTopo" />
        <TetrahedronSetTopologyModifier name="Modifier" />

        <Hexa2TetraTopologicalMapping input="@grid" output="@BeamTopo" />
    </Node>


    <Node name="TetrahedronFEMForceField-GPU-Green">
        <EulerImplicitSolver name="cg_odesolver" rayleighStiffness="0.1" rayleighMass="0.1" />
        <CGLinearSolver iterations="20" name="linear solver" tolerance="1.0e-6" threshold="1.0e-6" />

        <MechanicalObject position="@../Beam/grid.position" name="Volume" template="CudaVec3f"/>

        <TetrahedronSetTopologyContainer name="Container" src="@../Beam/BeamTopo"/>
        <TetrahedronSetTopologyModifier name="Modifier" />
        <TetrahedronSetGeometryAlgorithms name="GeomAlgo" template="CudaVec3f" />

        <DiagonalMass totalMass="50.0" />
        <BoxROI name="ROI1" box="-0.1 5 -3 0.1 11 3" drawBoxes="1" />

        <FixedConstraint indices="@ROI1.indices" />
        <TetrahedronFEMForceField template="CudaVec3f" name="FEM" computeGlobalMatrix="false" method="large" poissonRatio="0.3" youngModulus="2000" />

        <Node name="surface">
            <TriangleSetTopologyContainer name="Container" />
            <TriangleSetTopologyModifier name="Modifier" />
            <TriangleSetGeometryAlgorithms template="CudaVec3f" name="GeomAlgo" />

            <Tetra2TriangleTopologicalMapping input="@../Container" output="@Container" />
            <Node name="Visu">
                <OglModel name="Visual" color="green" />
                <IdentityMapping input="@../../Volume" output="@Visual" />
            </Node>
        </Node>
    </Node>


    <Node name="TetrahedronFEMForceField-CPU-red">
        <EulerImplicitSolver name="cg_odesolver" rayleighStiffness="0.1" rayleighMass="0.1" />
        <CGLinearSolver iterations="20" name="linear solver" tolerance="1.0e-6" threshold="1.0e-6" />

        <MechanicalObject position="@../Beam/grid.position" name="Volume" template="Vec3"/>

        <TetrahedronSetTopologyContainer name="Container" src="@../Beam/BeamTopo"/>
        <TetrahedronSetTopologyModifier name="Modifier" />
        <TetrahedronSetGeometryAlgorithms name="GeomAlgo" template="Vec3" />

        <DiagonalMass totalMass="50.0" />
        <BoxROI name="ROI1" box="-0.1 5 -3 0.1 11 3" drawBoxes="1" />

        <FixedConstraint indices="@ROI1.indices" />
        <TetrahedronFEMForceField template="Vec3" name="FEM" computeGlobalMatrix="false" method="large" poissonRatio="0.3" youngModulus="2000" />

        <Node name="surface">
            <TriangleSetTopologyContainer name="Container" />
            <TriangleSetTopologyModifier name="Modifier" />
            <TriangleSetGeometryAlgorithms template="Vec3" name="GeomAlgo" />

            <Tetra2TriangleTopologicalMapping input="@../Container" output="@Container" />
            <Node name="Visu">
                <OglModel name="Visual" color="red" />
                <IdentityMapping input="@../../Volume" output="@Visual" />
            </Node>
        </Node>
    </Node>
</Node>
