<?xml version="1.0" ?>
<Node name="root" dt="0.01" showBoundingTree="0" gravity="0 0 -0.9">
  <RequiredPlugin name="Carving" pluginName="SofaCarving" />

  <VisualStyle displayFlags="showCollisionModels" />

  <CollisionPipeline verbose="0" />
  <BruteForceDetection name="N2" />
  <CollisionResponse response="default" />
  <MinProximityIntersection name="Proximity" alarmDistance="0.5" contactDistance="0.001"/>
  <CollisionGroup />

  <CarvingManager active="true" carvingDistance="-0.008"/>

  <EulerImplicitSolver name="EulerImplicit"  rayleighStiffness="0.1" rayleighMass="0.1" />
  <CGLinearSolver name="CG Solver" iterations="25" tolerance="1e-9" threshold="1e-9"/>

  <Node name="Cylinder">
	<MeshGmshLoader filename="mesh/cylinder.msh" name="loader" />
    <MechanicalObject src="@loader" name="Volume" />
    <include href="Objects/TetrahedronSetTopology.xml" src="@loader" />
    <DiagonalMass massDensity="0.01" />
	<BoxROI name="ROI1" box="-1 -1 -1 1 1 0.01" drawBoxes="1" />
    <FixedConstraint indices="@ROI1.indices" />
    <TetrahedralCorotationalFEMForceField name="CFEM" youngModulus="80" poissonRatio="0.3" method="large" />
    <Node name="Surface">
      <include href="Objects/TriangleSetTopology.xml" />
      <Tetra2TriangleTopologicalMapping input="@../Container" output="@Container" />
      <TriangleSet name="triangleCol" tags="CarvingSurface"/>
	  <PointSet name="pointCol" tags="CarvingSurface"/>
      <Node name="Visu">
        <OglModel name="Visual" material="Default Diffuse 1 0 1 0 0.75 Ambient 0 1 1 1 1 Specular 1 1 1 0 1 Emissive 0 1 1 0 1 Shininess 1 100"/>
        <IdentityMapping input="@../../Volume" output="@Visual" />
      </Node>
    </Node>
  </Node>


  <Node name="carvingElement">
		<MechanicalObject name="Particles" template="Vec3d" position="0 0 1.4" velocity="0 0 0"/>
		<UniformMass name="Mass" totalmass="0.2" />
		<MeshSpringForceField name="Springs" stiffness="100" damping="1" />
		<SphereModel radius="0.02" tags="CarvingTool"/>
  </Node>


</Node>
