<?xml version="1.0"?>
<Node name="root" dt="0.01" showBoundingTree="0" gravity="0 -9.81 0">
    <RequiredPlugin pluginName="Sofa.Component.Collision.Detection.Algorithm"/> <!-- Needed to use components [BVHNarrowPhase BruteForceBroadPhase CollisionPipeline] -->
    <RequiredPlugin pluginName="Sofa.Component.Collision.Detection.Intersection"/> <!-- Needed to use components [MinProximityIntersection] -->
    <RequiredPlugin pluginName="Sofa.Component.Collision.Response.Contact"/> <!-- Needed to use components [CollisionResponse] -->
    <RequiredPlugin pluginName="Sofa.Component.IO.Mesh"/> <!-- Needed to use components [MeshGmshLoader] -->
    <RequiredPlugin pluginName="Sofa.Component.LinearSolver.Iterative"/> <!-- Needed to use components [CGLinearSolver] -->
    <RequiredPlugin pluginName="Sofa.Component.Mapping.Linear"/> <!-- Needed to use components [BarycentricMapping] -->
    <RequiredPlugin pluginName="Sofa.Component.Mass"/> <!-- Needed to use components [DiagonalMass] -->
    <RequiredPlugin pluginName="Sofa.Component.MechanicalLoad"/> <!-- Needed to use components [PlaneForceField] -->
    <RequiredPlugin pluginName="Sofa.Component.IntegrationSchemes.Backward"/> <!-- Needed to use components [EulerImplicitIntegrationScheme] -->
    <RequiredPlugin pluginName="Sofa.Component.SolidMechanics.FEM.Elastic"/> <!-- Needed to use components [TetrahedronFEMForceField] -->
    <RequiredPlugin pluginName="Sofa.Component.StateContainer"/> <!-- Needed to use components [MechanicalObject] -->
    <RequiredPlugin pluginName="Sofa.Component.Topology.Container.Dynamic"/> <!-- Needed to use components [TetrahedronSetGeometryAlgorithms TetrahedronSetTopologyContainer TetrahedronSetTopologyModifier] -->
    <RequiredPlugin pluginName="Sofa.Component.Visual"/> <!-- Needed to use components [VisualStyle] -->
    <RequiredPlugin pluginName="Sofa.GL.Component.Rendering3D"/> <!-- Needed to use components [OglModel] -->
    <RequiredPlugin pluginName="SofaDistanceGrid"/> <!-- Needed to use components [DistanceGridForceField] -->
    <RequiredPlugin pluginName="Sofa.Component.AnimationLoop"/> <!-- Needed to use components [FreeMotionAnimationLoop] -->
    <RequiredPlugin pluginName="Sofa.Component.Constraint.Lagrangian.Correction"/> <!-- Needed to use components [UncoupledConstraintCorrection] -->
    <RequiredPlugin pluginName="Sofa.Component.Constraint.Lagrangian.Solver"/> <!-- Needed to use components [LCPConstraintSolver] -->

    <VisualStyle displayFlags="showBehaviorModels showForceFields showCollisionModels" />

    <FreeMotionAnimationLoop/>
    <LCPConstraintSolver tolerance="1e-3" maxIt="1000"/>

    <CollisionPipeline verbose="0" />
    <BruteForceBroadPhase/>
    <BVHNarrowPhase/>
    <CollisionResponse response="PenalityContactForceField" />

    <MinProximityIntersection name="Proximity" alarmDistance="2" contactDistance="0.1" />

    <Node name="Simulation">

        <Node name="CubeObstacle">
            <MeshOBJLoader name="loader" filename="mesh/cube.obj"/>
            <OglModel name="cubeVisual" src="@loader" color="green"/>
        </Node>

        <Node name="liver">
            <EulerImplicitIntegrationScheme name="cg_odesolver" rayleighStiffness="0.1" rayleighMass="0.1" />
            <CGLinearSolver iterations="150" name="linear solver" tolerance="1.0e-9" threshold="1.0e-9" />

            <MeshGmshLoader name="loader" filename="mesh/liver.msh"/>

            <TetrahedronSetTopologyContainer  name="tetras" src="@loader"/>
            <TetrahedronSetTopologyModifier   name="Modifier" />
            <TetrahedronSetGeometryAlgorithms name="GeomAlgo"  template="Vec3d" />

            <MechanicalObject name="dofs"/>
            <DiagonalMass vertexMass="100"/>

            <TetrahedronFEMForceField youngModulus="1000000" poissonRatio="0.45"/>
            <DistanceGridForceField
                filename="mesh/cube.obj"
                stiffnessIn="100000000"
                stiffnessOut="0"
                draw="true"
                drawPoints="true"
                printLog="false"
                drawSize="2"
            />

            <Node name="visual">
                <MeshOBJLoader name="surf_loader" filename="mesh/liver.obj"/>
                <OglModel name="visu" src="@surf_loader"/>
                <BarycentricMapping input="@../dofs" output="@visu"/>
            </Node>

            <UncoupledConstraintCorrection defaultCompliance="0.1"/>
            <PlaneForceField stiffness="1000000" d="-1"/>
        </Node>

    </Node>
</Node>
