<?xml version="1.0"?>
<Node name="root" dt="0.005" gravity="0.0 -9.81 0">
    <RequiredPlugin pluginName="Sofa.Component.Collision.Detection.Algorithm"/> <!-- Needed to use components [BVHNarrowPhase BruteForceBroadPhase CollisionPipeline] -->
    <RequiredPlugin pluginName="Sofa.Component.Collision.Detection.Intersection"/> <!-- Needed to use components [DiscreteIntersection] -->
    <RequiredPlugin pluginName="Sofa.Component.Collision.Geometry"/> <!-- Needed to use components [PointCollisionModel TriangleCollisionModel] -->
    <RequiredPlugin pluginName="Sofa.Component.Collision.Response.Contact"/> <!-- Needed to use components [CollisionResponse] -->
    <RequiredPlugin pluginName="Sofa.Component.Constraint.Projective"/> <!-- Needed to use components [FixedProjectiveConstraint] -->
    <RequiredPlugin pluginName="Sofa.Component.Engine.Select"/> <!-- Needed to use components [BoxROI] -->
    <RequiredPlugin pluginName="Sofa.Component.IO.Mesh"/> <!-- Needed to use components [MeshOBJLoader] -->
    <RequiredPlugin pluginName="Sofa.Component.LinearSolver.Iterative"/> <!-- Needed to use components [CGLinearSolver] -->
    <RequiredPlugin pluginName="Sofa.Component.Mapping.Linear"/> <!-- Needed to use components [BarycentricMapping IdentityMapping] -->
    <RequiredPlugin pluginName="Sofa.Component.Mass"/> <!-- Needed to use components [UniformMass] -->
    <RequiredPlugin pluginName="Sofa.Component.IntegrationSchemes.Backward"/> <!-- Needed to use components [EulerImplicitIntegrationScheme] -->
    <RequiredPlugin pluginName="Sofa.Component.SolidMechanics.FEM.Elastic"/> <!-- Needed to use components [HexahedronFEMForceField TriangularFEMForceField] -->
    <RequiredPlugin pluginName="Sofa.Component.SolidMechanics.Spring"/> <!-- Needed to use components [TriangularBendingSprings] -->
    <RequiredPlugin pluginName="Sofa.Component.StateContainer"/> <!-- Needed to use components [MechanicalObject] -->
    <RequiredPlugin pluginName="Sofa.Component.Topology.Container.Dynamic"/> <!-- Needed to use components [TriangleSetGeometryAlgorithms TriangleSetTopologyContainer TriangleSetTopologyModifier] -->
    <RequiredPlugin pluginName="Sofa.Component.Topology.Container.Grid"/> <!-- Needed to use components [RegularGridTopology SparseGridTopology] -->
    <RequiredPlugin pluginName="Sofa.Component.Topology.Mapping"/> <!-- Needed to use components [Quad2TriangleTopologicalMapping] -->
    <RequiredPlugin pluginName="Sofa.Component.Visual"/> <!-- Needed to use components [VisualStyle] -->
    <RequiredPlugin pluginName="Sofa.GL.Component.Rendering3D"/> <!-- Needed to use components [OglModel] -->
    <RequiredPlugin pluginName="SofaDistanceGrid"/> <!-- Needed to use components [FFDDistanceGridCollisionModel] -->
    <RequiredPlugin pluginName="Sofa.Component.AnimationLoop"/> <!-- Needed to use components [FreeMotionAnimationLoop] -->
    <RequiredPlugin pluginName="Sofa.Component.Constraint.Lagrangian.Correction"/> <!-- Needed to use components [UncoupledConstraintCorrection] -->
    <RequiredPlugin pluginName="Sofa.Component.Constraint.Lagrangian.Solver"/> <!-- Needed to use components [LCPConstraintSolver] -->

    <FreeMotionAnimationLoop/>
    <LCPConstraintSolver tolerance="1e-3" maxIt="1000"/>

    <CollisionPipeline name="pipeline" depth="6" verbose="0"/>
    <BruteForceBroadPhase/>
    <BVHNarrowPhase/>
    <CollisionResponse name="response" response="FrictionContactConstraint" />
    <LocalMinDistance name="proximity" alarmDistance="0.3" contactDistance="0.1"/>

    <EulerImplicitIntegrationScheme name="cg_odesolver" printLog="false"  rayleighStiffness="0.1" rayleighMass="0.1" />
    <CGLinearSolver iterations="25" name="linear solver" tolerance="1.0e-9" threshold="1.0e-9" />

    <Node name="DeformableLiver">

        <VisualStyle displayFlags="showForceFields" />

        <MechanicalObject />
        <UniformMass totalMass="1000.0" />
        <SparseGridTopology name="grid" n="8 6 6" filename="mesh/liver-smooth.obj" />
        <BoxROI name="box1" box="-2.5 0 -2.5 7.5 3 2" />
        <FixedProjectiveConstraint indices="@box1.indices"/>
        <HexahedronFEMForceField poissonRatio="0" youngModulus="7000"/>
        <FFDDistanceGridCollisionModel
            filename="mesh/liver-smooth.obj"
            scale="1.0"
            usePoints="0"
            contactDistance="0.1"
            contactFriction="0.0"
            topology="@grid"
        />
        <Node name="Visu">
            <MeshOBJLoader name="meshLoader_0" filename="mesh/liver-smooth.obj" translation="0 0 0" handleSeams="1" />
            <OglModel name="Visual" src="@meshLoader_0" color="red" />
            <BarycentricMapping input="@.." output="@Visual" />
        </Node>
        <UncoupledConstraintCorrection defaultCompliance="0.001"/>
    </Node>


    <Node name="Cloth">

        <VisualStyle displayFlags="hideForceFields" />

        <RegularGridTopology nx="50" ny="1" nz="50" xmin="-6" xmax="2" ymin="6" ymax="6" zmin="-4" zmax="4" name="Container" />
        <MechanicalObject name="dofs" />
        <UniformMass totalMass="600" />
        <Node name="T">
            <include href="Objects/TriangleSetTopology.xml" />
            <Quad2TriangleTopologicalMapping input="@../Container" output="@Container" />
            <TriangularFEMForceField name="FEM" youngModulus="60" poissonRatio="0.3" method="large" />
            <TriangularBendingSprings name="FEM-Bend" stiffness="600" damping="1.0" />
            <TriangleCollisionModel />
            <PointCollisionModel />
            <Node name="Visu">
                <OglModel
                    name="Visual"
                    material="mat1
                        Diffuse 1 0.5 1.0 0.75 0.8
                        Ambient 1 0.2 0.2 0.2 1
                        Specular 1 0.6 0.6 0.6 0.6
                        Emissive 0 0 0 0 0
                        Shininess 0 45
                    "
                />
                <IdentityMapping input="@../../dofs" output="@Visual" />
            </Node>
        </Node>
        <UncoupledConstraintCorrection defaultCompliance="0.1"/>
    </Node>

</Node>
