<?xml version="1.0"?>
<Node name="root" dt="0.005" gravity="0.0 -9.81 0">
    <RequiredPlugin pluginName="Sofa.Component.Collision.Detection.Algorithm"/> <!-- Needed to use components [BVHNarrowPhase BruteForceBroadPhase CollisionPipeline] -->
    <RequiredPlugin pluginName="Sofa.Component.Collision.Detection.Intersection"/> <!-- Needed to use components [DiscreteIntersection] -->
    <RequiredPlugin pluginName="Sofa.Component.Collision.Geometry"/> <!-- Needed to use components [PointCollisionModel TriangleCollisionModel] -->
    <RequiredPlugin pluginName="Sofa.Component.Collision.Response.Contact"/> <!-- Needed to use components [CollisionResponse] -->
    <RequiredPlugin pluginName="Sofa.Component.IO.Mesh"/> <!-- Needed to use components [MeshOBJLoader] -->
    <RequiredPlugin pluginName="Sofa.Component.LinearSolver.Iterative"/> <!-- Needed to use components [CGLinearSolver] -->
    <RequiredPlugin pluginName="Sofa.Component.Mapping.Linear"/> <!-- Needed to use components [IdentityMapping] -->
    <RequiredPlugin pluginName="Sofa.Component.Mass"/> <!-- Needed to use components [UniformMass] -->
    <RequiredPlugin pluginName="Sofa.Component.IntegrationScheme.Backward"/> <!-- Needed to use components [EulerImplicitIntegrationScheme] -->
    <RequiredPlugin pluginName="Sofa.Component.SolidMechanics.FEM.Elastic"/> <!-- Needed to use components [TriangularFEMForceField] -->
    <RequiredPlugin pluginName="Sofa.Component.SolidMechanics.Spring"/> <!-- Needed to use components [TriangularBendingSprings] -->
    <RequiredPlugin pluginName="Sofa.Component.StateContainer"/> <!-- Needed to use components [MechanicalObject] -->
    <RequiredPlugin pluginName="Sofa.Component.Topology.Container.Dynamic"/> <!-- Needed to use components [TriangleSetGeometryAlgorithms TriangleSetTopologyContainer TriangleSetTopologyModifier] -->
    <RequiredPlugin pluginName="Sofa.Component.Topology.Container.Grid"/> <!-- Needed to use components [RegularGridTopology] -->
    <RequiredPlugin pluginName="Sofa.Component.Topology.Mapping"/> <!-- Needed to use components [Quad2TriangleTopologicalMapping] -->
    <RequiredPlugin pluginName="Sofa.GL.Component.Rendering3D"/> <!-- Needed to use components [OglModel] -->
    <RequiredPlugin pluginName="SofaDistanceGrid"/> <!-- Needed to use components [RigidDistanceGridCollisionModel] -->
    <RequiredPlugin pluginName="Sofa.Component.AnimationLoop"/> <!-- Needed to use components [FreeMotionAnimationLoop] -->
    <RequiredPlugin pluginName="Sofa.Component.Constraint.Lagrangian.Correction"/> <!-- Needed to use components [UncoupledConstraintCorrection] -->
    <RequiredPlugin pluginName="Sofa.Component.Constraint.Lagrangian.Solver"/> <!-- Needed to use components [LCPConstraintSolver] -->

    <FreeMotionAnimationLoop/>
    <LCPConstraintSolver tolerance="1e-3" maxIt="1000"/>

    <CollisionPipeline name="pipeline" depth="6" verbose="0" />
    <BruteForceBroadPhase/>
    <BVHNarrowPhase/>
    <CollisionResponse name="response" response="FrictionContactConstraint" />

    <LocalMinDistance name="proximity" alarmDistance="0.3" contactDistance="0.1"/>

    <Node name="RigidLiver">
        <MeshOBJLoader name="meshLoader_0" filename="mesh/liver-smooth.obj"/>
        <!-- The state should be defined using a Rigid template for this collision model -->
        <MechanicalObject template="Rigid3d" name="dofs" position="0 0 0    0 0 0 1"/>
        <RigidDistanceGridCollisionModel
            filename="mesh/liver-smooth.obj"
            scale="1.0"
            usePoints="0"
            contactDistance="0.1"
        />
        <Node name="Visu">
            <OglModel name="VisualModel" src="@../meshLoader_0" color="white" />
        </Node>
    </Node>

    <Node name="Cloth">
        <EulerImplicitIntegrationScheme name="cg_odesolver" rayleighStiffness="0.1" rayleighMass="0.1" />
        <CGLinearSolver iterations="25" name="linear solver" tolerance="1.0e-12" threshold="1.0e-12"/>

        <RegularGridTopology
            name="Container"
            nx="50" ny="1" nz="50"
            xmin="-9" xmax="5" ymin="7" ymax="7" zmin="-7" zmax="7"
        />
        <MechanicalObject name="dofs"/>
        <UniformMass totalMass="500" />
        <UncoupledConstraintCorrection defaultCompliance="0.1"/>
        <Node name="T">
            <include href="Objects/TriangleSetTopology.xml" />
            <Quad2TriangleTopologicalMapping input="@../Container" output="@Container" />
            <TriangularFEMForceField name="FEM" youngModulus="60" poissonRatio="0.3" method="large" />
            <TriangularBendingSprings name="FEM-Bend" stiffness="600" damping="1.0" />
            <TriangleCollisionModel/>
            <PointCollisionModel/>
            <Node name="Visu">
                <OglModel
                    name="Visual"
                    material="mat1
                        Diffuse 1 0.5 1.0 0.75 0.8
                        Ambient 1 0.2 0.2 0.2 1
                        Specular 1 0.6 0.6 0.6 0.6
                        Emissive 0 0 0 0 0
                        Shininess 0 45
                    "
                />
                <IdentityMapping input="@../../dofs" output="@Visual" />
            </Node>
        </Node>
    </Node>
</Node>
