<Node   name="Root" gravity="0 -10 0" time="0" animate="0"  dt="0.01" >
    <RequiredPlugin pluginName="Sofa.Component.AnimationLoop"/> <!-- Needed to use components [FreeMotionAnimationLoop] -->
    <RequiredPlugin pluginName="Sofa.Component.Constraint.Lagrangian.Correction"/> <!-- Needed to use components [GenericConstraintCorrection] -->
    <RequiredPlugin pluginName="Sofa.Component.Constraint.Lagrangian.Model"/> <!-- Needed to use components [UniformLagrangianConstraint] -->
    <RequiredPlugin pluginName="Sofa.Component.Constraint.Lagrangian.Solver"/> <!-- Needed to use components [GenericConstraintSolver] -->
    <RequiredPlugin pluginName="Sofa.Component.Constraint.Projective"/> <!-- Needed to use components [FixedProjectiveConstraint] -->
    <RequiredPlugin pluginName="Sofa.Component.Engine.Transform"/> <!-- Needed to use components [TransformEngine] -->
    <RequiredPlugin pluginName="Sofa.Component.IO.Mesh"/> <!-- Needed to use components [StringMeshCreator] -->
    <RequiredPlugin pluginName="Sofa.Component.LinearSolver.Direct"/> <!-- Needed to use components [EigenSimplicialLLT] -->
    <RequiredPlugin pluginName="Sofa.Component.Mapping.NonLinear"/> <!-- Needed to use components [DistanceMapping] -->
    <RequiredPlugin pluginName="Sofa.Component.Mass"/> <!-- Needed to use components [DiagonalMass] -->
    <RequiredPlugin pluginName="Sofa.Component.IntegrationSchemes.Backward"/> <!-- Needed to use components [EulerImplicitIntegrationScheme] -->
    <RequiredPlugin pluginName="Sofa.Component.StateContainer"/> <!-- Needed to use components [MechanicalObject] -->
    <RequiredPlugin pluginName="Sofa.Component.Topology.Container.Dynamic"/> <!-- Needed to use components [EdgeSetGeometryAlgorithms EdgeSetTopologyContainer] -->
    <RequiredPlugin pluginName="Sofa.Component.Visual"/> <!-- Needed to use components [VisualStyle] -->
    <RequiredPlugin pluginName="SofaMatrix.Qt"/> <!-- Needed to use components [ComplianceMatrixImage] -->

    <VisualStyle displayFlags="hideVisualModels showBehaviorModels showMappings showForceFields" />
    <FreeMotionAnimationLoop solveVelocityConstraintFirst="true" />
    <BlockGaussSeidelConstraintSolver tolerance="1e-9" maxIterations="1000"/>
    <ComplianceMatrixImage/>

    <StringMeshCreator name="loader" resolution="20" scale3d="1 1 1" />

    <TransformEngine name="translate" input_position="@loader.position" translation="0 0 0" />
    <EulerImplicitIntegrationScheme />
    <EigenSimplicialLLT />
    <GenericConstraintCorrection />

    <EdgeSetTopologyContainer position="@translate.output_position" edges="@loader.edges" />
    <MechanicalObject name="defoDOF" template="Vec3d" showObject="1" />
    <EdgeSetGeometryAlgorithms drawEdges="true" />
    <FixedProjectiveConstraint indices="0" />
    <DiagonalMass  name="mass" totalMass="1e-3"/>
    <Node name="extensionsNode" >
        <MechanicalObject template="Vec1d"  name="extensionsDOF" />
        <DistanceMapping  name="distanceMapping" />
        <UniformLagrangianConstraint template="Vec1d" iterative="false" />
    </Node>

</Node>
