<Node name="root" dt="0.02" gravity="0 -10 0">
    <RequiredPlugin name="SofaBoundaryCondition"/>
    <RequiredPlugin name="SofaImplicitOdeSolver"/>
    <RequiredPlugin name="SofaMiscCollision"/>
    <RequiredPlugin name="SofaSimpleFem"/>
    <RequiredPlugin name="SofaSparseSolver"/>
    <RequiredPlugin name="SofaMatrix"/>

    <VisualStyle displayFlags="showBehaviorModels showForceFields" />

    <Node name="M1">
        <EulerImplicitSolver name="odesolver" printLog="false"  rayleighStiffness="0.1" rayleighMass="0.1" />
        <SparseLDLSolver printLog="false" template="CompressedRowSparseMatrixMat3x3d"/>
        <GlobalSystemMatrixExporter exportEveryNumberOfSteps="1" filename="global_matrix_ldl" printLog="true" format="txt" precision="12"/>
        <MechanicalObject />
        <UniformMass vertexMass="1"/>
        <RegularGridTopology nx="4" ny="4" nz="10" xmin="-9" xmax="-6" ymin="0" ymax="3" zmin="0" zmax="9" />
        <FixedConstraint indices="0 1 2 3 4 5 6 7 8 9 10 11 12 13 14 15" />
        <HexahedronFEMForceField name="FEM" youngModulus="4000" poissonRatio="0.3" method="large" />
    </Node>

    <Node name="M2">
        <EulerImplicitSolver name="odesolver" printLog="false"  rayleighStiffness="0.1" rayleighMass="0.1" />
        <CGLinearSolver template="GraphScattered" iterations="25" tolerance="1e-5" threshold="1e-5"/>
        <!-- The following exporter will warn that the matrix cannot be exported because the matrix is not assembled -->
        <GlobalSystemMatrixExporter exportEveryNumberOfSteps="1" filename="global_matrix_cg" printLog="true"/>
        <MechanicalObject />
        <UniformMass vertexMass="1"/>
        <RegularGridTopology nx="4" ny="4" nz="10" xmin="-6" xmax="-3" ymin="0" ymax="3" zmin="0" zmax="9" />
        <FixedConstraint indices="0 1 2 3 4 5 6 7 8 9 10 11 12 13 14 15" />
        <HexahedronFEMForceField name="FEM" youngModulus="4000" poissonRatio="0.3" method="large" />
    </Node>

    <!-- Node containing 2 objects under a single linear solver -->
    <Node name="M3">
        <EulerImplicitSolver name="odesolver" printLog="false"  rayleighStiffness="0.1" rayleighMass="0.1" />
        <SparseLDLSolver printLog="false" template="CompressedRowSparseMatrixMat3x3d"/>
        <GlobalSystemMatrixExporter exportEveryNumberOfSteps="1" filename="global_matrix_ldl_2objects" printLog="true" format="jpg"/>

        <Node name="N1">
            <MechanicalObject />
            <UniformMass vertexMass="1"/>
            <RegularGridTopology nx="4" ny="4" nz="10" xmin="-3" xmax="0" ymin="0" ymax="3" zmin="0" zmax="9" />
            <FixedConstraint indices="0 1 2 3 4 5 6 7 8 9 10 11 12 13 14 15" />
            <HexahedronFEMForceField name="FEM" youngModulus="4000" poissonRatio="0.3" method="large" />
        </Node>
        <Node name="N2">
            <MechanicalObject />
            <UniformMass vertexMass="1"/>
            <RegularGridTopology nx="4" ny="4" nz="10" xmin="0" xmax="3" ymin="0" ymax="3" zmin="0" zmax="9" />
            <FixedConstraint indices="0 1 2 3 4 5 6 7 8 9 10 11 12 13 14 15" />
            <HexahedronFEMForceField name="FEM" youngModulus="4000" poissonRatio="0.3" method="large" />
        </Node>
    </Node>
</Node>
