<!--
Step 1:
Visual Anatomy
-->
<Node name="root" dt="0.05">
    <RequiredPlugin name="SofaOpenglVisual"/>
    <RequiredPlugin name="SofaGraphComponent"/>

    <BackgroundSetting color="0.5 0.5 0.5" />
    <VisualStyle displayFlags="showVisualModels hideForceFields" />

    <Node name="Head">

	<Node name="Head Visual Model" >
	    <VisualStyle displayFlags="showVisualModels " />
 	    <MeshObjLoader name="meshLoader_2" filename="data/mesh/head.obj" handleSeams="1" />
 	    <OglModel name="HeadVisualModel" src="@meshLoader_2" texturename="Tutorials/StepByStep/Dentistry_Haptics/data/pics/head_baseTexBaked.png" />
	</Node>

        <Node name="Tongue" activated="true">
            <Node name="TongueVisualModel">
                <MeshObjLoader name="meshLoader_1" filename="data/mesh/tongue.obj" handleSeams="1" />
                <OglModel name="TongueVisualModel" src="@meshLoader_1" texturename="Tutorials/StepByStep/Dentistry_Haptics/data/pics/tongue_color.png" />
            </Node>
        </Node>

        <Node name="Teeth" >
            <Node name="VisualModel">
                <MeshObjLoader name="meshLoader_0" filename="data/mesh/teeth.obj" handleSeams="1" />
                <OglModel name="TeethVisualModel" src="@meshLoader_0" texturename="Tutorials/StepByStep/Dentistry_Haptics/data/pics/teeth_color.png" />
            </Node>
        </Node>
    </Node>
s</Node>
