<!--
 Move a MechanicalState with the mouse & keyboard.
 Keyboard/mouse interctions with the mechanicalState are managed by the Python script,
 thus demonstrating a way to create new specific components with SofaPython.
-->

<Node name="root" dt="0.005" >
    <RequiredPlugin name="SofaOpenglVisual"/>
	<VisualStyle displayFlags="hideBehaviorModels hideCollisionModels hideMappings hideForceFields" />
	<RequiredPlugin name="SofaPython" pluginName="SofaPython" />
	<Gravity name="G" gravity="10 0 0" />
	<DefaultPipeline name="pipeline" depth="6" verbose="0"/>
	<BruteForceDetection name="detection" />
	<DefaultContactManager name="response" response="FrictionContact" />
	<LocalMinDistance name="proximity" alarmDistance="0.15" contactDistance="0.05" angleCone="0.0" />
	<FreeMotionAnimationLoop/>
	<LCPConstraintSolver tolerance="0.001"  maxIt="1000"/>

	<Node name="Raptor">
		<EulerImplicitSolver name="odesolver" />
		<CGLinearSolver iterations="10" name="linear solver" tolerance="1.0e-9" threshold="1.0e-9" />
		<SparseGridTopology n="5 5 10" fileTopology="mesh/raptor_8kp.obj" />
		<HexahedronSetGeometryAlgorithms />
		<MechanicalObject name="mecaRaptor"  rotation="0 0 90"/>
		<PrecomputedConstraintCorrection recompute="true"/>
		<DiagonalMass massDensity="1" name="computed using mass density" />
		<HexahedronFEMForceField name="FEM" youngModulus="1000000" poissonRatio="0.45" method="large" />
		<FixedConstraint  name="FixedConstraint" indices="0 1 2 18 19 20 59 58 57 96 97 98 135 136 137" />
		<Node name="VisualModel" >
			<MeshObjLoader name="meshLoader_2" filename="mesh/raptor_35kp.obj" handleSeams="1" />
			<OglModel name="RaptorVisualModel" src="@meshLoader_2" color="white"/>
			<BarycentricMapping name="tongueMapping" input="@../mecaRaptor" output="@RaptorVisualModel" />
		</Node>

		<Node name="CollisionModel" >
			<MeshObjLoader filename="mesh/raptor_8kp.obj"  name="loader"/>
			<MeshTopology src="@loader" name="raptorVisualModel"  />
			<MechanicalObject src="@loader" name="raptorState"/>
			<TriangleCollisionModel name="raptor" contactStiffness="100"/>
			<LineCollisionModel name="raptor" contactStiffness="100"/>
			<PointCollisionModel name="raptor" contactStiffness="100"/>
			<BarycentricMapping name="tongueMapping" input="@../mecaRaptor" output="@raptorState" mapForces="false"/>
		</Node>
	</Node>

	<!-- The PythonScriptController gathers events from input devices and populates the Mechanical state -->
	<Node name="Input">
		<PythonScriptController filename="keyboardControl.py" classname="KeyboardControl"/>
		<MechanicalObject template="Rigid" name="DOFs" position="0 0 0  0  0  0  1.0"/>
		<Node name="VisuAvatar" activated="false" >
			<MeshObjLoader name="meshLoader_0" filename="mesh/sphere.obj" scale="0.1" handleSeams="1" />
			<OglModel name="Visual" src="@meshLoader_0" color="gray"/>
			<RigidMapping input="@.." output="@Visual" index="0"/>
		</Node>
		<Node name="RefModel">
			<MeshObjLoader filename="dental_instrument_centerline.obj"  name="loader"/>
			<MeshTopology src="@loader"  />
			<MechanicalObject src="@loader" name="instrumentCollisionState" ry="-180" rz="-90" dz="3.5" dx="-0.3" />
			<RigidMapping />
		</Node>
	</Node>

	<Node name="Instrument" >
		<EulerImplicitSolver name="ODE solver" rayleighStiffness="0.05" rayleighMass="1.0" />
		<CGLinearSolver name="linear solver" iterations="25" tolerance="1e-10" threshold="10e-10" />
		<MechanicalObject name="instrumentState" template="Rigid" />
		<UniformMass name="mass" totalMass="0.05" />
		<LCPForceFeedback activate="true" forceCoef="0.001"/> <!-- ADDED : Compute a force-feedback for the device -->
		<UncoupledConstraintCorrection/>
		<Node name="VisualModel" >
			<MeshObjLoader name="meshLoader_1" filename="dental_instrument.obj" handleSeams="1" />
			<OglModel name="InstrumentVisualModel" src="@meshLoader_1" color="1.0 0.2 0.2 1.0" ry="-180" rz="-90" dz="3.5" dx="-0.3"/>
			<RigidMapping name="MM->VM mapping" input="@instrumentState" output="@InstrumentVisualModel" />
		</Node>
		<Node name="CollisionModel" >
			<MeshObjLoader filename="dental_instrument_centerline.obj"  name="loader"/>
			<MeshTopology src="@loader" name="InstrumentCollisionModel" />
			<MechanicalObject src="@loader" name="instrumentCollisionState"  ry="-180" rz="-90" dz="3.5" dx="-0.3" />
			<LineCollisionModel name="instrument" contactStiffness="10" />
			<PointCollisionModel name="instrument" contactStiffness="10" />
			<RigidMapping name="MM->CM mapping" input="@instrumentState" output="@instrumentCollisionState" />
		</Node>
		<VectorSpringForceField  object1="@Input/RefModel/instrumentCollisionState" object2="@Instrument/CollisionModel/instrumentCollisionState" stiffness="10" viscosity="0" />
	</Node>
</Node>
