<?xml version="1.0"?>
<Node 	name="Root" gravity="0 0 0" time="0" animate="0"   >
   	<RequiredPlugin name="SofaPython"/>
   	<RequiredPlugin name="SofaSceneAssist"/>
	<VisualStyle displayFlags="hideVisualModels showBehaviorModels showMappings showForceFields" />

	<Repeat name="test2" num="3"/>

</Node>
