<Node dt="0.01" gravity="0 -20 0.0">
    <RequiredPlugin name="SofaOpenglVisual"/>
    <RequiredPlugin pluginName="SofaSphFluid"/>

    <AddResourceRepository path="../data" />
    <!-- <BackgroundSetting color="1 1 1" /> -->
    <VisualStyle displayFlags="hideBehaviorModels hideForceFields hideCollisionModels" />


    <EulerExplicit symplectic="1" />
    <Node name="SPH" >

        <RegularGrid nx="5" ny="400" nz="5" xmin="-1.5" xmax="0" ymin="-3" ymax="36" zmin="-1.5" zmax="0" />
        <MechanicalObject name="MModel" />
        <!-- A topology is used here just to set initial particles positions. It is a bad idea because this object has no real topology, but it works... -->
        <UniformMass name="M1" vertexMass="1" />
        <SpatialGridContainer cellWidth="0.75" />
        <SPHFluidForceField radius="0.745" density="15" kernelType="1" viscosityType="2" viscosity="10" pressure="1000" surfaceTension="-1000" printLog="0" />
        <!-- The following force fields handle collision with walls and an inclined floor -->
        <PlaneForceField normal="1 0 0" d="-4" />
        <PlaneForceField normal="-1 0 0" d="-4" />
        <PlaneForceField normal="0.5 1 0.1" d="-4" />
        <PlaneForceField normal="0 0 1" d="-10" />
        <PlaneForceField normal="0 0 -1" d="-10" />
    </Node>
    <Node name="Fluid" >
        <OglFluidModel template="Vec3d" position="@../SPH/MModel.position"
            debugFBO="6"
            spriteRadius="0.5" spriteBlurRadius="10" spriteBlurScale="10" spriteBlurDepthFalloff="1"  />
    </Node>
</Node>
