<?xml version="1.0" ?>
<Node dt="0.005" gravity="0 -10 0">
    <RequiredPlugin name="SofaOpenglVisual"/>
    <RequiredPlugin name='SofaSphFluid' />
    <RequiredPlugin name='SofaExplicitOdeSolver'/>
    <VisualStyle displayFlags="showBehaviorModels showForceFields showWireframe" />
    <Node name="Fluid">
        <EulerExplicitSolver symplectic="1" />
        <MechanicalObject name="MModel" showObject="1"/>
        <ParticleSource name="Source" center="&#x0A;&#x09;&#x09;&#x09;&#x09;&#x09;&#x09;&#x09;&#x09;    -0.375 0 -0.75&#x0A;&#x09;&#x09;&#x09;&#x09;&#x09;&#x09;&#x09;&#x09;    0.0   0 -0.75&#x0A;&#x09;&#x09;&#x09;&#x09;&#x09;&#x09;&#x09;&#x09;    0.375 0 -0.75&#x0A;&#x09;&#x09;&#x09;&#x09;&#x09;&#x09;&#x09;&#x09;    -0.75  0 -0.375&#x0A;&#x09;&#x09;&#x09;&#x09;&#x09;&#x09;&#x09;&#x09;    -0.375 0 -0.375&#x0A;&#x09;&#x09;&#x09;&#x09;&#x09;&#x09;&#x09;&#x09;    0.0   0 -0.375&#x0A;&#x09;&#x09;&#x09;&#x09;&#x09;&#x09;&#x09;&#x09;    0.375 0 -0.375&#x0A;&#x09;&#x09;&#x09;&#x09;&#x09;&#x09;&#x09;&#x09;    0.75  0 -0.375&#x0A;&#x09;&#x09;&#x09;&#x09;&#x09;&#x09;&#x09;&#x09;    -0.75  0  0.0&#x0A;&#x09;&#x09;&#x09;&#x09;&#x09;&#x09;&#x09;&#x09;    -0.375 0  0.0&#x0A;&#x09;&#x09;&#x09;&#x09;&#x09;&#x09;&#x09;&#x09;    0.0   0  0.0&#x0A;&#x09;&#x09;&#x09;&#x09;&#x09;&#x09;&#x09;&#x09;    0.375 0  0.0&#x0A;&#x09;&#x09;&#x09;&#x09;&#x09;&#x09;&#x09;&#x09;    0.75  0  0.0&#x0A;&#x09;&#x09;&#x09;&#x09;&#x09;&#x09;&#x09;&#x09;    -0.75  0  0.375&#x0A;&#x09;&#x09;&#x09;&#x09;&#x09;&#x09;&#x09;&#x09;    -0.375 0  0.375&#x0A;&#x09;&#x09;&#x09;&#x09;&#x09;&#x09;&#x09;&#x09;    0.0   0  0.375&#x0A;&#x09;&#x09;&#x09;&#x09;&#x09;&#x09;&#x09;&#x09;    0.375 0  0.375&#x0A;&#x09;&#x09;&#x09;&#x09;&#x09;&#x09;&#x09;&#x09;    0.75  0  0.375&#x0A;&#x09;&#x09;&#x09;&#x09;&#x09;&#x09;&#x09;&#x09;    -0.375 0  0.75&#x0A;&#x09;&#x09;&#x09;&#x09;&#x09;&#x09;&#x09;&#x09;    0.0   0  0.75&#x0A;&#x09;&#x09;&#x09;&#x09;&#x09;&#x09;&#x09;&#x09;    0.375 0  0.75&#x0A;&#x09;&#x09;&#x09;&#x09;&#x09;&#x09;&#x09;&#x09;    " translation="0 3 0" radius="0.01 0.1 0.01" velocity="0 -20 0" delay="0.01875" start="-0.1" stop="2" />
        <ParticleSink normal="0 1 0" d0="-10" d1="-11" showPlane="true" printLog="false" />
        <UniformMass name="M1" vertexMass="1.0" handleTopologicalChanges="1" />
    </Node>
</Node>
