<Node name="root" dt="0.01">
    <RequiredPlugin name="SofaOpenglVisual"/>
    <RequiredPlugin pluginName="SofaStereo"/>
    <StereoCamera enabled="true" mode="3" strategy="0" baseline="10" />

    <StereoOglModel name="VisualModel" fileMesh="mesh/floor2.obj" textureleft="textures/floor.bmp" textureright="textures/floor2.bmp" />
</Node>
