<?xml version="1.0" ?>
<Node name="root" gravity="0 -100 0" dt="0.04">
    <EulerImplicitSolver name="odesolver" rayleighMass="0" rayleighStiffness="0" />
    <CGLinearSolver name="cgsolver" iterations="20" tolerance="1e-12" threshold="1e-18" />
    <MechanicalObject template="Vec3" name="dof" position="0 0 0"/>
    <UniformMass template="Vec3" vertexMass="1" />
</Node>
