<?xml version="1.0"?>
<Node 	 name="root"  gravity="0 0 0"  dt="0.0154735"  time="0"  animate="0"  >
        <EulerSolver name="eulerExplicitSolver"/>

	<MechanicalObject template="Vec3d" name="fixedPoint"  position="0 0 0 1 0 0"  velocity="0 0 0 0 0.18 0"  force="0 0 0 0 0 0"  externalForce="0 0 0 0 0 0"  restScale="1"  showObject="1"  showObjectScale="5"  showIndices="1"  showIndicesScale="0.0001" />

	<FixedConstraint template="Vec3d" name="fixedConstraint"  indices="0" />

	<UniformMass mass="1"/>
	<LennardJonesForceField alpha="1" beta="-1" aInit="0.075"/>

<Monitor template="Vec3d" name="Gravitation_positions_eulerExplicit_solver" indices="1" ExportPositions="1"/>

</Node>
