<?xml version="1.0"?>
<Node 	 name="root"  gravity="0 -9.81 0"  dt="0.01"  time="0"  animate="0"  >
	<EulerImplicitSolver name="eulerImplicitSolver1" rayleighStiffness="0" rayleighMass="0" />
	<CGLinearSolver template="GraphScattered" name="cGLinearSolver1" />
	<Node 	 name="fixedPointNode"  >
		<MechanicalObject template="Rigid" name="fixedPoint"  position="0 2 0 0 0 0 1"  restScale="1"  showObject="1"  showObjectScale="0.1"  showIndices="1"  showIndicesScale="0.0001" />
		<FixedConstraint template="Rigid" name="fixedConstraint"  indices="0" />
	</Node>
	<Node 	 name="MassNode"  >
		<MechanicalObject template="Rigid" name="Mass"  position="0 1 0 0 0 0 1"  restScale="1"  showObject="1"  showObjectScale="0.1"  showIndices="1"  showIndicesScale="0.0001" />
		<UniformMass template="Rigid" name="uniformMass1"  totalmass="10" />
		<Monitor template="Rigid" name="positions_euler_solver_Springtest_M_10_KS_T_5" indices="0" ExportPositions="1"  showPositions="1" PositionsColor="1 1 0 1"/>
		<Node 	 name="VisualModel"  >
		    <OglModel template="ExtVec3f" name="Cube"  fileMesh="mesh/cube.obj"  scale3d="0.1 0.1 0.1"/>
		    <RigidMapping input="@Mass"  output="@Cube" />
		</Node>
	</Node>
<JointSpringForceField template="Rigid" name="joint springs" object1="@fixedPointNode" object2="@MassNode" spring="BEGIN_SPRING 0 0 KS_T 5 5  KS_R 500.0 500.0  KS_B 500.0  KD 0.0 END_SPRING" />
</Node>
<!--<JointSpringForceField template="Rigid" name="jointSpring" object1="@fixedPointNode" object2="@MassNode" spring="0 0 1000 0 1"/>-->
