<?xml version="1.0"?>
<Node name="Scene" gravity="0 0 0" dt="1" >
    	<VisualStyle displayFlags="showBehavior showVisual" />
	<CudaRasterizer template="Vec3d" tags="LDI" subVolumeResolution="32" keepDist="1" useAtomics="1" maxLayers="64" zsortBits="16" pixelSize="0.049" responseType="1" responseStiffness="30" drawIntersection="0" drawSides="0" drawSubVols="0" />
	<DiscreteIntersection />
	<CollisionResponse response="default" name="LDIPenality"/>
	<CollisionGroup/>

	<Node name="Beam-RAW_generation">
		<MeshObjLoader name="MeshLoader"  filename="mesh/beam.obj"/>
		<Mesh name="modelTopo" src="@MeshLoader" tags="LDI SelfCollision"/>
		<MechanicalObject />
	</Node>

	<Node name="Beam">

		<EulerImplicitSolver rayleighStiffness="0.5"  rayleighMass="0.5" />
		<CGLinearSolver template="GraphScattered" iterations="150"  threshold="1e-008" />

		<MechanicalObject template="FrameAffine" name="DOFs" useMask="0" rest_position="0 0 -0.95 [1 0 0, 0 1 0, 0 0 1] 0 0 0.95 [1 0 0, 0 1 0, 0 0 1]"
												position="0 0 -0.95 [1 0 0, 0 1 0, 0 0 1] 0 0 2 [1 0 0, 0 1 0, 0 0 1]"/>
		<FrameDiagonalMass template="AffineFrame3x12dMass"  showAxisSizeFactor="0.2"/>

		<FrameFixedConstraint template="FrameAffine" indices="0" allowed="0 0 0 0 0 0 0 0 0 0 0 0" />
		<FrameRigidConstraint template="FrameAffine" indices="1" />

		<Voxelizer name="VoxelLoader" filename="" vROICenter="0 0 0" vROIRadius="500"
				triangularModelPath="Beam-RAW_generation/modelTopo" voxelSize="0.049 0.049 0.049" valueFileName="beam-Affine-Vec.raw" segmentationFileName="beam-Affine-Vec-seg.raw"
				infoFileName="beam-Affine-Vec-seg.nfo" useROI="true"/>
		<GridMaterial name="gridmaterial"
				imageFile="@VoxelLoader.segmentationFileName"
				labelToStiffnessPairs="1 1000"
				labelToDensityPairs="1 3000"
				labelToPoissonRatioPairs="1 0"
				labelToBulkModulusPairs="1 50"
				distanceType="Geodesic"
				biasDistances="true"
				showVoxelData="None"
				/>
<!--
		<Node name="Physics">
			<MechanicalObject template="DeformationGradient332" useMask="0" name="PointSet" showObject="1" showObjectScale="0.1"
position="0 0 0 1 0 0 0 1 0 0 0 1 0 0 0 0 0 0 0 0 0 0 0 0 0 0 0 0 0 0 0 0 0 0 0 0 0 0 0" />
			<FrameBlendingMapping template="Mapping&lt;FrameAffine,DeformationGradient332&gt;" name="SMapping"  input="@../DOFs"  output="@PointSet"
				targetFrameNumber="2"
				targetSampleNumber="50" />
			<FrameVolumePreservationForceField template="DeformationGradient332"  printLog="0"/>
			<GreenLagrangeForceField template="DeformationGradient332"  printLog="0"/>
		</Node>

		<Node name="Collision">
			<MeshLoader name="MeshLoader" filename="mesh/beam.obj"/>
			<Mesh />
			<MechanicalObject  name="PointSet"/>
			<Triangle />
			<FrameBlendingMapping template="MechanicalMapping&lt;FrameAffine,Vec3d&gt;" name="SMapping"  input="@../DOFs"  output="@PointSet" />
		</Node>
-->
		<Node name="Visu">
			<OglModel name="Beam" fileMesh="mesh/beam.obj" normals="0"   color="1 .8 .3 1" />
			<!--
			<FrameBlendingMapping template="Mapping&lt;FrameAffine,ExtVec3f&gt;" name="SMapping"  input="@../DOFs"  output="@Beam"/>
			-->
		</Node>


	</Node>
</Node>
