<?xml version="1.0"?>
<Node 	name="root" gravity="0 0 0" dt="1"  >
  <RequiredPlugin pluginName="image"/>
  <VisualStyle displayFlags="showWireframe showVisual" />
  <MeshObjLoader name="mesh" filename="mesh/Armadillo_simplified.obj" triangulate="1"/>
  <OglModel name="meshOgl"  src="@mesh" color="0.5 0.5 1 .1"/>
  <MeshToImageEngine template="ImageUC" name="rasterizer" src="@mesh" value="50" roiVertices="23 73 218 353 539 817 870 1011 1718 1719 2159 2283 2347 2446 2447 2674 2753 2773 3001 3010 3011 3263 3264 3356 3357 3358 3359 3375 3377 3450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" roiValue="25" fillInside="0" voxelSize="0.2" padSize="0" rotateImage="true" printLog="true"/>
  <ImageContainer template="ImageUC" name="image" src="@rasterizer" />
  <ImageViewer template="ImageUC" name="viewer" src="@image" plane="17 10 25"/>
</Node>
