<?xml version="1.0"?>
<Node 	name="root" gravity="0 0 0" dt=".1"  >
    <RequiredPlugin name="SofaOpenglVisual"/>

<RequiredPlugin name="Flexible" pluginName="Flexible" />
  <RequiredPlugin pluginName="image"/>

  <VisualStyle displayFlags="showVisual" />
  <MeshObjLoader name="mesh1" filename="mesh/bubille_in1.obj" triangulate="1"/>
  <MeshObjLoader name="mesh2" filename="mesh/bubille_in2.obj" triangulate="1"/>
  <MeshObjLoader name="mesh3" filename="mesh/bubille_out.obj" triangulate="1"/>

    <MeshToImageEngine template="ImageD" name="rasterizer"  nbMeshes="3"
                       value="100" insideValue="100" position="@mesh3.position" triangles="@mesh3.triangles"
                       value2="10" insideValue2="10" position2="@mesh2.position" triangles2="@mesh2.triangles"
                       value3="1000" insideValue3="1000"  position3="@mesh1.position" triangles3="@mesh1.triangles"
                       voxelSize="1.5 1.5 1.5" padSize="2" rotateImage="false" printLog="true"/>
    <ImageContainer template="ImageD" name="image" src="@rasterizer" drawBB="false"/>


  <Node name="flexible" >
    	    <EulerImplicitSolver  rayleighStiffness="0.1" rayleighMass="0.1" />
    	    <CGLinearSolver iterations="25" tolerance="1E-5" threshold="1E-5"/>

	    <ImageSampler template="ImageD" name="sampler" src="@../image" param="1" showEdges="false" />
	    <MeshTopology name="mesh" src="@sampler" />
	    <MechanicalObject  />
            <UniformMass totalMass="200" />

	    <BarycentricShapeFunction  nbRef="8" />

	    <Node 	name="behavior"   >
		<TopologyGaussPointSampler name="sampler" inPosition="@../mesh.position" method="0" order="2" />
		<MechanicalObject template="F331" />
	    	<LinearMapping template="Vec3d,F331" />

		<Node 	name="E"   >
    		    <ImageValuesFromPositions name="youngM" position="@../sampler.position" src="@../../../image" />
		    <MechanicalObject  template="E331" />
		    <CorotationalStrainMapping template="F331,E331" />
		    <HookeForceField  template="E331" youngModulus="@youngM.values" poissonRatio="0" viscosity="0"/>
		</Node>
	    </Node>


		<Node name="Gelatin-Visu">
			<MeshObjLoader name="meshLoader_2" filename="mesh/bubille_8x8x16.obj" handleSeams="1" />
			<OglModel name="Gelatin" src="@meshLoader_2" color="0.1 .8 .3 .6" />
			<LinearMapping template="Vec3d,ExtVec3f"/>
		</Node>

		<Node name="Ball1-Visu">
			<MeshObjLoader name="meshLoader_1" filename="mesh/bubille_in1.obj" handleSeams="1" />
			<OglModel name="Ball1" src="@meshLoader_1" color="1 0 0 1" />
			<LinearMapping template="Vec3d,ExtVec3f"/>
		</Node>

		<Node name="Ball2-Visu">
			<MeshObjLoader name="meshLoader_0" filename="mesh/bubille_in2.obj" handleSeams="1" />
			<OglModel name="Ball2" src="@meshLoader_0" color="0 0 1 1" />
			<LinearMapping template="Vec3d,ExtVec3f"/>
		</Node>

	 	<Node name="VisuHexa_wireframe"  >
			<VisualStyle displayFlags="showWireframe"/>
			<OglModel color="0.8 0.8 1 1" />
			<IdentityMapping />
		</Node>

		<Node name="Collision">
			<MeshObjLoader name="MeshLoader" filename="mesh/bubille_out.obj"/>
			<MeshTopology src="@MeshLoader" />
			<MechanicalObject  />
		    	<LinearMapping template="Vec3d,Vec3d"/>
		</Node>
    </Node>

</Node>
