<?xml version="1.0"?>
<Node 	name="root" gravity="0 0 0" dt="1"  >
    <RequiredPlugin name="SofaOpenglVisual"/>
  <RequiredPlugin pluginName="image"/>
  <ImageContainer  name="image" filename="data/pelvis_f.raw"/>
  <ImageFilter  param="2" filter="1" name="engine" src="@image" />
  <ImageViewer  name="viewer" src="@engine"  plane="50 50 20"/>
  <MeshObjLoader name="meshLoader_0" filename="data/pelvis_f.obj" handleSeams="1" />
  <OglModel src="@meshLoader_0" color="1 .4 0.5 1" />
</Node>
