<?xml version="1.0"?>

<Node 	name="Root" gravity="0 0 0" time="0" animate="0"  dt="0.5" showAxis="true">

<RequiredPlugin pluginName="image"/>

<ImageContainer template="ImageUC" name="container" filename="beam.raw"/>

<TestImageEngine template="Image<unsigned char> >" name="engine" src="@container" listening="true"/>

<ImageViewer template="ImageUC" name="viewer" image="@engine.outputImage"/>

</Node>
