import Sofa

import os

g_size = 10;

def internalCreateScene(root_node, template):

    size = int(os.getenv('s', g_size)) # read the value for size from the env, fallback to g_size if the env.var not set

    root_node.dt = 0.001

    root_node.addObject('RequiredPlugin', pluginName='Sofa.Component.AnimationLoop')
    root_node.addObject('RequiredPlugin', pluginName='Sofa.Component.Constraint.Projective')
    root_node.addObject('RequiredPlugin', pluginName='Sofa.Component.LinearSolver.Iterative')
    root_node.addObject('RequiredPlugin', pluginName='Sofa.Component.Mass')
    root_node.addObject('RequiredPlugin', pluginName='Sofa.Component.IntegrationSchemes.Forward')
    root_node.addObject('RequiredPlugin', pluginName='Sofa.Component.SolidMechanics.Spring')
    root_node.addObject('RequiredPlugin', pluginName='Sofa.Component.StateContainer')
    root_node.addObject('RequiredPlugin', pluginName='Sofa.Component.Topology.Container.Grid')
    root_node.addObject('RequiredPlugin', pluginName='Sofa.Component.Visual')

    root_node.addObject('DefaultAnimationLoop')
    root_node.addObject('VisualStyle', displayFlags='hideVisualModels hideBehaviorModels showCollisionModels hideMappings showForceFields')

    m1 = root_node.addChild('M1')
    m1.addObject('RungeKutta4IntegrationScheme')
    m1.addObject('MechanicalObject', template=template)
    m1.addObject('UniformMass', totalMass=20 * size)
    m1.addObject('RegularGridTopology', nx="16", ny="16", nz=5*size+1, xmin="0", xmax="3", ymin="0", ymax="3", zmin="0", zmax=size)
    m1.addObject('FixedProjectiveConstraint', indices="0-255")
    m1.addObject('MeshSpringForceField', name="Spring", stiffness="1000")
