<?xml version="1.0"?>
<Node name="root" gravity="0 -10 0" dt="0.01">
    <RequiredPlugin name="Sofa.Component.Topology.Container.Constant"/>

    <Node name="plugins">
        <RequiredPlugin pluginName="Sofa.Component.IO.Mesh"/> <!-- Needed to use components [MeshOBJLoader] -->
        <RequiredPlugin pluginName="Sofa.GL.Component.Rendering3D"/> <!-- Needed to use components [OglModel] -->
        <RequiredPlugin pluginName="Sofa.Component.Constraint.Lagrangian.Correction"/> <!-- Needed to use components [LinearSolverConstraintCorrection] -->
        <RequiredPlugin pluginName="Sofa.Component.Constraint.Lagrangian.Model"/> <!-- Needed to use components [FixedLagrangianConstraint] -->
        <RequiredPlugin pluginName="Sofa.Component.Engine.Select"/> <!-- Needed to use components [BoxROI] -->
        <RequiredPlugin pluginName="Sofa.Component.LinearSolver.Direct"/> <!-- Needed to use components [SparseLDLSolver] -->
        <RequiredPlugin pluginName="Sofa.Component.Mapping.Linear"/> <!-- Needed to use components [BarycentricMapping] -->
        <RequiredPlugin pluginName="Sofa.Component.Mass"/> <!-- Needed to use components [UniformMass] -->
        <RequiredPlugin pluginName="Sofa.Component.IntegrationSchemes.Backward"/> <!-- Needed to use components [EulerImplicitIntegrationScheme] -->
        <RequiredPlugin pluginName="Sofa.Component.SolidMechanics.FEM.Elastic"/> <!-- Needed to use components [TetrahedronFEMForceField] -->
        <RequiredPlugin pluginName="Sofa.Component.StateContainer"/> <!-- Needed to use components [MechanicalObject] -->
        <RequiredPlugin pluginName="Sofa.Component.Topology.Container.Dynamic"/> <!-- Needed to use components [TriangleSetTopologyContainer] -->
        <RequiredPlugin pluginName="Sofa.Component.Topology.Container.Grid"/> <!-- Needed to use components [SparseGridTopology] -->
        <RequiredPlugin pluginName="Sofa.Component.Collision.Geometry"/> <!-- Needed to use components [TriangleCollisionModel] -->
        <RequiredPlugin pluginName="Sofa.Component.Constraint.Projective"/> <!-- Needed to use components [FixedProjectiveConstraint] -->
    </Node>

    <DefaultAnimationLoop computeBoundingBox="false" />
    <MeshOBJLoader name="meshLoader" triangulate="true" filename="mesh/raptor_35kp.obj" />

    <Node name="data">
        <SparseGridTopology n="10 5 10" name="topology" fileTopology="@../meshLoader.filename" />
        <MechanicalObject name="DOFs" template="Vec3" />
    </Node>

    <Node name="raptor">
        <EulerImplicitIntegrationScheme rayleighStiffness="0.2" rayleighMass="0.2" />
        <SparseLDLSolver template="CompressedRowSparseMatrixd"/>
        <MeshTopology hexahedra="@../data/topology.hexahedra" />
        <MechanicalObject name="DOFs" template="Vec3" position="@../data/DOFs.position"/>
        <UniformMass totalMass="1.005"/>
        <TetrahedronFEMForceField name="FEM" youngModulus="500" poissonRatio='0.3' />

        <BoxROI name='ROI1' box='-5 -1 -3  5 1 3' drawBoxes='true'/>
        <FixedProjectiveConstraint indices="@ROI1.indices" />

        <Node name="Collision">
            <MechanicalObject name="collisMecha" src="@../../meshLoader" />
            <TriangleSetTopologyContainer src="@../../meshLoader" />
            <TriangleCollisionModel />
            <LineCollisionModel />
            <PointCollisionModel />
            <BarycentricMapping />
        </Node>

        <Node name="Visualization">
            <OglModel name="VisualModel1" src="@../../meshLoader" useNormals="0" />
            <TriangleSetTopologyContainer src="@../../meshLoader" />
            <BarycentricMapping />
        </Node>
    </Node>

</Node>
