<Node name="root" dt="0.03">
    <RequiredPlugin name="SofaOpenglVisual"/>
    <RequiredPlugin name="SofaConstraint"/>
    <RequiredPlugin name="SofaExplicitOdeSolver"/>
    <RequiredPlugin name="SofaImplicitOdeSolver"/>
    <RequiredPlugin name="SofaLoader"/>
    <RequiredPlugin name="SofaMeshCollision"/>
    <RequiredPlugin name="SofaMiscCollision"/>
    <RequiredPlugin name="SofaRigid"/>

    <VisualStyle displayFlags="showVisual showBehaviorModels" />
    <FreeMotionAnimationLoop initial_guess="true" displayTime="1" maxIt="100" />
    <DefaultPipeline depth="8" verbose="0" draw="0" />
    <BruteForceBroadPhase name="N2" />
    <BVHNarrowPhase />
    <LocalMinDistance name="Proximity" alarmDistance="0.35" contactDistance="0.1" />
    <DefaultContactManager name="Response" response="FrictionContactConstraint" />
    <LCPConstraintSolver tolerance="0.001" maxIt="1000" build_lcp="false"/>
    <Node>
        <EulerImplicitSolver name="cg_odesolver" printLog="false"  rayleighStiffness="0.1" rayleighMass="0.1" />
        <CGLinearSolver iterations="25" name="linear solver" tolerance="1.0e-9" threshold="1.0e-9" />
        <DefaultCollisionGroupManager name="Group" />
        <Node name="TORUS">
            <MechanicalObject template="Rigid3d" scale="1.0" dx="0.0" dy="0.0" dz="0.0" />
            <UniformMass totalMass="40.0" printLog="false" />
            <UncoupledConstraintCorrection useOdeSolverIntegrationFactors="0" />
            <Node name="Visu">
                <MeshOBJLoader name="meshLoader_0" filename="mesh/torus.obj" scale="1.0" handleSeams="1" />
                <OglModel name="Visual" src="@meshLoader_0" color="1.0 0.5 0.25 1.0" />
                <RigidMapping input="@.." output="@Visual" />
            </Node>
            <Node name="Surf2">
                <MeshOBJLoader name="loader" filename="mesh/torus_for_collision.obj" triangulate="true" />
                <MeshTopology src="@loader" />
                <MechanicalObject src="@loader" scale="1.0" />
                <TriangleCollisionModel />
                <LineCollisionModel />
                <PointCollisionModel />
                <RigidMapping />
            </Node>
        </Node>
        <Node name="MAN">
            <EulerExplicitSolver />
            <MechanicalObject template="Rigid3d" dx="0.0" dy="0.0" dz="0.0" />
            <UniformMass totalMass="100.0" printLog="false" />
            <UncoupledConstraintCorrection useOdeSolverIntegrationFactors="0" />
            <Node name="Visu">
                <MeshOBJLoader name="meshLoader_2" filename="mesh/man.obj" scale="10" handleSeams="1" />
                <OglModel name="Visual" src="@meshLoader_2" color="0.8 0.8 0.8 1.0" dy="-3.0" />
                <RigidMapping input="@.." output="@Visual" />
            </Node>
            <Node name="Surf2">
                <MeshOBJLoader name="loader" filename="mesh/man.obj" triangulate="true" />
                <MeshTopology src="@loader" />
                <MechanicalObject src="@loader" scale="10" dy="-3.0" />
                <TriangleCollisionModel />
                <LineCollisionModel />
                <PointCollisionModel />
                <RigidMapping />
            </Node>
        </Node>
        <Node name="CUBE">
            <MechanicalObject template="Rigid3d" scale="0.3" dx="-2.0" dy="-2.0" dz="-0.5" />
            <UniformMass totalMass="100.0" printLog="false" />
            <UncoupledConstraintCorrection useOdeSolverIntegrationFactors="0" />
            <Node name="Visu">
                <MeshOBJLoader name="meshLoader_4" filename="mesh/smCube27.obj" scale="0.3" handleSeams="1" />
                <OglModel name="Visual" src="@meshLoader_4" color="0.0 0.5 0.5 1.0" />
                <RigidMapping input="@.." output="@Visual" />
            </Node>
            <Node name="Surf2">
                <MeshOBJLoader name="loader" filename="mesh/smCube27.obj" triangulate="true" />
                <MeshTopology src="@loader" />
                <MechanicalObject src="@loader" scale="0.3" />
                <TriangleCollisionModel />
                <LineCollisionModel />
                <PointCollisionModel />
                <RigidMapping />
            </Node>
        </Node>
        <Node name="DRAGON1">
            <EulerExplicitSolver />
            <MechanicalObject template="Rigid3d" dx="0.0" dy="2.5" dz="2.5" />
            <UniformMass totalMass="100.0" printLog="false" />
            <UncoupledConstraintCorrection useOdeSolverIntegrationFactors="0" />
            <Node name="Visu">
                <MeshOBJLoader name="meshLoader_1" filename="mesh/dragon_clean.obj" scale="0.25" handleSeams="1" />
                <OglModel name="Visual" src="@meshLoader_1" color="0.2 0.2 0.8 1.0" />
                <RigidMapping input="@.." output="@Visual" />
            </Node>
            <Node name="Surf2">
                <MeshOBJLoader name="loader" filename="mesh/dragon_clean.obj" triangulate="true" />
                <MeshTopology src="@loader" />
                <MechanicalObject src="@loader" scale="0.25" />
                <TriangleCollisionModel />
                <LineCollisionModel />
                <PointCollisionModel />
                <RigidMapping />
            </Node>
        </Node>
        <Node name="BOX">
            <MeshOBJLoader name="loader" filename="mesh/box_inside.obj" triangulate="true" />
            <MeshTopology src="@loader" />
            <MechanicalObject src="@loader" />
            <TriangleCollisionModel simulated="0" moving="0" />
            <LineCollisionModel simulated="0" moving="0" />
            <PointCollisionModel simulated="0" moving="0" />
            <MeshOBJLoader name="meshLoader_3" filename="mesh/box_outside.obj" handleSeams="1" />
            <OglModel name="Visual" src="@meshLoader_3" color="1 0 0 0.3" />
        </Node>
    </Node>
</Node>
