<Node name="root" gravity="0 0 0" dt="0.01" >
		<VisualStyle name="visualStyle1"  displayFlags="hideVisual 	hideBehaviorModels showCollisionModels" />
		<BackgroundSetting color="0.5 0.5 0.5" />

		<Node name="Example">
			<RegularGrid n="10 10 10"  min="0 0 0" max="10 10 10" />
            <MechanicalObject name="DOFs" template="Vec3d" />
            <UniformMass totalMass="10" />
            <Sphere radius="0.5" />
        </Node >

</Node>
