<Node name="root" gravity="0.0 -2.0 0.0" dt="0.04" showBehaviorModels="0" showCollisionModels="0" showMappings="0" showForceFields="0">
<!--	<CollisionPipeline verbose="0" />
	<BruteForceDetection name="N2" />
	<CollisionResponse name="Response" />
	<CudaProximityIntersection alarmDistance="0.002" contactDistance="0.001" />-->
	<Node name="Floor">
		<RegularGrid
			nx="2" ny="1" nz="2"
			xmin="20" xmax="-20"
			ymin="-3.05" ymax="-3.05"
			zmin="-20" zmax="20" />
		<MechanicalObject />
		<!--
		<Triangle simulated="0" moving="0" />
		<Line simulated="0" moving="0" />
		<Point simulated="0" moving="0" />
			  -->
		<Node name="Visu">
			<OglModel name="Visual" color="red"/>
			<IdentityMapping object1="../.." object2="Visual"/>
		</Node>
	</Node>
	<Node name="SquareCloth">
		<!--<CGImplicit rayleighMass="0.05"  iterations="10" threshold="0.000001"/>-->
		<EulerImplicit rayleighMass="0.05"/>
		<CGLinearSolver iterations="10" threshold="0.000001"/>
	<Node name="SquareCloth1">
		<MechanicalObject template="CudaVec3f" />
		<UniformMass totalmass="100" />
		<RegularGrid
			nx="20" ny="1" nz="20"
			xmin="12" xmax="-12"
			ymin="7" ymax="7"
			zmin="-12" zmax="12" />
		<BoxConstraint box="-12 7 12 -10 7 12    10 7 12 12 7 12"/>
		<MeshSpringForceField name="Springs" stiffness="1000" damping="0"/>
		<QuadBendingSprings name="Bend" stiffness="2000" damping="1"/>
		<SphereForceField stiffness="1000" damping="1" center="0 1 3" radius="4" />
		<PlaneForceField stiffness="1000" damping="20" normal="0 1 0" d="-3" />
		<!--<SpatialGridContainer cellWidth="1" autoUpdate="true" showGrid="true" />-->
		<Node name="Visu">
			<!--<OglModel name="Visual" color="green"/>
			<IdentityMapping object1="../.." object2="Visual"/>-->
			<CudaVisualModel template="CudaVec3f" diffuse="0 0.8 0 1.0" computeNormals="true" />
		</Node>
		<!--
		<Node name="Surf">
			<MechanicalObject />
			<RegularGrid
				nx="100" ny="1" nz="100"
				xmin="12" xmax="-12"
				ymin="7" ymax="7"
				zmin="-12" zmax="12" />
			<IdentityMapping />
			<Triangle />
		</Node>
		-->
	</Node>
	<Node name="SquareCloth2">
		<MechanicalObject template="CudaVec3f" />
		<UniformMass totalmass="100" />
		<RegularGrid
			nx="20" ny="1" nz="20"
			xmin="12" xmax="-12"
			ymin="7" ymax="7"
			zmin="-12" zmax="12" />
		<BoxConstraint box="-12 7 -12 -10 7 -12    10 7 -12 12 7 -12"/>
		<MeshSpringForceField name="Springs" stiffness="1000" damping="0"/>
		<QuadBendingSprings name="Bend" stiffness="2000" damping="1"/>
		<SphereForceField stiffness="1000" damping="1" center="0 1 3" radius="4" />
		<PlaneForceField stiffness="1000" damping="20" normal="0 1 0" d="-3" />
		<!--<SpatialGridContainer cellWidth="1" autoUpdate="true" showGrid="true" />-->
		<Node name="Visu">
			<!--<OglModel name="Visual" color="green"/>
			<IdentityMapping object1="../.." object2="Visual"/>-->
			<CudaVisualModel template="CudaVec3f" diffuse="0 0.8 0 1.0" computeNormals="true" />
		</Node>
		<!--
		<Node name="Surf">
			<MechanicalObject />
			<RegularGrid
				nx="100" ny="1" nz="100"
				xmin="12" xmax="-12"
				ymin="7" ymax="7"
				zmin="-12" zmax="12" />
			<IdentityMapping />
			<Triangle />
		</Node>
		-->
	</Node>
	<Node name="SquareCloth3">
		<MechanicalObject template="CudaVec3f" />
		<UniformMass totalmass="100" />
		<RegularGrid
			nx="20" ny="1" nz="20"
			xmin="12" xmax="-12"
			ymin="7" ymax="7"
			zmin="-12" zmax="12" />
		<BoxConstraint box="-12 7 -12 -10 7 -12    -12 7 12 -10 7 12"/>
		<MeshSpringForceField name="Springs" stiffness="1000" damping="0"/>
		<QuadBendingSprings name="Bend" stiffness="2000" damping="1"/>
		<SphereForceField stiffness="1000" damping="1" center="0 1 3" radius="4" />
		<PlaneForceField stiffness="1000" damping="20" normal="0 1 0" d="-3" />
		<!--<SpatialGridContainer cellWidth="1" autoUpdate="true" showGrid="true" />-->
		<Node name="Visu">
			<!--<OglModel name="Visual" color="green"/>
			<IdentityMapping object1="../.." object2="Visual"/>-->
			<CudaVisualModel template="CudaVec3f" diffuse="0 0.8 0 1.0" computeNormals="true" />
		</Node>
		<!--
		<Node name="Surf">
			<MechanicalObject />
			<RegularGrid
				nx="100" ny="1" nz="100"
				xmin="12" xmax="-12"
				ymin="7" ymax="7"
				zmin="-12" zmax="12" />
			<IdentityMapping />
			<Triangle />
		</Node>
		-->
	</Node>
	<Node name="SquareCloth4">
		<MechanicalObject template="CudaVec3f" />
		<UniformMass totalmass="100" />
		<RegularGrid
			nx="20" ny="1" nz="20"
			xmin="12" xmax="-12"
			ymin="7" ymax="7"
			zmin="-12" zmax="12" />
		<BoxConstraint box="10 7 -12 12 7 -12    10 7 12 12 7 12"/>
		<MeshSpringForceField name="Springs" stiffness="1000" damping="0"/>
		<QuadBendingSprings name="Bend" stiffness="2000" damping="1"/>
		<SphereForceField stiffness="1000" damping="1" center="0 1 3" radius="4" />
		<PlaneForceField stiffness="1000" damping="20" normal="0 1 0" d="-3" />
		<!--<SpatialGridContainer cellWidth="1" autoUpdate="true" showGrid="true" />-->
		<Node name="Visu">
			<!--<OglModel name="Visual" color="green"/>
			<IdentityMapping object1="../.." object2="Visual"/>-->
			<CudaVisualModel template="CudaVec3f" diffuse="0 0.8 0 1.0" computeNormals="true" />
		</Node>
		<!--
		<Node name="Surf">
			<MechanicalObject />
			<RegularGrid
				nx="100" ny="1" nz="100"
				xmin="12" xmax="-12"
				ymin="7" ymax="7"
				zmin="-12" zmax="12" />
			<IdentityMapping />
			<Triangle />
		</Node>
		-->
	</Node>
	</Node>
	<Node name="Sphere">
		<OglModel name="Visual" fileMesh="mesh/sphere.obj" scale="3.95" dx="0" dy="1" dz="3" color="blue"/>
	</Node>
</Node>
