<Node name="root" dt="0.02">
    <RequiredPlugin pluginName="Sofa.Component.Collision.Detection.Algorithm"/> <!-- Needed to use components [BVHNarrowPhase BruteForceBroadPhase CollisionPipeline] -->
    <RequiredPlugin pluginName="Sofa.Component.Collision.Detection.Intersection"/> <!-- Needed to use components [LocalMinDistance] -->
    <RequiredPlugin pluginName="Sofa.Component.Collision.Geometry"/> <!-- Needed to use components [SphereCollisionModel] -->
    <RequiredPlugin pluginName="Sofa.Component.Collision.Response.Contact"/> <!-- Needed to use components [CollisionResponse] -->
    <RequiredPlugin pluginName="Sofa.Component.IO.Mesh"/> <!-- Needed to use components [MeshOBJLoader SphereLoader] -->
    <RequiredPlugin pluginName="Sofa.Component.LinearSolver.Iterative"/> <!-- Needed to use components [CGLinearSolver] -->
    <RequiredPlugin pluginName="Sofa.Component.Mapping.Linear"/> <!-- Needed to use components [BarycentricMapping SubsetMapping] -->
    <RequiredPlugin pluginName="Sofa.Component.Mass"/> <!-- Needed to use components [UniformMass] -->
    <RequiredPlugin pluginName="Sofa.Component.IntegrationSchemes.Backward"/> <!-- Needed to use components [EulerImplicitIntegrationScheme] -->
    <RequiredPlugin pluginName="Sofa.Component.SolidMechanics.FEM.Elastic"/> <!-- Needed to use components [TetrahedronFEMForceField] -->
    <RequiredPlugin pluginName="Sofa.Component.StateContainer"/> <!-- Needed to use components [MechanicalObject] -->
    <RequiredPlugin pluginName="Sofa.Component.Topology.Container.Grid"/> <!-- Needed to use components [RegularGridTopology] -->
    <RequiredPlugin pluginName="Sofa.Component.Visual"/> <!-- Needed to use components [VisualStyle] -->
    <RequiredPlugin pluginName="Sofa.GL.Component.Rendering3D"/> <!-- Needed to use components [OglModel] -->

    <VisualStyle displayFlags="hideBehaviorModels showForceFields showCollision showInteractionForceFields" />

    <DefaultAnimationLoop />
    <DefaultVisualManagerLoop />

    <CollisionPipeline verbose="0" />
    <BruteForceBroadPhase/>
    <BVHNarrowPhase/>

    <CollisionResponse name="Response" response="StickContactForceField" />
    <LocalMinDistance contactDistance="1" alarmDistance="2" />

    <Node name="cubeFEM">
        <EulerImplicitIntegrationScheme name="cg_odesolver" printLog="false"  rayleighStiffness="0.1" rayleighMass="0.1" />
        <CGLinearSolver iterations="25" name="linear solver" tolerance="1.0e-9" threshold="1.0e-9" />
        <RegularGridTopology nx="5" ny="5" nz="5" xmin="-3.5" xmax="3.5" ymin="-3.5" ymax="3.5" zmin="-3.5" zmax="3.5" />
        <MechanicalObject />
        <UniformMass vertexMass="0.25" />
        <TetrahedronFEMForceField name="FEM" youngModulus="25" poissonRatio="0.3" computeGlobalMatrix="false" updateStiffnessMatrix="false" method="large" />
        <Node name="Visu">
            <MeshOBJLoader name="meshLoader_0" filename="mesh/smCube125.obj" handleSeams="1" />
            <OglModel name="Visual" src="@meshLoader_0" color="red" />
            <SubsetMapping input="@.." output="@Visual" />
        </Node>
        <Node name="Surf">
            <VisualStyle displayFlags="hideCollision" />
            <SphereLoader name="SphereLoader-Surf" filename="mesh/smCube27b.sph" />
            <MechanicalObject position="@SphereLoader-Surf.position" />
            <SphereCollisionModel listRadius="@SphereLoader.listRadius" contactStiffness="10000"/>
            <BarycentricMapping />
        </Node>
    </Node>
    <SphereLoader name="SphereLoader-root" filename="mesh/floor.sph" />
    <MechanicalObject position="@SphereLoader-root.position" translation="0 -12.5 0" />
    <SphereCollisionModel name="Floor" listRadius="@SphereLoader-root.listRadius" simulated="0" moving="0" contactStiffness="10000" />
    <Node>
        <MeshOBJLoader name="meshLoader_1" filename="mesh/floor2.obj" translation="0 -12.5 0" handleSeams="1" />
        <OglModel name="FloorV" src="@meshLoader_1" texturename="textures/floor2.bmp" />
    </Node>
</Node>
