<?xml version="1.0"?>
<!-- BilateralLagrangianConstraint example using rigid-->
<Node name="root" dt="0.1" gravity="0 -0.981 0">
    <RequiredPlugin pluginName="Sofa.Component.AnimationLoop"/> <!-- Needed to use components [FreeMotionAnimationLoop] -->
    <RequiredPlugin pluginName="Sofa.Component.Collision.Geometry"/> <!-- Needed to use components [SphereCollisionModel] -->
    <RequiredPlugin pluginName="Sofa.Component.Constraint.Lagrangian.Correction"/> <!-- Needed to use components [LinearSolverConstraintCorrection] -->
    <RequiredPlugin pluginName="Sofa.Component.Constraint.Lagrangian.Model"/> <!-- Needed to use components [BilateralLagrangianConstraint] -->
    <RequiredPlugin pluginName="Sofa.Component.Constraint.Lagrangian.Solver"/> <!-- Needed to use components [GenericConstraintSolver] -->
    <RequiredPlugin pluginName="Sofa.Component.Constraint.Projective"/> <!-- Needed to use components [FixedProjectiveConstraint] -->
    <RequiredPlugin pluginName="Sofa.Component.LinearSolver.Direct"/> <!-- Needed to use components [BTDLinearSolver] -->
    <RequiredPlugin pluginName="Sofa.Component.Mapping.NonLinear"/> <!-- Needed to use components [RigidMapping] -->
    <RequiredPlugin pluginName="Sofa.Component.Mass"/> <!-- Needed to use components [UniformMass] -->
    <RequiredPlugin pluginName="Sofa.Component.IntegrationSchemes.Backward"/> <!-- Needed to use components [EulerImplicitIntegrationScheme] -->
    <RequiredPlugin pluginName="Sofa.Component.SolidMechanics.FEM.Elastic"/> <!-- Needed to use components [BeamFEMForceField] -->
    <RequiredPlugin pluginName="Sofa.Component.StateContainer"/> <!-- Needed to use components [MechanicalObject] -->
    <RequiredPlugin pluginName="Sofa.Component.Topology.Container.Constant"/> <!-- Needed to use components [MeshTopology] -->
    <RequiredPlugin pluginName="Sofa.Component.Visual"/> <!-- Needed to use components [VisualStyle] -->

    <VisualStyle displayFlags="showBehaviorModels showForceFields" />
    <FreeMotionAnimationLoop />
    <BlockGaussSeidelConstraintSolver tolerance="0.001" maxIterations="1000"/>
    <Node name="Beam1">
        <EulerImplicitIntegrationScheme name="odesolver" printLog="false"  rayleighStiffness="0.1" rayleighMass="0.1" />
        <BTDLinearSolver printLog="false" verbose="false" />
        <MechanicalObject template="Rigid3" name="DOFs1" position="0 0 0 0 0 0 1  1 0 0 0 0 0 1  2 0 0 0 0 0 1  3 0 0 0 0 0 1  4 0 0 0 0 0 1  5 0 0 0 0 0 1  6 0 0 0 0 0 1  7 0 0 0 0 0 1" />
        <MeshTopology name="lines" lines="0 1 1 2 2 3 3 4 4 5 5 6 6 7" />
        <UniformMass vertexMass="1 1 0.01 0 0 0 0.1 0 0 0 0.1 0" printLog="false" />
        <BeamFEMForceField name="FEM" poissonRatio="0.49" radius="0.1" youngModulus="2000000" />
        <FixedProjectiveConstraint name="FixedProjectiveConstraint" indices="7" />
        <LinearSolverConstraintCorrection />
         <SphereCollisionModel radius="0.1" group="1"/>
        <Node name="ConstraintPoint">
            <MechanicalObject template="Rigid3" name="dof1" position="0 0 0 0 0 -0.707107 0.707107 " />
            <RigidMapping index="0" />
        </Node>
    </Node>
    <Node name="Beam2">
        <EulerImplicitIntegrationScheme name="odesolver" printLog="false" />
        <BTDLinearSolver printLog="false" verbose="false" />
        <MechanicalObject template="Rigid3" name="DOFs2" position="0 0 0 0 0 -0.707107 0.707107 0 -1 0 0 0-0.707107 0.707107  0 -2 0 0 0 -0.707107 0.707107  0 -3 0 0 0 -0.707107 0.707107  0 -4 0 0 0 -0.707107 0.707107  0 -5 0 0 0 -0.707107 0.707107  0 -6 0 0 0 -0.707107 0.707107  0 -7 0 0 0 -0.707107 0.707107" />
        <MeshTopology name="lines" lines="0 1 1 2 2 3 3 4 4 5 5 6 6 7" />
        <UniformMass vertexMass="1 1 0.01 0 0 0 0.1 0 0 0 0.1 0" printLog="false" />
        <BeamFEMForceField name="FEM" poissonRatio="0.49" radius="0.1" youngModulus="20000000" />
        <LinearSolverConstraintCorrection />
        <SphereCollisionModel radius="0.1" group="1"/>
    </Node>
    <BilateralLagrangianConstraint template="Rigid3" object1="@Beam1/ConstraintPoint/dof1" object2="@Beam2/DOFs2" first_point="0" second_point="0" />
</Node>
