<?xml version="1.0"?>

<Node name="root" dt="0.01" gravity="0 0 -9.81">
    <Node name="plugins">
        <RequiredPlugin pluginName="Sofa.Component.AnimationLoop"/> <!-- Needed to use components [FreeMotionAnimationLoop] -->
        <RequiredPlugin pluginName="Sofa.Component.Collision.Detection.Algorithm"/> <!-- Needed to use components [BVHNarrowPhase BruteForceBroadPhase CollisionPipeline] -->
        <RequiredPlugin pluginName="Sofa.Component.Collision.Detection.Intersection"/> <!-- Needed to use components [NewProximityIntersection] -->
        <RequiredPlugin pluginName="Sofa.Component.Collision.Geometry"/> <!-- Needed to use components [TriangleCollisionModel] -->
        <RequiredPlugin pluginName="Sofa.Component.Collision.Response.Contact"/> <!-- Needed to use components [CollisionResponse] -->
        <RequiredPlugin pluginName="Sofa.Component.Constraint.Lagrangian.Correction"/> <!-- Needed to use components [LinearSolverConstraintCorrection] -->
        <RequiredPlugin pluginName="Sofa.Component.Constraint.Lagrangian.Solver"/> <!-- Needed to use components [GenericConstraintSolver] -->
        <RequiredPlugin pluginName="Sofa.Component.LinearSolver.Direct"/> <!-- Needed to use components [SparseLDLSolver] -->
        <RequiredPlugin pluginName="Sofa.Component.LinearSolver.Iterative"/> <!-- Needed to use components [PCGLinearSolver] -->
        <RequiredPlugin pluginName="Sofa.Component.Mapping.Linear"/> <!-- Needed to use components [IdentityMapping] -->
        <RequiredPlugin pluginName="Sofa.Component.Mass"/> <!-- Needed to use components [UniformMass] -->
        <RequiredPlugin pluginName="Sofa.Component.IntegrationSchemes.Backward"/> <!-- Needed to use components [EulerImplicitIntegrationScheme] -->
        <RequiredPlugin pluginName="Sofa.Component.SolidMechanics.FEM.Elastic"/> <!-- Needed to use components [TetrahedronFEMForceField] -->
        <RequiredPlugin pluginName="Sofa.Component.StateContainer"/> <!-- Needed to use components [MechanicalObject] -->
        <RequiredPlugin pluginName="Sofa.Component.Topology.Container.Dynamic"/> <!-- Needed to use components [TetrahedronSetTopologyContainer TetrahedronSetTopologyModifier TriangleSetTopologyContainer TriangleSetTopologyModifier] -->
        <RequiredPlugin pluginName="Sofa.Component.Topology.Container.Grid"/> <!-- Needed to use components [RegularGridTopology] -->
        <RequiredPlugin pluginName="Sofa.Component.Topology.Mapping"/> <!-- Needed to use components [Hexa2TetraTopologicalMapping Tetra2TriangleTopologicalMapping] -->
        <RequiredPlugin pluginName="Sofa.Component.Visual"/> <!-- Needed to use components [VisualStyle] -->
        <RequiredPlugin pluginName="Sofa.GL.Component.Rendering3D"/> <!-- Needed to use components [OglModel] -->
        <RequiredPlugin pluginName="Sofa.GUI.Component"/> <!-- Needed to use components [ConstraintAttachButtonSetting] -->
    </Node>

    <VisualStyle displayFlags="showForceFields"/>
    <ConstraintAttachButtonSetting /> <!-- The presence of this component sets the mouse interaction to Lagrangian-based constraints at the GUI launch -->
    <FreeMotionAnimationLoop />
    <ImprovedJacobiConstraintSolver maxIterations="3000" tolerance="1.0e-8"/>
    <CollisionPipeline name="Pipeline" />
    <BruteForceBroadPhase name="BroadPhase" />
    <BVHNarrowPhase name="NarrowPhase" />
    <CollisionResponse name="ContactManager" response="FrictionContactConstraint" responseParams="mu=0.5" />
    <NewProximityIntersection name="Intersection" alarmDistance="0.02" contactDistance="0.001" />

    <Node name="BEAMVOLUME">
        <RegularGridTopology name="HexaTop" n="6 6 6" min="0.2 0 0" max="0.3 0.1 0.1"/>
        <TetrahedronSetTopologyContainer name="Container" position="@HexaTop.position"/>
        <TetrahedronSetTopologyModifier name="Modifier"/>
        <Hexa2TetraTopologicalMapping input="@HexaTop" output="@Container" swapping="true"/>
    </Node>

    <Node name="FEM">
        <EulerImplicitIntegrationScheme firstOrder="false" rayleighMass="0.1" rayleighStiffness="0.1"/>
        <PCGLinearSolver preconditioner="@precond"/>
        <SparseLDLSolver name="precond" template="CompressedRowSparseMatrixMat3x3" parallelInverseProduct="true" />

        <TetrahedronSetTopologyContainer name="Container" position="@../BEAMVOLUME/HexaTop.position"
                                         tetrahedra="@../BEAMVOLUME/Container.tetrahedra"/>
        <TetrahedronSetTopologyModifier name="Modifier"/>

        <MechanicalObject name="mstate" template="Vec3d" src="@Container"/>
        <TetrahedronFEMForceField name="forceField" listening="true" youngModulus="6e4" poissonRatio="0.30" />
        <MeshMatrixMass totalMass="0.1"/>

        <Node name="Surface">
            <TriangleSetTopologyContainer name="Container"/>
            <TriangleSetTopologyModifier name="Modifier"/>
            <Tetra2TriangleTopologicalMapping input="@../Container" output="@Container" flipNormals="false"/>
            <MechanicalObject name="dofs" rest_position="@../mstate.rest_position"/>
            <TriangleCollisionModel name="Torus8CMT" contactDistance="0.001" color="0.94117647058824 0.93725490196078 0.89411764705882" />
            <Node name="Visual" activated="1">
                <TriangleSetTopologyContainer name="Container" src="@../Container"/>
                <OglModel color="1.0 0.1 0.2 1.0" name="visualModel"/>
                <IdentityMapping name="VisualMapping"/>
            </Node>
            <IdentityMapping name="SurfaceMapping"/>
        </Node>

        <LinearSolverConstraintCorrection linearSolver="@precond"/>

    </Node>

    <Node name="BEAMVOLUME2">
        <RegularGridTopology name="HexaTop" n="6 6 6" min="0.2 0 0.15" max="0.3 0.1 0.25"/>
        <TetrahedronSetTopologyContainer name="Container" position="@HexaTop.position"/>
        <TetrahedronSetTopologyModifier name="Modifier"/>
        <Hexa2TetraTopologicalMapping input="@HexaTop" output="@Container" swapping="true"/>
    </Node>


    <Node name="FEM2">
        <EulerImplicitIntegrationScheme firstOrder="false" rayleighMass="0.1" rayleighStiffness="0.1"/>
        <PCGLinearSolver preconditioner="@precond"/>
        <SparseLDLSolver name="precond" template="CompressedRowSparseMatrixMat3x3" parallelInverseProduct="true" />

        <TetrahedronSetTopologyContainer name="Container" position="@../BEAMVOLUME2/HexaTop.position"
                                         tetrahedra="@../BEAMVOLUME2/Container.tetrahedra"/>
        <TetrahedronSetTopologyModifier name="Modifier"/>

        <MechanicalObject name="mstate" template="Vec3d" src="@Container"/>
        <TetrahedronFEMForceField name="forceField" listening="true" youngModulus="2e4" poissonRatio="0.30" />
        <MeshMatrixMass totalMass="0.02"/>

        <Node name="Surface">
            <TriangleSetTopologyContainer name="Container"/>
            <TriangleSetTopologyModifier name="Modifier"/>
            <Tetra2TriangleTopologicalMapping input="@../Container" output="@Container" flipNormals="false"/>
            <MechanicalObject name="dofs" rest_position="@../mstate.rest_position"/>
            <TriangleCollisionModel name="Torus8CMT" contactDistance="0.001" color="0.94117647058824 0.93725490196078 0.89411764705882" />
            <Node name="Visual" activated="1">
                <TriangleSetTopologyContainer name="Container" src="@../Container"/>
                <OglModel color="0.1 0.2 1.0 1.0" name="visualModel"/>
                <IdentityMapping name="VisualMapping"/>
            </Node>
            <IdentityMapping name="SurfaceMapping"/>
        </Node>

        <LinearSolverConstraintCorrection linearSolver="@precond"/>

    </Node>


    <Node name="Floor" tags="NoBBox" >
        <VisualStyle displayFlags="showCollisionModels"/>
        <TriangleSetTopologyContainer name="FloorTopo" position="0.1 -0.1 -1     0.1 0.2 -1    0.4 0.2 -1     0.4 -0.1 -1
                                                                 0.1 -0.1 -1.2   0.1 0.2 -1.2  0.4 0.2 -1.2   0.4 -0.1 -1.2" triangles="0 2 1  0 3 2
                                                                                                                                      0 1 5  0 5 4
                                                                                                                                      0 4 7  0 7 3
                                                                                                                                      1 2 6  1 6 5
                                                                                                                                      3 7 6  3 6 2
                                                                                                                                      4 5 6  4 6 7" />
        <MechanicalObject template="Vec3"/>
        <TriangleCollisionModel name="FloorCM" contactDistance="0.001" moving="0" simulated="0" />
    </Node>

</Node>
