<?xml version="1.0" ?>
<Node name="root" dt="0.010" gravity="0 -10 0">
    <Node name="RequiredPlugins">
        <RequiredPlugin pluginName="Sofa.Component.AnimationLoop"/>
        <RequiredPlugin pluginName="Sofa.Component.Collision.Detection.Algorithm"/>
        <RequiredPlugin pluginName="Sofa.Component.Collision.Detection.Intersection"/>
        <RequiredPlugin pluginName="Sofa.Component.Collision.Geometry"/>
        <RequiredPlugin pluginName="Sofa.Component.Collision.Response.Contact"/>
        <RequiredPlugin pluginName="Sofa.Component.Constraint.Lagrangian.Correction"/>
        <RequiredPlugin pluginName="Sofa.Component.Constraint.Lagrangian.Solver"/>
        <RequiredPlugin pluginName="Sofa.Component.Constraint.Projective"/>
        <RequiredPlugin pluginName="Sofa.Component.Engine.Select"/>
        <RequiredPlugin pluginName="Sofa.Component.LinearSolver.Iterative"/>
        <RequiredPlugin pluginName="Sofa.Component.Mass"/>
        <RequiredPlugin pluginName="Sofa.Component.MechanicalLoad"/>
        <RequiredPlugin pluginName="Sofa.Component.IntegrationScheme.Backward"/>
        <RequiredPlugin pluginName="Sofa.Component.SolidMechanics.FEM.Elastic"/>
        <RequiredPlugin pluginName="Sofa.Component.StateContainer"/>
        <RequiredPlugin pluginName="Sofa.Component.Topology.Container.Grid"/>
        <RequiredPlugin pluginName="Sofa.Component.Visual"/>
        <RequiredPlugin pluginName="Sofa.Component.LinearSolver.Preconditioner"/>
        <RequiredPlugin pluginName="Sofa.Component.LinearSystem"/>
    </Node>

    <VisualStyle displayFlags="showBehaviorModels showForceFields showVisualModels showCollisionModels" />

    <FreeMotionAnimationLoop />
    <BlockGaussSeidelConstraintSolver tolerance="1e-6" maxIterations="1000" />

    <CollisionPipeline/>
    <BruteForceBroadPhase />
    <BVHNarrowPhase />
    <NewProximityIntersection name="proximity" alarmDistance="0.3" contactDistance="0.1"/>
    <CollisionResponse name="response" response="FrictionContactConstraint"/>

    <Node name="BeamPrecomputed">
        <Visual3DText text="PrecomputedConstraintCorrection" position="0 3 6" scale="0.4" color="0.3 0.7 1 1" />
        <EulerImplicitIntegrationScheme name="odeSolver" rayleighStiffness="0.01" rayleighMass="0.01" linearSolver="@linearSolver"/>

        <MatrixLinearSystem name="precondSystem" template="CompressedRowSparseMatrixd"/>
        <SSORPreconditioner name="precond" linearSystem="@precondSystem"/>

        <PreconditionedMatrixFreeSystem name="solverSystem" preconditionerSystem="@precondSystem"/>
        <PCGLinearSolver name="linearSolver" iterations="200" tolerance="1e-6" linearSystem="@solverSystem" preconditioner="@precond"/>

        <RegularGridTopology name="grid" n="10 3 3" min="0 0 5" max="10 2 7" />
        <MechanicalObject name="dofs" />

        <NodalMassDensity name="rho" property="1"/>
        <FEMMass template="Vec3,Hexahedron" nodalMassDensity="@rho" />
        <CorotationalFEMForceField template="Vec3,Hexahedron" name="FEM" youngModulus="1e4" poissonRatio="0.3" />

        <BoxROI name="boxFixed" box="-0.1 -0.1 4.9  0.1 2.1 7.1" drawBoxes="true" />
        <FixedProjectiveConstraint indices="@boxFixed.indices" />

        <PointCollisionModel />

        <PrecomputedConstraintCorrection recompute="true" printLog="true" ODESolver="@odeSolver" linearSolver="@linearSolver"/>
    </Node>

    <Node name="BeamLinearSolver">
        <Visual3DText text="LinearSolverConstraintCorrection" position="0 3 12" scale="0.4" color="0.3 0.7 1 1" />
        <EulerImplicitIntegrationScheme name="odeSolver" rayleighStiffness="0.01" rayleighMass="0.01" linearSolver="@linearSolver"/>

        <MatrixLinearSystem name="precondSystem" template="CompressedRowSparseMatrixd"/>
        <SSORPreconditioner name="precond" linearSystem="@precondSystem"/>

        <PreconditionedMatrixFreeSystem name="solverSystem" preconditionerSystem="@precondSystem"/>
        <PCGLinearSolver name="linearSolver" iterations="200" tolerance="1e-6" linearSystem="@solverSystem" preconditioner="@precond"/>

        <RegularGridTopology name="grid" n="10 3 3" min="0 0 9" max="10 2 11" />
        <MechanicalObject name="dofs" />

        <NodalMassDensity name="rho" property="1"/>
        <FEMMass template="Vec3,Hexahedron" nodalMassDensity="@rho" />
        <CorotationalFEMForceField template="Vec3,Hexahedron" name="FEM" youngModulus="1e4" poissonRatio="0.3" />

        <BoxROI name="boxFixed" box="-0.1 -0.1 8.9  0.1 2.1 11.1" drawBoxes="true" />
        <FixedProjectiveConstraint indices="@boxFixed.indices" />

        <PointCollisionModel />

        <LinearSolverConstraintCorrection ODESolver="@odeSolver" linearSolver="@precond"/>
    </Node>

    <Node name="Floor">
        <RegularGridTopology name="floor" n="5 1 5" min="5 -3 3.5" max="13 -3 11.5" />
        <MechanicalObject name="dofs" />
        <TriangleCollisionModel simulated="0" moving="0" />
    </Node>

</Node>
