<Node name="root" dt="0.02">
    <RequiredPlugin pluginName="Sofa.Component.Collision.Detection.Algorithm"/> <!-- Needed to use components [BVHNarrowPhase BruteForceBroadPhase CollisionPipeline] -->
    <RequiredPlugin pluginName="Sofa.Component.Collision.Detection.Intersection"/> <!-- Needed to use components [DiscreteIntersection] -->
    <RequiredPlugin pluginName="Sofa.Component.Collision.Geometry"/> <!-- Needed to use components [SphereCollisionModel] -->
    <RequiredPlugin pluginName="Sofa.Component.Collision.Response.Contact"/> <!-- Needed to use components [CollisionResponse] -->
    <RequiredPlugin pluginName="Sofa.Component.Constraint.Projective"/> <!-- Needed to use components [FixedProjectiveConstraint OscillatorProjectiveConstraint] -->
    <RequiredPlugin pluginName="Sofa.Component.IO.Mesh"/> <!-- Needed to use components [MeshGmshLoader MeshOBJLoader SphereLoader] -->
    <RequiredPlugin pluginName="Sofa.Component.LinearSolver.Iterative"/> <!-- Needed to use components [CGLinearSolver] -->
    <RequiredPlugin pluginName="Sofa.Component.Mapping.Linear"/> <!-- Needed to use components [BarycentricMapping] -->
    <RequiredPlugin pluginName="Sofa.Component.Mass"/> <!-- Needed to use components [DiagonalMass] -->
    <RequiredPlugin pluginName="Sofa.Component.IntegrationSchemes.Backward"/> <!-- Needed to use components [EulerImplicitIntegrationScheme] -->
    <RequiredPlugin pluginName="Sofa.Component.SolidMechanics.FEM.Elastic"/> <!-- Needed to use components [TetrahedralCorotationalFEMForceField] -->
    <RequiredPlugin pluginName="Sofa.Component.StateContainer"/> <!-- Needed to use components [MechanicalObject] -->
    <RequiredPlugin pluginName="Sofa.Component.Topology.Container.Dynamic"/> <!-- Needed to use components [TetrahedronSetGeometryAlgorithms TetrahedronSetTopologyContainer] -->
    <RequiredPlugin pluginName="Sofa.GL.Component.Rendering3D"/> <!-- Needed to use components [OglModel] -->

    <DefaultAnimationLoop/>
    <CollisionPipeline verbose="0" name="CollisionPipeline" />
    <BruteForceBroadPhase/>
    <BVHNarrowPhase/>
    <CollisionResponse response="PenalityContactForceField" name="collision response" />
    <DiscreteIntersection />

    <Node name="Liver" depend="topo dofs">
        <MeshGmshLoader name="meshLoader0" filename="mesh/liver.msh" />

        <EulerImplicitIntegrationScheme name="cg_odesolver" printLog="false"  rayleighStiffness="0.1" rayleighMass="0.1" />
        <CGLinearSolver iterations="25" name="linear solver" tolerance="1.0e-9" threshold="1.0e-9" />
        <MechanicalObject name="dofs" src="@meshLoader0" />
        <!-- Container for the tetrahedra-->
        <TetrahedronSetTopologyContainer name="topo" src="@meshLoader0" />
        <!-- Algorithms: used in DiagonalMass to compute the mass -->
        <TetrahedronSetGeometryAlgorithms name="GeomAlgo" template="Vec3" />
        <DiagonalMass massDensity="1" name="computed using mass density" />
        <TetrahedralCorotationalFEMForceField name="FEM" youngModulus="3000" poissonRatio="0.3" computeGlobalMatrix="false" method="large" />
        <FixedProjectiveConstraint name="FixedProjectiveConstraint" indices="3 39 64" />
        <!-- Moving dof 15 along the X around a min pos  (2,0,0) with an amplitude of (1,0,0), 5 in pulsation, and 10 in phase -->
        <OscillatorProjectiveConstraint name="OscillatingConstraint" oscillators="15 2 0 0 1 0 0 5 10" />
        <Node name="Visu">
            <MeshOBJLoader name="meshLoader_0" filename="mesh/liver-smooth.obj" handleSeams="1" />
            <OglModel name="VisualModel" src="@meshLoader_0" color="red" />
            <BarycentricMapping input="@.." output="@VisualModel" name="visual mapping" />
        </Node>
        <Node name="Surf">
	    <SphereLoader filename="mesh/liver.sph" />
            <MechanicalObject position="@[-1].position" />
            <SphereCollisionModel name="CollisionModel" listRadius="@[-2].listRadius" />
            <BarycentricMapping name="sphere mapping" />
        </Node>
    </Node>
</Node>
