<Node name="root" dt="0.02">
    <RequiredPlugin name="Sofa.Component.Collision.Detection.Algorithm"/> <!-- Needed to use components [BVHNarrowPhase BruteForceBroadPhase CollisionPipeline] -->
    <RequiredPlugin name="Sofa.Component.Collision.Detection.Intersection"/> <!-- Needed to use components [DiscreteIntersection] -->
    <RequiredPlugin name="Sofa.Component.Collision.Geometry"/> <!-- Needed to use components [SphereCollisionModel] -->
    <RequiredPlugin name="Sofa.Component.Collision.Response.Contact"/> <!-- Needed to use components [DefaultContactManager] -->
    <RequiredPlugin name="Sofa.Component.Constraint.Projective"/> <!-- Needed to use components [PartialFixedConstraint] -->
    <RequiredPlugin name="Sofa.Component.IO.Mesh"/> <!-- Needed to use components [MeshGmshLoader MeshOBJLoader SphereLoader] -->
    <RequiredPlugin name="Sofa.Component.LinearSolver.Iterative"/> <!-- Needed to use components [CGLinearSolver] -->
    <RequiredPlugin name="Sofa.Component.Mapping.Linear"/> <!-- Needed to use components [BarycentricMapping] -->
    <RequiredPlugin name="Sofa.Component.Mass"/> <!-- Needed to use components [UniformMass] -->
    <RequiredPlugin name="Sofa.Component.ODESolver.Backward"/> <!-- Needed to use components [EulerImplicitSolver] -->
    <RequiredPlugin name="Sofa.Component.SolidMechanics.FEM.Elastic"/> <!-- Needed to use components [TetrahedronFEMForceField] -->
    <RequiredPlugin name="Sofa.Component.StateContainer"/> <!-- Needed to use components [MechanicalObject] -->
    <RequiredPlugin name="Sofa.Component.Topology.Container.Constant"/> <!-- Needed to use components [MeshTopology] -->
    <RequiredPlugin name="Sofa.Component.Visual"/> <!-- Needed to use components [VisualStyle] -->
    <RequiredPlugin name="Sofa.GL.Component.Rendering3D"/> <!-- Needed to use components [OglModel] -->

    <DefaultAnimationLoop/>
    <VisualStyle displayFlags="showBehaviorModels" />
    <CollisionPipeline verbose="0" name="CollisionPipeline" />
    <BruteForceBroadPhase/>
    <BVHNarrowPhase/>
    <DefaultContactManager response="PenalityContactForceField" name="collision response" />
    <DiscreteIntersection />
    <Node name="Liver">
        <EulerImplicitSolver name="cg_odesolver" printLog="false" rayleighMass="0"  rayleighStiffness="0.1" />
        <CGLinearSolver iterations="25" name="linear solver" tolerance="1.0e-9" threshold="1.0e-9" />
        <MeshGmshLoader name="loader" filename="mesh/liver.msh" />
        <MeshTopology src="@loader" />
        <MechanicalObject src="@loader" template="Vec3d" name="dofs" />
        <UniformMass name="mass" vertexMass="0.05" />
        <TetrahedronFEMForceField name="FEM" youngModulus="500" poissonRatio="0.3" computeGlobalMatrix="false" method="large" />
        <PartialFixedConstraint name="partialFixedConstraint" indices="3 39 64" fixedDirections="0 1 1" />
        <Node name="Visu">
            <MeshOBJLoader name="meshLoader_0" filename="mesh/liver-smooth.obj" handleSeams="1" />
            <OglModel name="VisualModel" src="@meshLoader_0" color="red" />
            <BarycentricMapping input="@.." output="@VisualModel" name="visual mapping" />
        </Node>
        <Node name="Surf">
	    <SphereLoader filename="mesh/liver.sph" />
            <MechanicalObject position="@[-1].position" />
            <SphereCollisionModel listRadius="@[-2].listRadius" />
            <BarycentricMapping name="sphere mapping" />
        </Node>
    </Node>
</Node>
