<?xml version="1.0"?>
<Node 	name="root" gravity="0 0 0" dt="0.05"  >
    <RequiredPlugin pluginName="Sofa.Component.Constraint.Projective"/> <!-- Needed to use components [FixedProjectiveConstraint PlaneProjectiveConstraint] -->
    <RequiredPlugin pluginName="Sofa.Component.Engine.Select"/> <!-- Needed to use components [BoxROI] -->
    <RequiredPlugin pluginName="Sofa.Component.LinearSolver.Iterative"/> <!-- Needed to use components [CGLinearSolver] -->
    <RequiredPlugin pluginName="Sofa.Component.Mass"/> <!-- Needed to use components [UniformMass] -->
    <RequiredPlugin pluginName="Sofa.Component.MechanicalLoad"/> <!-- Needed to use components [TrianglePressureForceField] -->
    <RequiredPlugin pluginName="Sofa.Component.IntegrationSchemes.Backward"/> <!-- Needed to use components [EulerImplicitIntegrationScheme] -->
    <RequiredPlugin pluginName="Sofa.Component.SolidMechanics.FEM.Elastic"/> <!-- Needed to use components [TetrahedronFEMForceField] -->
    <RequiredPlugin pluginName="Sofa.Component.StateContainer"/> <!-- Needed to use components [MechanicalObject] -->
    <RequiredPlugin pluginName="Sofa.Component.Topology.Container.Dynamic"/> <!-- Needed to use components [TetrahedronSetGeometryAlgorithms TetrahedronSetTopologyContainer TetrahedronSetTopologyModifier TriangleSetGeometryAlgorithms TriangleSetTopologyContainer TriangleSetTopologyModifier] -->
    <RequiredPlugin pluginName="Sofa.Component.Topology.Container.Grid"/> <!-- Needed to use components [RegularGridTopology] -->
    <RequiredPlugin pluginName="Sofa.Component.Topology.Mapping"/> <!-- Needed to use components [Hexa2TetraTopologicalMapping Tetra2TriangleTopologicalMapping] -->
    <RequiredPlugin pluginName="Sofa.Component.Visual"/> <!-- Needed to use components [VisualStyle] -->
    <VisualStyle displayFlags="hideVisualModels showBehavior" />

    <DefaultAnimationLoop />

    <RegularGridTopology name="grid" nx="3" ny="3" nz="3" xmin="0" xmax="1" ymin="0" ymax="1" zmin="0" zmax="1" />

    <Node 	name="Square"  >
        <EulerImplicitIntegrationScheme name="Euler Implicit" rayleighStiffness="0.5"  rayleighMass="0.5"  />
        <CGLinearSolver template="GraphScattered" name="CG Solver" iterations="40" tolerance="1e-06" threshold="1e-10" />

        <MechanicalObject template="Vec3" name="mObject1"  position="@../grid.position" />

        <TetrahedronSetTopologyContainer name="Container" />
        <TetrahedronSetTopologyModifier name="Modifier" />
        <TetrahedronSetGeometryAlgorithms template="Vec3" name="GeomAlgo" swapping="true"/>

        <Hexa2TetraTopologicalMapping name="Mapping"  input="@../grid"  output="@Container" />

        <TetrahedronFEMForceField template="Vec3" name="FEM" method="large" poissonRatio="0.3" youngModulus="500" />
        <UniformMass totalMass="1" />
        <BoxConstraint box="-0.05 -0.05 -0.05    0.05 0.05 0.05" drawBoxes="0"  />
        <BoxROI box="-0.05 -0.05 -0.05    0.05 1.05 1.05" drawBoxes="1" name="ProjectToPlane"/>
        <PlaneProjectiveConstraint normal="1 0 0" indices="@[-1].indices" drawSize="0.03" />
        <Node 	name="Boundary Edges"  >
            <TriangleSetTopologyContainer name="Container" />
            <TriangleSetTopologyModifier name="Modifier" />
            <TriangleSetGeometryAlgorithms template="Vec3" name="GeomAlgo"  drawTriangles="1" />
            <Tetra2TriangleTopologicalMapping name="Mapping"  input="@../Container"  output="@Container" />
            <BoxROI box="0.95 -0.05 -0.05    1.05 1.05 1.05" drawBoxes="1" position="@../mObject1.rest_position" drawTriangles="0" triangles="@Container.triangles" name="pressureBox" />
            <TrianglePressureForceField template="Vec3" showForces="1" pressure="10 10 0" triangleList="@pressureBox.triangleIndices"/>
        </Node>
    </Node>
</Node>
