<?xml version="1.0"?>
<Node 	name="root" gravity="0 -1 0" dt="0.05"  >
    <RequiredPlugin pluginName="Sofa.Component.Collision.Detection.Algorithm"/> <!-- Needed to use components [BVHNarrowPhase BruteForceBroadPhase CollisionPipeline] -->
    <RequiredPlugin pluginName="Sofa.Component.Collision.Detection.Intersection"/> <!-- Needed to use components [MinProximityIntersection] -->
    <RequiredPlugin pluginName="Sofa.Component.Collision.Geometry"/> <!-- Needed to use components [LineCollisionModel PointCollisionModel TriangleCollisionModel] -->
    <RequiredPlugin pluginName="Sofa.Component.Collision.Response.Contact"/> <!-- Needed to use components [CollisionResponse] -->
    <RequiredPlugin pluginName="Sofa.Component.Constraint.Projective"/> <!-- Needed to use components [PositionBasedDynamicsProjectiveConstraint] -->
    <RequiredPlugin pluginName="Sofa.Component.Engine.Analyze"/> <!-- Needed to use components [ClusteringEngine ShapeMatching] -->
    <RequiredPlugin pluginName="Sofa.Component.IO.Mesh"/> <!-- Needed to use components [MeshOBJLoader] -->
    <RequiredPlugin pluginName="Sofa.Component.LinearSolver.Iterative"/> <!-- Needed to use components [CGLinearSolver] -->
    <RequiredPlugin pluginName="Sofa.Component.Mapping.Linear"/> <!-- Needed to use components [IdentityMapping] -->
    <RequiredPlugin pluginName="Sofa.Component.Mass"/> <!-- Needed to use components [UniformMass] -->
    <RequiredPlugin pluginName="Sofa.Component.IntegrationSchemes.Backward"/> <!-- Needed to use components [EulerImplicitIntegrationScheme] -->
    <RequiredPlugin pluginName="Sofa.Component.StateContainer"/> <!-- Needed to use components [MechanicalObject] -->
    <RequiredPlugin pluginName="Sofa.Component.Topology.Container.Constant"/> <!-- Needed to use components [MeshTopology] -->
    <RequiredPlugin pluginName="Sofa.Component.Visual"/> <!-- Needed to use components [VisualStyle] -->
    <RequiredPlugin pluginName="Sofa.GL.Component.Rendering3D"/> <!-- Needed to use components [OglModel] -->

    <DefaultAnimationLoop/>
    <VisualStyle displayFlags="showBehaviorModels showForceFields" />
    <CollisionPipeline verbose="0" draw="0" />
    <BruteForceBroadPhase/>
    <BVHNarrowPhase/>
    <MinProximityIntersection name="Proximity" alarmDistance="0.8" contactDistance="0.5" />
    <CollisionResponse name="Response" response="PenalityContactForceField" />
	<Node 	name="dragon"  >
		<EulerImplicitIntegrationScheme name="cg_odesolver" printLog="false"  rayleighStiffness="0.1" rayleighMass="0.1" />
		<CGLinearSolver iterations="25" name="linear solver" tolerance="1.0e-9" threshold="1.0e-9" />
		<MeshOBJLoader name="loader" filename="mesh/dragon.obj" />
		<MeshTopology name="topo" src="@loader" />
		<MechanicalObject name="dofs" src="@loader" scale="1" dz="10" />
		<UniformMass vertexMass="3" />

		<ClusteringEngine template="Vec3" name="clustering" radius='1'  number='50' position="@topo.position"/>
		<ShapeMatching template="Vec3" name="shapeMatching" iterations='1' position="@dofs.position" cluster="@clustering.cluster"/>
	 	<PositionBasedDynamicsProjectiveConstraint template="Vec3" stiffness = '1' position="@shapeMatching.targetPosition"/>

        <Node name="Visu">
            <MeshOBJLoader name="meshLoader_1" filename="mesh/dragon.obj" handleSeams="1" />
            <OglModel name="Visual" src="@meshLoader_1" color="red" dz="10" />
            <IdentityMapping input="@.." output="@Visual" />
        </Node>
        <Node name="Surf">
            <MeshOBJLoader name="loader" filename="mesh/dragon.obj" />
            <MeshTopology src="@loader" />
            <MechanicalObject src="@loader" dz="10" />
            <TriangleCollisionModel contactStiffness="1000" />
            <LineCollisionModel contactStiffness="1000" />
            <PointCollisionModel contactStiffness="1000" />
            <IdentityMapping />
        </Node>
	</Node>
    <Node name="Floor">
        <MeshOBJLoader name="loader" filename="mesh/floor3.obj" />
        <MeshTopology src="@loader" />
        <MechanicalObject src="@loader" dy="-10" scale="1.75" />
        <TriangleCollisionModel name="FloorTriangle" simulated="0" moving="0" />
        <LineCollisionModel name="FloorLine" simulated="0" moving="0" />
        <PointCollisionModel name="FloorPoint" simulated="0" moving="0" />
        <MeshOBJLoader name="meshLoader_0" filename="mesh/floor3.obj" scale="1.75" handleSeams="1" />
        <OglModel name="FloorV" src="@meshLoader_0" texturename="textures/brushed_metal.bmp" dy="-10" />
    </Node>
</Node>
