<Node name="Scene" gravity="0 0 0" dt="0.1" >
    <RequiredPlugin pluginName="Sofa.Component.Engine.Generate"/> <!-- Needed to use components [MergeMeshes] -->
    <RequiredPlugin pluginName="Sofa.Component.IO.Mesh"/> <!-- Needed to use components [MeshOBJLoader] -->
    <RequiredPlugin pluginName="Sofa.Component.LinearSolver.Iterative"/> <!-- Needed to use components [CGLinearSolver] -->
    <RequiredPlugin pluginName="Sofa.Component.Mass"/> <!-- Needed to use components [UniformMass] -->
    <RequiredPlugin pluginName="Sofa.Component.IntegrationSchemes.Backward"/> <!-- Needed to use components [EulerImplicitIntegrationScheme] -->
    <RequiredPlugin pluginName="Sofa.Component.StateContainer"/> <!-- Needed to use components [MechanicalObject] -->
    <RequiredPlugin pluginName="Sofa.Component.Topology.Container.Constant"/> <!-- Needed to use components [MeshTopology] -->
    <RequiredPlugin pluginName="Sofa.Component.Visual"/> <!-- Needed to use components [VisualStyle] -->

    <DefaultAnimationLoop/>
	<VisualStyle displayFlags="showBehavior" />
    <EulerImplicitIntegrationScheme  rayleighStiffness="0.1" rayleighMass="0.1" />
    <CGLinearSolver iterations="25" tolerance="1e-05" threshold="1e-05"/>
    <Node>
        <MeshOBJLoader name="frog" filename="mesh/frog.obj" />
        <MeshOBJLoader name="dragon" filename="mesh/dragon.obj" />

        <MergeMeshes name="basis" nbMeshes="2"
                     position1="@frog.position"
                     triangles1="@frog.triangles"
                     position2="@dragon.position"
                     triangles2="@dragon.triangles"
                     />

        <MeshTopology src="@basis" drawTriangles="1"/>
        <MechanicalObject showObject="1"/>
        <UniformMass totalMass="1.0"/>
    </Node>
</Node>
