<?xml version="1.0" ?>
<Node name="Root" gravity="0 0 0" dt="0.02">
    <RequiredPlugin pluginName="Sofa.Component.Collision.Detection.Algorithm"/> <!-- Needed to use components [BVHNarrowPhase BruteForceBroadPhase CollisionPipeline] -->
    <RequiredPlugin pluginName="Sofa.Component.Collision.Detection.Intersection"/> <!-- Needed to use components [MinProximityIntersection] -->
    <RequiredPlugin pluginName="Sofa.Component.Collision.Geometry"/> <!-- Needed to use components [TriangleCollisionModel] -->
    <RequiredPlugin pluginName="Sofa.Component.Collision.Response.Contact"/> <!-- Needed to use components [CollisionResponse] -->
    <RequiredPlugin pluginName="Sofa.Component.Constraint.Projective"/> <!-- Needed to use components [FixedProjectiveConstraint] -->
    <RequiredPlugin pluginName="Sofa.Component.Engine.Select"/> <!-- Needed to use components [BoxROI ValuesFromPositions] -->
    <RequiredPlugin pluginName="Sofa.Component.LinearSolver.Iterative"/> <!-- Needed to use components [CGLinearSolver] -->
    <RequiredPlugin pluginName="Sofa.Component.Mass"/> <!-- Needed to use components [UniformMass] -->
    <RequiredPlugin pluginName="Sofa.Component.IntegrationSchemes.Backward"/> <!-- Needed to use components [EulerImplicitIntegrationScheme] -->
    <RequiredPlugin pluginName="Sofa.Component.SolidMechanics.FEM.Elastic"/> <!-- Needed to use components [TetrahedronFEMForceField] -->
    <RequiredPlugin pluginName="Sofa.Component.StateContainer"/> <!-- Needed to use components [MechanicalObject] -->
    <RequiredPlugin pluginName="Sofa.Component.Topology.Container.Dynamic"/> <!-- Needed to use components [TetrahedronSetGeometryAlgorithms TetrahedronSetTopologyContainer TetrahedronSetTopologyModifier] -->
    <RequiredPlugin pluginName="Sofa.Component.Topology.Container.Grid"/> <!-- Needed to use components [RegularGridTopology] -->
    <RequiredPlugin pluginName="Sofa.Component.Topology.Mapping"/> <!-- Needed to use components [Hexa2TetraTopologicalMapping] -->
    <RequiredPlugin pluginName="Sofa.Component.Visual"/> <!-- Needed to use components [VisualStyle] -->

    <DefaultAnimationLoop/>
    <VisualStyle displayFlags="showVisual showBehaviorModels showForceFields showCollision showMapping" />
    <CollisionPipeline name="DefaultCollisionPipeline" verbose="0" draw="0" depth="6" />
    <BruteForceBroadPhase/>
    <BVHNarrowPhase/>
    <MinProximityIntersection name="Proximity" alarmDistance="0.3" contactDistance="0.2" />
    <CollisionResponse name="Response" response="PenalityContactForceField" />
    <Node name="Cube" gravity="0 -9.81 0">
        <EulerImplicitIntegrationScheme name="cg_odesolver" printLog="0"  rayleighStiffness="0.1" rayleighMass="0.1" />
        <CGLinearSolver template="GraphScattered" name="linear solver" iterations="25" tolerance="1e-09" threshold="1e-09" />
        <RegularGridTopology name="grid" n="6 6 6" min="-10 -10 -10" max="10 10 10" p0="-10 -10 -10" />
        <MechanicalObject template="Vec3" name="mecaObj" src="@grid"/>
        <UniformMass name="default25" vertexMass="0.25" />
        <TetrahedronFEMForceField template="Vec3" name="FEM" method="large" poissonRatio="0.4" youngModulus="1000" computeGlobalMatrix="0" />
        <BoxROI template="Vec3" name="box_roi" box="-11 -11 -11 11 -9 11" indices="0" drawSize="0" />
        <FixedProjectiveConstraint template="Vec3" name="default27" indices="@box_roi.indices" drawSize="0" />
        <Node name="Tetra" gravity="0 -9.81 0">
            <TetrahedronSetTopologyContainer name="Container" />
            <TetrahedronSetTopologyModifier name="Modifier" />
            <TetrahedronSetGeometryAlgorithms template="Vec3" name="GeomAlgo" />
            <TriangleCollisionModel template="Vec3" name="default30" />
            <Hexa2TetraTopologicalMapping name="default28" input="@../grid" output="@Container" />
            <Node name="interpol" gravity="0 -9.81 0">
                <ValuesFromPositions template="Vec3" direction="1 1 0" position="@../../mecaObj.position" fieldType="Vector" drawVectors="1" drawVectorLength="5" />
            </Node>
        </Node>
    </Node>
</Node>
