<Node name="root" gravity="0 0 -9.81" dt="0.05">
    <RequiredPlugin pluginName="Sofa.Component.Collision.Detection.Algorithm"/> <!-- Needed to use components [BVHNarrowPhase BruteForceBroadPhase CollisionPipeline] -->
    <RequiredPlugin pluginName="Sofa.Component.Collision.Detection.Intersection"/> <!-- Needed to use components [MinProximityIntersection] -->
    <RequiredPlugin pluginName="Sofa.Component.Collision.Response.Contact"/> <!-- Needed to use components [CollisionResponse] -->
    <RequiredPlugin pluginName="Sofa.Component.Engine.Transform"/> <!-- Needed to use components [TransformPosition] -->
    <RequiredPlugin pluginName="Sofa.Component.IO.Mesh"/> <!-- Needed to use components [MeshOBJLoader] -->
    <RequiredPlugin pluginName="Sofa.Component.LinearSolver.Iterative"/> <!-- Needed to use components [CGLinearSolver] -->
    <RequiredPlugin pluginName="Sofa.Component.Mapping.Linear"/> <!-- Needed to use components [BarycentricMapping] -->
    <RequiredPlugin pluginName="Sofa.Component.Mass"/> <!-- Needed to use components [UniformMass] -->
    <RequiredPlugin pluginName="Sofa.Component.MechanicalLoad"/> <!-- Needed to use components [PlaneForceField] -->
    <RequiredPlugin pluginName="Sofa.Component.IntegrationSchemes.Backward"/> <!-- Needed to use components [EulerImplicitIntegrationScheme] -->
    <RequiredPlugin pluginName="Sofa.Component.SolidMechanics.FEM.Elastic"/> <!-- Needed to use components [HexahedronFEMForceField] -->
    <RequiredPlugin pluginName="Sofa.Component.StateContainer"/> <!-- Needed to use components [MechanicalObject] -->
    <RequiredPlugin pluginName="Sofa.Component.Topology.Container.Grid"/> <!-- Needed to use components [SparseGridTopology] -->
    <RequiredPlugin pluginName="Sofa.Component.Visual"/> <!-- Needed to use components [VisualStyle] -->
    <RequiredPlugin pluginName="Sofa.GL.Component.Rendering3D"/> <!-- Needed to use components [OglModel] -->

    <DefaultAnimationLoop/>
    <VisualStyle displayFlags="showVisual showBehaviorModels" />
    <CollisionPipeline name="DefaultCollisionPipeline" verbose="0" draw="0" depth="6" />
    <BruteForceBroadPhase/>
    <BVHNarrowPhase/>
    <MinProximityIntersection name="Proximity" alarmDistance="3" contactDistance="2" />
    <CollisionResponse name="Response" response="PenalityContactForceField" />
    <Node name="Object" gravity="0 -9.81 0">
        <EulerImplicitIntegrationScheme name="Implicit Euler Solver"  rayleighStiffness="0.1" rayleighMass="0.1" />
        <CGLinearSolver  name="Conjugate Gradient" tolerance="1e-05" threshold="1e-05" iterations="5"/>
        <SparseGridTopology name="grid" fileTopology="mesh/dragon.obj" n="7 6 5" />
        <TransformPosition name="transfo" method="fromFile" filename="transfo.tfm" input_position="@grid.position"/>
        <MechanicalObject  name="Particles" restScale="1" position="@transfo.output_position" />
        <UniformMass  name="Mass" totalMass="1.0"/>
        <PlaneForceField  name="Plane" normal="0 0 1" d="-10" />
        <HexahedronFEMForceField  name="FEM" youngModulus="200" poissonRatio="0.45"/>
        <Node name="VisualNode" gravity="0 -9.81 0">
            <MeshOBJLoader name="meshLoader_0" filename="mesh/dragon.obj" handleSeams="1" />
            <OglModel name="Objective" src="@meshLoader_0" />
            <BarycentricMapping  name="Visual Mapping" output="@Objective"  />
        </Node>
    </Node>
    <Node name="Floor">
        <MeshOBJLoader name="ObjLoader" filename="mesh/floor.obj" />
        <OglModel name="VisualModel" src="@./ObjLoader" translation="0 0 -9" rotation="90 0 0"/>
    </Node>
</Node>
