<!-- For more details see: https://wiki.sofa-framework.org/tdev/wiki/Notes/NewLoaderArchitecture -->
<Node name="Root" gravity="0 -9.81 0" dt="0.02">
    <RequiredPlugin name="Sofa.Component.Collision.Detection.Algorithm"/> <!-- Needed to use components [BVHNarrowPhase BruteForceBroadPhase CollisionPipeline] -->
    <RequiredPlugin name="Sofa.Component.Collision.Detection.Intersection"/> <!-- Needed to use components [MinProximityIntersection] -->
    <RequiredPlugin name="Sofa.Component.Collision.Response.Contact"/> <!-- Needed to use components [CollisionResponse] -->
    <RequiredPlugin name="Sofa.Component.IO.Mesh"/> <!-- Needed to use components [MeshOffLoader] -->
    <RequiredPlugin name="Sofa.Component.LinearSolver.Iterative"/> <!-- Needed to use components [CGLinearSolver] -->
    <RequiredPlugin name="Sofa.Component.ODESolver.Backward"/> <!-- Needed to use components [EulerImplicitSolver] -->
    <RequiredPlugin name="Sofa.Component.StateContainer"/> <!-- Needed to use components [MechanicalObject] -->
    <RequiredPlugin name="Sofa.Component.Topology.Container.Dynamic"/> <!-- Needed to use components [TriangleSetGeometryAlgorithms TriangleSetTopologyContainer TriangleSetTopologyModifier] -->
    <RequiredPlugin name="Sofa.Component.Visual"/> <!-- Needed to use components [VisualStyle] -->
    <RequiredPlugin name="Sofa.GL.Component.Rendering3D"/> <!-- Needed to use components [OglModel] -->

    <DefaultAnimationLoop/>
    <VisualStyle displayFlags="showVisual showBehaviorModels showForceFields showCollision showMapping" />
    <CollisionPipeline name="DefaultCollisionPipeline" verbose="0" draw="0" depth="6" />
    <BruteForceBroadPhase/>
    <BVHNarrowPhase/>
    <MinProximityIntersection name="Proximity" alarmDistance="0.3" contactDistance="0.2" />
    <CollisionResponse name="Response" response="PenalityContactForceField" />
    <Node name="Off file">
        <EulerImplicitSolver name="cg_odesolver" printLog="false"  rayleighStiffness="0.1" rayleighMass="0.1" />
        <CGLinearSolver iterations="25" name="linear solver" tolerance="1.0e-9" threshold="1.0e-9" />
        <MeshOffLoader name="offLoader" filename="mesh/aneurysm3D_1.off" />
        <MechanicalObject name="dofs" scale="1" src="@offLoader" />
        <TriangleSetTopologyContainer name="topo" src="@offLoader" />
        <TriangleSetTopologyModifier name="modif" />
        <TriangleSetGeometryAlgorithms name="triGeo" />
        <OglModel name="VisualModel" src="@offLoader" color="red" />
    </Node>
</Node>
