<Node name="root" dt="0.02" gravity="0 -10 0">
    <RequiredPlugin pluginName="Sofa.Component.Constraint.Projective"/> <!-- Needed to use components [FixedProjectiveConstraint] -->
    <RequiredPlugin pluginName="Sofa.Component.IO.Mesh"/> <!-- Needed to use components [VisualModelOBJExporter] -->
    <RequiredPlugin pluginName="Sofa.Component.LinearSolver.Direct"/> <!-- Needed to use components [SparseLDLSolver] -->
    <RequiredPlugin pluginName="Sofa.Component.LinearSolver.Iterative"/> <!-- Needed to use components [CGLinearSolver] -->
    <RequiredPlugin pluginName="Sofa.Component.Mapping.Linear"/> <!-- Needed to use components [IdentityMapping] -->
    <RequiredPlugin pluginName="Sofa.Component.Mass"/> <!-- Needed to use components [UniformMass] -->
    <RequiredPlugin pluginName="Sofa.Component.IntegrationSchemes.Backward"/> <!-- Needed to use components [EulerImplicitIntegrationScheme] -->
    <RequiredPlugin pluginName="Sofa.Component.SolidMechanics.FEM.Elastic"/> <!-- Needed to use components [HexahedronFEMForceField] -->
    <RequiredPlugin pluginName="Sofa.Component.StateContainer"/> <!-- Needed to use components [MechanicalObject] -->
    <RequiredPlugin pluginName="Sofa.Component.Topology.Container.Grid"/> <!-- Needed to use components [RegularGridTopology] -->
    <RequiredPlugin pluginName="Sofa.GL.Component.Rendering3D"/> <!-- Needed to use components [OglModel] -->

    <DefaultAnimationLoop />

    <Node name="M1">
        <EulerImplicitIntegrationScheme name="cg_odesolver" printLog="false"  rayleighStiffness="0.1" rayleighMass="0.1" />
        <SparseLDLSolver printLog="false"/>
        <CGLinearSolver tolerance="1e-5" iterations="1000" threshold="1.0e-9" />
        <MechanicalObject template="Vec3d" />
        <UniformMass totalMass="100" />
        <RegularGridTopology nx="4" ny="4" nz="40" xmin="-9" xmax="-6" ymin="0" ymax="3" zmin="0" zmax="19" />
        <FixedProjectiveConstraint template="Vec3d" indices="0 1 2 3 4 5 6 7 8 9 10 11 12 13 14 15" />
        <HexahedronFEMForceField template="Vec3d" name="FEM" youngModulus="4000" poissonRatio="0.3" method="large" />
        <Node name="Visual">
            <OglModel name="visual" />
            <VisualModelOBJExporter filename="beam_surface_output" printLog="true" exportAtBegin="true" exportEveryNumberOfSteps="5" />
            <IdentityMapping />
        </Node>
    </Node>
</Node>
