<Node>
	<RequiredPlugin pluginName="Sofa.Component.IO.Mesh"/> <!-- Needed to use components [VoxelGridLoader] -->
	<RequiredPlugin pluginName="Sofa.Component.LinearSolver.Iterative"/> <!-- Needed to use components [CGLinearSolver] -->
	<RequiredPlugin pluginName="Sofa.Component.IntegrationSchemes.Backward"/> <!-- Needed to use components [EulerImplicitIntegrationScheme] -->
	<RequiredPlugin pluginName="Sofa.Component.StateContainer"/> <!-- Needed to use components [MechanicalObject] -->
	<RequiredPlugin pluginName="Sofa.Component.Topology.Container.Dynamic"/> <!-- Needed to use components [HexahedronSetGeometryAlgorithms HexahedronSetTopologyContainer] -->

	<DefaultAnimationLoop/>
	<EulerImplicitIntegrationScheme  rayleighStiffness="0.1" rayleighMass="0.1" />
	<CGLinearSolver  iterations="25" tolerance="1e-5" threshold="1e-5"/>
	<Node>
		<VoxelGridLoader name="gridloader" filename="textures/Test_64_64_4.raw" voxelSize="0.1 0.1 0.1" resolution="64 64 4" bgValue="0" />
		<HexahedronSetTopologyContainer src="@gridloader" />
		<HexahedronSetGeometryAlgorithms drawHexa="1"/>
		<MechanicalObject showObject="1"/>
	</Node>
</Node>
