<Node name="root" gravity="-9.81 0 0" dt="0.01">
    <RequiredPlugin pluginName="Sofa.Component.Constraint.Projective"/> <!-- Needed to use components [FixedProjectiveConstraint] -->
    <RequiredPlugin pluginName="Sofa.Component.LinearSolver.Direct"/> <!-- Needed to use components [EigenSimplicialLDLT] -->
    <RequiredPlugin pluginName="Sofa.Component.Mass"/> <!-- Needed to use components [MeshMatrixMass] -->
    <RequiredPlugin pluginName="Sofa.Component.IntegrationScheme.Backward"/> <!-- Needed to use components [NewtonRaphsonSolver] -->
    <RequiredPlugin pluginName="Sofa.Component.SolidMechanics.Spring"/> <!-- Needed to use components [SpringForceField] -->
    <RequiredPlugin pluginName="Sofa.Component.StateContainer"/> <!-- Needed to use components [MechanicalObject] -->
    <RequiredPlugin pluginName="Sofa.Component.Visual"/> <!-- Needed to use components [VisualStyle] -->
    <RequiredPlugin pluginName="Sofa.GL.Component.Rendering3D"/> <!-- Needed to use components [OglCylinderModel] -->
    <RequiredPlugin pluginName="Sofa.Component.Topology.Container.Dynamic"/> <!-- Needed to use components [EdgeSetTopologyContainer] -->

    <VisualStyle displayFlags="showWireframe showVisual showBehaviorModels showForceFields" />
    <DefaultAnimationLoop/>
    <VisualGrid size="2"/>
    <LineAxis size="2"/>

    <Node name="BDF-1">

        <BDFIntegrationScheme order="1" printLog="false" rayleighMass="0.01" rayleighStiffness="0.01"/>
        <EigenSimplicialLDLT template="CompressedRowSparseMatrix"/>

        <MechanicalObject name="dofs" template="Vec1" position="1 " rest_position="0" showObject="true" showObjectScale="20"/>
        <PointSetTopologyContainer name="topologyContainer" position="1"/>
        <UniformMass totalMass="1" topology="@topologyContainer"/>
        <RestShapeSpringsForceField points="0"/>
    </Node>

    <Node name="BDF-2">

        <BDFIntegrationScheme order="2" printLog="false" rayleighMass="0.01" rayleighStiffness="0.01"/>
        <EigenSimplicialLDLT template="CompressedRowSparseMatrix"/>

        <MechanicalObject name="dofs" template="Vec1" position="1 " rest_position="0" showObject="true" showObjectScale="20"/>
        <PointSetTopologyContainer name="topologyContainer" position="1"/>
        <UniformMass totalMass="1" topology="@topologyContainer"/>
        <RestShapeSpringsForceField points="0"/>
    </Node>

    <Node name="BDF-3">

        <BDFIntegrationScheme order="3" printLog="false" rayleighMass="0.01" rayleighStiffness="0.01"/>
        <EigenSimplicialLDLT template="CompressedRowSparseMatrix"/>

        <MechanicalObject name="dofs" template="Vec1" position="1 " rest_position="0" showObject="true" showObjectScale="20"/>
        <PointSetTopologyContainer name="topologyContainer" position="1"/>
        <UniformMass totalMass="1" topology="@topologyContainer"/>
        <RestShapeSpringsForceField points="0"/>
    </Node>

</Node>
