<Node name="root" gravity="0 -9.81 0" dt="0.01">

    <Node name="plugins">
        <RequiredPlugin pluginName="Sofa.Component.Constraint.Projective"/> <!-- Needed to use components [FixedProjectiveConstraint] -->
        <RequiredPlugin pluginName="Sofa.Component.LinearSolver.Direct"/> <!-- Needed to use components [EigenSimplicialLDLT] -->
        <RequiredPlugin pluginName="Sofa.Component.Mass"/> <!-- Needed to use components [UniformMass] -->
        <RequiredPlugin pluginName="Sofa.Component.IntegrationSchemes.Backward"/> <!-- Needed to use components [BDFIntegrationScheme NewtonRaphsonSolver] -->
        <RequiredPlugin pluginName="Sofa.Component.SolidMechanics.Spring"/> <!-- Needed to use components [SpringForceField] -->
        <RequiredPlugin pluginName="Sofa.Component.StateContainer"/> <!-- Needed to use components [MechanicalObject] -->
        <RequiredPlugin pluginName="Sofa.Component.Topology.Container.Dynamic"/> <!-- Needed to use components [EdgeSetTopologyContainer] -->
        <RequiredPlugin pluginName="Sofa.Component.Visual"/> <!-- Needed to use components [LineAxis VisualGrid VisualStyle] -->
    </Node>

    <VisualStyle displayFlags="showWireframe showVisual showBehaviorModels showForceFields" />
    <DefaultAnimationLoop/>
    <VisualGrid size="2"/>
    <LineAxis size="2"/>

    <Node name="BDF-1">

        <BDFIntegrationScheme order="1" printLog="false" rayleighMass="0.01" rayleighStiffness="0.01"/>
        <NewtonRaphsonSolver name="newton" printLog="false" maxNbIterationsNewton="4" maxNbIterationsLineSearch="2" absoluteResidualStoppingThreshold="1e-6"/>
        <EigenSimplicialLDLT template="CompressedRowSparseMatrix"/>

        <MechanicalObject name="dofs" template="Vec3" position="0 0 0  1 1 0 " showObject="true" showObjectScale="20"/>
        <EdgeSetTopologyContainer name="topologyContainer" edges="0 1" position="@dofs.position"/>
        <UniformMass totalMass="15" topology="@topologyContainer"/>
        <SpringForceField spring="0 1 1000 0 1"/>
        <FixedProjectiveConstraint indices="0" />

    </Node>

    <Node name="BDF-2">

        <BDFIntegrationScheme order="2" printLog="false" rayleighMass="0.01" rayleighStiffness="0.01"/>
        <NewtonRaphsonSolver name="newton" printLog="false" maxNbIterationsNewton="4" maxNbIterationsLineSearch="2" absoluteResidualStoppingThreshold="1e-6"/>
        <EigenSimplicialLDLT template="CompressedRowSparseMatrix"/>

        <MechanicalObject name="dofs" template="Vec3" position="0 0 0  1 1 0 " showObject="true" showObjectScale="20"/>
        <EdgeSetTopologyContainer name="topologyContainer" edges="0 1" position="@dofs.position"/>
        <UniformMass totalMass="15" topology="@topologyContainer"/>
        <SpringForceField spring="0 1 1000 0 1"/>
        <FixedProjectiveConstraint indices="0" />

    </Node>

    <Node name="BDF-3">

        <BDFIntegrationScheme order="3" printLog="false" rayleighMass="0.01" rayleighStiffness="0.01"/>
        <NewtonRaphsonSolver name="newton" printLog="false" maxNbIterationsNewton="4" maxNbIterationsLineSearch="2" absoluteResidualStoppingThreshold="1e-6"/>
        <EigenSimplicialLDLT template="CompressedRowSparseMatrix"/>

        <MechanicalObject name="dofs" template="Vec3" position="0 0 0  1 1 0 " showObject="true" showObjectScale="20"/>
        <EdgeSetTopologyContainer name="topologyContainer" edges="0 1" position="@dofs.position"/>
        <UniformMass totalMass="15" topology="@topologyContainer"/>
        <SpringForceField spring="0 1 1000 0 1"/>
        <FixedProjectiveConstraint indices="0" />

    </Node>
</Node>
