<Node name="root" gravity="-1.8 0 100" dt="0.02">
    <RequiredPlugin pluginName="Sofa.Component.Constraint.Projective"/> <!-- Needed to use components [FixedProjectiveConstraint] -->
    <RequiredPlugin pluginName="Sofa.Component.IO.Mesh"/> <!-- Needed to use components [MeshGmshLoader MeshOBJLoader] -->
    <RequiredPlugin pluginName="Sofa.Component.LinearSolver.Direct"/> <!-- Needed to use components [SparseLDLSolver] -->
    <RequiredPlugin pluginName="Sofa.Component.LinearSolver.Iterative"/> <!-- Needed to use components [CGLinearSolver] -->
    <RequiredPlugin pluginName="Sofa.Component.Mapping.Linear"/> <!-- Needed to use components [BarycentricMapping] -->
    <RequiredPlugin pluginName="Sofa.Component.Mass"/> <!-- Needed to use components [UniformMass] -->
    <RequiredPlugin pluginName="Sofa.Component.IntegrationSchemes.Backward"/> <!-- Needed to use components [NewmarkIntegrationScheme] -->
    <RequiredPlugin pluginName="Sofa.Component.SolidMechanics.FEM.Elastic"/> <!-- Needed to use components [TetrahedronFEMForceField] -->
    <RequiredPlugin pluginName="Sofa.Component.SolidMechanics.Spring"/> <!-- Needed to use components [MeshSpringForceField] -->
    <RequiredPlugin pluginName="Sofa.Component.StateContainer"/> <!-- Needed to use components [MechanicalObject] -->
    <RequiredPlugin pluginName="Sofa.Component.Topology.Container.Constant"/> <!-- Needed to use components [MeshTopology] -->
    <RequiredPlugin pluginName="Sofa.GL.Component.Rendering3D"/> <!-- Needed to use components [OglModel] -->
    <DefaultAnimationLoop/>

    <Node name="Reference">
        <MeshOBJLoader name="meshLoader_0" filename="mesh/truthcylinder1-bent.obj" scale="0.95" handleSeams="1" />
        <OglModel src="@meshLoader_0" dx="0" dy="-1" dz="0" color="green" />
    </Node>
    <Node name="Springs">
        <NewmarkIntegrationScheme rayleighMass="0" rayleighStiffness="0.1" />
        <SparseLDLSolver/>
        <MeshGmshLoader name="loader" filename="mesh/truthcylinder1.msh" />
        <MeshTopology src="@loader" />
        <MechanicalObject src="@loader" dx="15" />
        <UniformMass totalMass="15" />
        <FixedProjectiveConstraint indices="0 1 2 3 4 5 6 7 8 9 10 11 12 13 14 15 16 17 18 19 20 21 22 23 24 25 26 27 28 29 30 31 32 33 34 35 36 37 38 39 40 41 42 43 44 45 46 47 268 269 270 271 343 345" />
        <MeshSpringForceField name="Spring" tetrasStiffness="1870" tetrasDamping="0" />

        <Node>
            <MeshOBJLoader name="meshLoader_3" filename="mesh/truthcylinder1.obj" handleSeams="1" />
            <OglModel name="Visual" src="@meshLoader_3" color="yellow" dx="15" />
            <BarycentricMapping input="@.." output="@Visual" />
        </Node>
    </Node>

    <Node name="CoFEM">
        <NewmarkIntegrationScheme rayleighMass="0" rayleighStiffness="0.1" />
        <CGLinearSolver iterations="100" tolerance="1e-5" threshold="1e-5"/>
        <MeshGmshLoader name="loader" filename="mesh/truthcylinder1.msh"/>
        <MeshTopology src="@loader" />
        <MechanicalObject src="@loader" dx="30" />
        <UniformMass totalMass="15" />
        <FixedProjectiveConstraint indices="0 1 2 3 4 5 6 7 8 9 10 11 12 13 14 15 16 17 18 19 20 21 22 23 24 25 26 27 28 29 30 31 32 33 34 35 36 37 38 39 40 41 42 43 44 45 46 47 268 269 270 271 343 345" />
        <TetrahedronFEMForceField name="FEM" youngModulus="1116" poissonRatio="0.49" method="polar" />

        <Node>
            <MeshOBJLoader name="meshLoader_2" filename="mesh/truthcylinder1.obj" handleSeams="1" />
            <OglModel name="Visual" src="@meshLoader_2" color="cyan" dx="30" />
            <BarycentricMapping input="@.." output="@Visual" />
        </Node>
    </Node>
    <Node name="LinearFEM">
        <NewmarkIntegrationScheme rayleighMass="0" rayleighStiffness="0.1" />
        <CGLinearSolver iterations="100" tolerance="1e-5" threshold="1e-5"/>
        <MeshGmshLoader name="loader" filename="mesh/truthcylinder1.msh"/>
        <MeshTopology src="@loader" />
        <MechanicalObject src="@loader" dx="45" />
        <UniformMass totalMass="15" />
        <FixedProjectiveConstraint indices="0 1 2 3 4 5 6 7 8 9 10 11 12 13 14 15 16 17 18 19 20 21 22 23 24 25 26 27 28 29 30 31 32 33 34 35 36 37 38 39 40 41 42 43 44 45 46 47 268 269 270 271 343 345" />
        <TetrahedronFEMForceField name="FEM" youngModulus="1116" poissonRatio="0.49" method="small" />

        <Node>
            <MeshOBJLoader name="meshLoader_1" filename="mesh/truthcylinder1.obj" handleSeams="1" />
            <OglModel name="Visual" src="@meshLoader_1" color="red" dx="45" />
            <BarycentricMapping input="@.." output="@Visual" />
        </Node>
    </Node>
</Node>
