<?xml version="1.0"?>
<Node name="root" dt="0.02" gravity="0 0 0">

    <RequiredPlugin pluginName="Sofa.Component.Collision.Detection.Algorithm"/> <!-- Needed to use components [BVHNarrowPhase BruteForceBroadPhase CollisionPipeline] -->
    <RequiredPlugin pluginName="Sofa.Component.Collision.Detection.Intersection"/> <!-- Needed to use components [DiscreteIntersection] -->
    <RequiredPlugin pluginName="Sofa.Component.Collision.Geometry"/> <!-- Needed to use components [SphereCollisionModel] -->
    <RequiredPlugin pluginName="Sofa.Component.Collision.Response.Contact"/> <!-- Needed to use components [CollisionResponse] -->
    <RequiredPlugin pluginName="Sofa.Component.IO.Mesh"/> <!-- Needed to use components [GridMeshCreator] -->
    <RequiredPlugin pluginName="Sofa.Component.LinearSolver.Iterative"/> <!-- Needed to use components [CGLinearSolver] -->
    <RequiredPlugin pluginName="Sofa.Component.Mapping.Linear"/> <!-- Needed to use components [SubsetMultiMapping] -->
    <RequiredPlugin pluginName="Sofa.Component.Mass"/> <!-- Needed to use components [UniformMass] -->
    <RequiredPlugin pluginName="Sofa.Component.MechanicalLoad"/> <!-- Needed to use components [ConstantForceField] -->
    <RequiredPlugin pluginName="Sofa.Component.ODESolver.Backward"/> <!-- Needed to use components [EulerImplicitSolver] -->
    <RequiredPlugin pluginName="Sofa.Component.StateContainer"/> <!-- Needed to use components [MechanicalObject] -->
    <RequiredPlugin pluginName="Sofa.Component.Topology.Container.Constant"/> <!-- Needed to use components [MeshTopology] -->
    <RequiredPlugin pluginName="Sofa.Component.Visual"/> <!-- Needed to use components [VisualStyle] -->

    <VisualStyle displayFlags="showBehaviorModels showCollisionModels showForceFields" />

    <CollisionPipeline/>
    <BruteForceBroadPhase/>
    <BVHNarrowPhase/>
    <CollisionResponse response="PenalityContactForceField" />
    <DiscreteIntersection/>
    <DefaultAnimationLoop/>


    <EulerImplicitSolver  rayleighStiffness="0.1" rayleighMass="0.1" />
    <CGLinearSolver iterations="25" tolerance="1e-5" threshold="1e-5"/>


    <Node name="object1">
        <GridMeshCreator name="loader" filename="nofile" resolution="2 2" />
        <MeshTopology src="@loader" />
        <MechanicalObject template="Vec3" src="@loader" name="dof1" />

        <Node name="object2">
            <GridMeshCreator name="loader" filename="nofile" resolution="2 2" translation="2 0 0" />
            <MeshTopology src="@loader" />
            <MechanicalObject template="Vec3" src="@loader"  name="dof2"/>

            <Node name="concatenation">
                <MechanicalObject template="Vec3" name="dofall" showObject="1"/>
                <SubsetMultiMapping template="Vec3,Vec3" input="@../../dof1 @../dof2" output="@./dofall" indexPairs="0 0 0 1 1 0 1 1"/>
                <SphereCollisionModel radius="0.3" selfCollision="1"/>
                <UniformMass vertexMass="1" />
                <ConstantForceField indices="0" forces="1 0 0"/>
            </Node>

        </Node>

    </Node>

    <!--    converting  Rigid -> Vec in SubsetMultiMapping  -->
    <Node name="rigid1" activated="1">
        <GridMeshCreator name="loader" filename="nofile" resolution="2 2"  translation="0 2 0"/>
        <MeshTopology src="@loader" />
        <MechanicalObject template="Rigid3" src="@loader" name="dof1" />

        <Node name="origid2">
            <GridMeshCreator name="loader" filename="nofile" resolution="2 2" translation="2 2 0" />
            <MeshTopology src="@loader" />
            <MechanicalObject template="Rigid3" src="@loader"  name="dof2"/>

            <Node name="concatenation">
                <MechanicalObject template="Vec3" name="dofall" showObject="1"/>
                <SubsetMultiMapping template="Rigid3,Vec3" input="@../../dof1 @../dof2" output="@./dofall" indexPairs="0 0 0 1 1 0 1 1"/>
                <SphereCollisionModel radius="0.3" selfCollision="1"/>
                <UniformMass vertexMass="1" />
                <ConstantForceField indices="0" forces="1 0 0"/>
            </Node>

        </Node>

    </Node>


</Node>
