<?xml version="1.0" ?>
<Node name="root" gravity="0 -9.81 0" dt="0.05">

    <Node name="plugins">
        <RequiredPlugin pluginName="Sofa.Component.AnimationLoop"/> <!-- Needed to use components [FreeMotionAnimationLoop] -->
        <RequiredPlugin pluginName="Sofa.Component.Constraint.Lagrangian.Correction"/> <!-- Needed to use components [GenericConstraintCorrection] -->
        <RequiredPlugin pluginName="Sofa.Component.Constraint.Lagrangian.Solver"/> <!-- Needed to use components [GenericConstraintSolver] -->
        <RequiredPlugin pluginName="Sofa.Component.Constraint.Projective"/> <!-- Needed to use components [FixedProjectiveConstraint] -->
        <RequiredPlugin pluginName="Sofa.Component.Engine.Select"/> <!-- Needed to use components [BoxROI] -->
        <RequiredPlugin pluginName="Sofa.Component.LinearSolver.Direct"/> <!-- Needed to use components [EigenSimplicialLDLT] -->
        <RequiredPlugin pluginName="Sofa.Component.Mapping.Linear"/> <!-- Needed to use components [IdentityMapping] -->
        <RequiredPlugin pluginName="Sofa.Component.Mapping.NonLinear"/> <!-- Needed to use components [AreaMapping] -->
        <RequiredPlugin pluginName="Sofa.Component.Mass"/> <!-- Needed to use components [MeshMatrixMass] -->
        <RequiredPlugin pluginName="Sofa.Component.IntegrationScheme.Backward"/> <!-- Needed to use components [EulerImplicitIntegrationScheme] -->
        <RequiredPlugin pluginName="Sofa.Component.SolidMechanics.FEM.Elastic"/> <!-- Needed to use components [TriangleFEMForceField] -->
        <RequiredPlugin pluginName="Sofa.Component.SolidMechanics.Spring"/> <!-- Needed to use components [RestShapeSpringsForceField] -->
        <RequiredPlugin pluginName="Sofa.Component.StateContainer"/> <!-- Needed to use components [MechanicalObject] -->
        <RequiredPlugin pluginName="Sofa.Component.Topology.Container.Dynamic"/> <!-- Needed to use components [TriangleSetTopologyContainer] -->
        <RequiredPlugin pluginName="Sofa.Component.Topology.Container.Grid"/> <!-- Needed to use components [RegularGridTopology] -->
        <RequiredPlugin pluginName="Sofa.Component.Visual"/> <!-- Needed to use components [VisualStyle] -->
        <RequiredPlugin pluginName="Sofa.GL.Component.Rendering2D"/> <!-- Needed to use components [OglColorMap] -->
        <RequiredPlugin pluginName="Sofa.GL.Component.Rendering3D"/> <!-- Needed to use components [DataDisplay OglModel] -->
    </Node>

    <FreeMotionAnimationLoop solveVelocityConstraintFirst="true" computeBoundingBox="false" parallelODESolving="true"/>
    <BlockGaussSeidelConstraintSolver tolerance="1e-9" maxIterations="1000"/>
    <VisualStyle displayFlags="showWireframe showBehaviorModels"/>

    <RegularGridTopology name="grid" nx="10" ny="10" nz="1" xmin="0" xmax="10" ymin="0" ymax="10" zmin="0" zmax="0" />

    <Node name="withAreaConstraints">
        <EulerImplicitIntegrationScheme name="odeSolver" rayleighStiffness="0.1" rayleighMass="0.1" />
        <EigenSimplicialLDLT name="linearSolver" template="CompressedRowSparseMatrixMat3x3d"/>

        <TriangleSetTopologyContainer src="@../grid" name="topology"/>
        <MechanicalObject template="Vec3" name="DoFs"/>
        <GenericConstraintCorrection />

        <MeshMatrixMass totalMass="1000" />

        <BoxROI box="-1 9.9 -1 11 10.1 1" name="roi"/>
        <FixedProjectiveConstraint indices="@roi.indices" />
        <TriangleFEMForceField name="FEM1" youngModulus="5000" poissonRatio="0.3" method="large" topology="@topology"/>

        <Node name="constraintSpace">
            <MechanicalObject template="Vec1" name="areaDoFs"/>
            <AreaMapping name="areaMapping" topology="@../topology" geometricStiffness="Exact" applyRestPosition="true"/>

            <Node name="cellAveraging">
                <MechanicalObject template="Vec1" name="areaOnVerticesDoFs"/>
                <CellAveragingMapping input="@../areaDoFs" output="@areaOnVerticesDoFs" topology="@../../topology" applyRestPosition="true"/>
                <UniformLagrangianConstraint template="Vec1d" iterative="true" />
<!--                <RestShapeSpringsForceField template="Vec1" stiffness="15000"/>-->
            </Node>

        </Node>

        <Node name="Visu">
            <VisualStyle displayFlags="hideWireframe"/>
            <DataDisplay name="Visual" triangleData="@../constraintSpace/areaDoFs.position"/>
            <OglColorMap colorScheme="HSV" showLegend="true" legendTitle="Triangle area" min="@Visual.currentMin" max="@Visual.currentMax"/>
            <IdentityMapping input="@.." output="@Visual" />
        </Node>
    </Node>

    <Node name="noConstraints">
        <EulerImplicitIntegrationScheme name="odeSolver" rayleighStiffness="0.1" rayleighMass="0.1" />
        <EigenSimplicialLDLT name="linearSolver" template="CompressedRowSparseMatrixMat3x3d"/>

        <TriangleSetTopologyContainer src="@../grid" name="topology"/>
        <MechanicalObject template="Vec3" name="DoFs"/>
        <GenericConstraintCorrection />

        <MeshMatrixMass totalMass="1000" />

        <BoxROI box="-1 9.9 -1 11 10.1 1" name="roi"/>
        <FixedProjectiveConstraint indices="@roi.indices" />
        <TriangleFEMForceField name="FEM1" youngModulus="5000" poissonRatio="0.3" method="large" topology="@topology"/>

        <Node name="constraintSpace">
            <MechanicalObject template="Vec1" name="areaDoFs"/>
            <AreaMapping name="areaMapping" topology="@../topology"/>
        </Node>

        <Node name="Visu">
            <OglModel name="Visual" color="darkgray" />
            <IdentityMapping input="@.." output="@Visual" />
        </Node>
    </Node>
</Node>
