<?xml version="1.0" ?>
<Node name="Root" gravity="0 0 0" time="0" animate="0" bbox="-1 -1 -1 1 1 1">
    <RequiredPlugin pluginName="Sofa.Component.Constraint.Projective"/> <!-- Needed to use components [PartialFixedProjectiveConstraint] -->
    <RequiredPlugin pluginName="Sofa.Component.LinearSolver.Iterative"/> <!-- Needed to use components [CGLinearSolver] -->
    <RequiredPlugin pluginName="Sofa.Component.Mapping.NonLinear"/> <!-- Needed to use components [RigidMapping] -->
    <RequiredPlugin pluginName="Sofa.Component.Mass"/> <!-- Needed to use components [UniformMass] -->
    <RequiredPlugin pluginName="Sofa.Component.MechanicalLoad"/> <!-- Needed to use components [ConstantForceField] -->
    <RequiredPlugin pluginName="Sofa.Component.IntegrationSchemes.Backward"/> <!-- Needed to use components [StaticEquilibriumIntegrationScheme] -->
    <RequiredPlugin pluginName="Sofa.Component.StateContainer"/> <!-- Needed to use components [MechanicalObject] -->
    <RequiredPlugin pluginName="Sofa.Component.Visual"/> <!-- Needed to use components [VisualStyle] -->
    <VisualStyle displayFlags="showBehaviorModels showMapping" />
    <DefaultAnimationLoop/>

    <Node name="parent node with independent DOFs">
        <!-- 		<EulerImplicitIntegrationScheme name="ODE solver" printLog="0"  verbose="0" rayleighStiffness="0.0" rayleighMass="0"/> -->
        <StaticEquilibriumIntegrationScheme name="ODE solver" printLog="0" />
        <CGLinearSolver template="GraphScattered" name="linear solver used by implicit ODE solvers" printLog="0" iterations="25" tolerance="1e-5" threshold="1e-5"/>
        <MechanicalObject template="Rigid2" />
        <PartialFixedProjectiveConstraint fixedDirections="1 1 0" />
        <UniformMass template="Rigid2" name="mass" totalMass="1.0"/>
        <Node name="child node with DOFs mapped from the parent">
            <MechanicalObject template="Vec2" name="endpoint coordinates" position="1 0 "  />
            <RigidMapping template="" name="angle-coord mapping" input="@.." output="@." index="0" />
            <ConstantForceField forces="1 -1" indices="0" />
        </Node>
    </Node>
</Node>
