<?xml version="1.0"?>
<Node name="root" dt="0.01" gravity="0 -9.81 0">

    <Node name="plugins">
        <RequiredPlugin pluginName="Sofa.Component.Constraint.Projective"/> <!-- Needed to use components [FixedProjectiveConstraint] -->
        <RequiredPlugin pluginName="Sofa.Component.Engine.Select"/> <!-- Needed to use components [BoxROI] -->
        <RequiredPlugin pluginName="Sofa.Component.LinearSolver.Direct"/> <!-- Needed to use components [SparseLDLSolver] -->
        <RequiredPlugin pluginName="Sofa.Component.LinearSolver.Iterative"/> <!-- Needed to use components [CGLinearSolver] -->
        <RequiredPlugin pluginName="Sofa.Component.LinearSolver.Ordering"/> <!-- Needed to use components [NaturalOrderingMethod] -->
        <RequiredPlugin pluginName="Sofa.Component.LinearSystem"/> <!-- Needed to use components [ConstantSparsityPatternSystem] -->
        <RequiredPlugin pluginName="Sofa.Component.Mass"/> <!-- Needed to use components [MeshMatrixMass] -->
        <RequiredPlugin pluginName="Sofa.Component.IntegrationScheme.Backward"/> <!-- Needed to use components [EulerImplicitIntegrationScheme] -->
        <RequiredPlugin pluginName="Sofa.Component.SolidMechanics.FEM.Elastic"/>
        <RequiredPlugin pluginName="Sofa.Component.StateContainer"/> <!-- Needed to use components [MechanicalObject] -->
        <RequiredPlugin pluginName="Sofa.Component.Topology.Container.Dynamic"/> <!-- Needed to use components [TetrahedronSetGeometryAlgorithms,TetrahedronSetTopologyContainer,TetrahedronSetTopologyModifier] -->
        <RequiredPlugin pluginName="Sofa.Component.Topology.Container.Grid"/> <!-- Needed to use components [RegularGridTopology] -->
        <RequiredPlugin pluginName="Sofa.Component.Topology.Mapping"/> <!-- Needed to use components [Hexa2TetraTopologicalMapping] -->
        <RequiredPlugin pluginName="Sofa.Component.Visual"/> <!-- Needed to use components [LineAxis,VisualGrid,VisualStyle] -->
        <RequiredPlugin pluginName="Sofa.GL.Component.Rendering3D"/> <!-- Needed to use components [OglSceneFrame] -->
    </Node>

    <DefaultAnimationLoop parallelODESolving="true"/>
    <VisualStyle displayFlags="showBehaviorModels showForceFields" />

    <VisualGrid size="0.1"/>
    <LineAxis size="0.1"/>
    <OglSceneFrame/>

    <Node name="consistent">
        <Visual3DText text="consistent mass" position="-0.09 0.03 0" scale="0.01" color="teal"/>
        <EulerImplicitIntegrationScheme name="backward_Euler" rayleighStiffness="0.1" rayleighMass="0.1" />

        <ConstantSparsityPatternSystem template="CompressedRowSparseMatrix" name="A" checkIndices="false"/>
        <NaturalOrderingMethod/>
        <SparseLDLSolver name="linear_solver" template="CompressedRowSparseMatrix"/>

        <RegularGridTopology name="grid" min="-0.03 -0.01 0" max="-0.01 0.01 0.2" n="5 5 30"/>
        <MechanicalObject template="Vec3" name="state" showObject="true"/>

        <NodalMassDensity property="1100"/>
        <FEMMass template="Vec3,Hexahedron" lumping="false"/>

        <CorotationalFEMForceField name="FEM" template="Vec3,Hexahedron"
                                   youngModulus="1e5" poissonRatio="0.45" topology="@grid"
                                   computeForceStrategy="sequenced" computeForceDerivStrategy="sequenced"/>

        <BoxROI template="Vec3" name="box_roi" box="-0.031 -0.011 -0.0001   -0.009 0.011 0.0001" drawBoxes="1" />
        <FixedProjectiveConstraint template="Vec3" indices="@box_roi.indices" />
    </Node>

    <Node name="lumped">
        <Visual3DText text="lumped mass" position="0.01 0.03 0" scale="0.01" color="orange"/>
        <EulerImplicitIntegrationScheme name="backward_Euler" rayleighStiffness="0.1" rayleighMass="0.1" />

        <ConstantSparsityPatternSystem template="CompressedRowSparseMatrix" name="A" checkIndices="false"/>
        <NaturalOrderingMethod/>
        <SparseLDLSolver name="linear_solver" template="CompressedRowSparseMatrix"/>

        <RegularGridTopology name="grid" min="0.01 -0.01 0" max="0.03 0.01 0.2" n="5 5 30"/>
        <MechanicalObject template="Vec3" name="state" showObject="true"/>

        <NodalMassDensity property="1100"/>
        <FEMMass template="Vec3,Hexahedron" lumping="true"/>

        <CorotationalFEMForceField name="FEM" template="Vec3,Hexahedron"
                                   youngModulus="1e5" poissonRatio="0.45" topology="@grid"
                                   computeForceStrategy="sequenced" computeForceDerivStrategy="sequenced"/>

        <BoxROI template="Vec3" name="box_roi" box="0.009 -0.011 -0.0001   0.031 0.011 0.0001" drawBoxes="1" />
        <FixedProjectiveConstraint template="Vec3" indices="@box_roi.indices" />
    </Node>
</Node>
