<!-- Mechanical BoxConstantForceField Example -->
<Node name="root" dt="0.05" gravity="0 0 0">
    <RequiredPlugin pluginName="Sofa.Component.Engine.Select"/> <!-- Needed to use components [BoxROI] -->
    <RequiredPlugin pluginName="Sofa.Component.LinearSolver.Iterative"/> <!-- Needed to use components [CGLinearSolver] -->
    <RequiredPlugin pluginName="Sofa.Component.Mapping.Linear"/> <!-- Needed to use components [IdentityMapping] -->
    <RequiredPlugin pluginName="Sofa.Component.Mass"/> <!-- Needed to use components [UniformMass] -->
    <RequiredPlugin pluginName="Sofa.Component.MechanicalLoad"/> <!-- Needed to use components [ConstantForceField] -->
    <RequiredPlugin pluginName="Sofa.Component.IntegrationScheme.Backward"/> <!-- Needed to use components [EulerImplicitIntegrationScheme] -->
    <RequiredPlugin pluginName="Sofa.Component.SolidMechanics.FEM.Elastic"/> <!-- Needed to use components [TriangleFEMForceField] -->
    <RequiredPlugin pluginName="Sofa.Component.StateContainer"/> <!-- Needed to use components [MechanicalObject] -->
    <RequiredPlugin pluginName="Sofa.Component.Topology.Container.Constant"/> <!-- Needed to use components [MeshTopology] -->
    <RequiredPlugin pluginName="Sofa.Component.Visual"/> <!-- Needed to use components [VisualStyle] -->
    <RequiredPlugin pluginName="Sofa.GL.Component.Rendering3D"/> <!-- Needed to use components [OglModel] -->

    <VisualStyle displayFlags="showBehaviorModels showVisual" />
    <DefaultAnimationLoop/>
    <Node name="M0">
        <EulerImplicitIntegrationScheme name="cg_odesolver" printLog="false"  rayleighStiffness="0.1" rayleighMass="0.1" />
        <CGLinearSolver iterations="25" name="linear solver" tolerance="1.0e-9" threshold="1.0e-9" />
        <MechanicalObject position="0 0 0  1 0 0  1 1 0  0 1 0" velocity="0 0 0  0 0 0  0 0 0  0 0 0" />
        <UniformMass vertexMass="0.1" />
        <MeshTopology triangles="0 1 2  0 2 3" />
        <TriangleFEMForceField name="FEM0" youngModulus="100" poissonRatio="0.3" method="large" />

        <BoxROI template="Vec3" name="box_roi1" box="0 0 0  1 0.5 0"/>
        <ConstantForceField indices="@box_roi1.indices" forces="0 -1 0" showArrowSize=".2"/>

        <BoxROI template="Vec3" name="box_roi2" box="0 0.5 0  1 1 0"/>
        <ConstantForceField indices="@box_roi2.indices" forces="0 1 0" showArrowSize=".2"/>

        <Node name="Visu">
            <OglModel name="Visual" color="red" />
            <IdentityMapping input="@.." output="@Visual" />
        </Node>
    </Node>
</Node>
