<Node name="root" dt="0.005" gravity="0 0 0">
    <RequiredPlugin pluginName="Sofa.Component.IO.Mesh"/> <!-- Needed to use components [MeshOBJLoader] -->
    <RequiredPlugin pluginName="Sofa.Component.LinearSolver.Iterative"/> <!-- Needed to use components [CGLinearSolver] -->
    <RequiredPlugin pluginName="Sofa.Component.Mapping.NonLinear"/> <!-- Needed to use components [RigidMapping] -->
    <RequiredPlugin pluginName="Sofa.Component.Mass"/> <!-- Needed to use components [UniformMass] -->
    <RequiredPlugin pluginName="Sofa.Component.MechanicalLoad"/> <!-- Needed to use components [LinearForceField] -->
    <RequiredPlugin pluginName="Sofa.Component.IntegrationSchemes.Forward"/> <!-- Needed to use components [EulerExplicitIntegrationScheme] -->
    <RequiredPlugin pluginName="Sofa.Component.StateContainer"/> <!-- Needed to use components [MechanicalObject] -->
    <RequiredPlugin pluginName="Sofa.Component.Visual"/> <!-- Needed to use components [VisualStyle] -->
    <RequiredPlugin pluginName="Sofa.GL.Component.Rendering3D"/> <!-- Needed to use components [OglModel] -->
    <VisualStyle displayFlags="showBehaviorModels showForceFields" />
    <DefaultAnimationLoop/>

    <Node name="TorusRigidX">
        <EulerExplicitIntegrationScheme />
        <CGLinearSolver iterations="25" threshold="0.00000001" tolerance="1e-5"/>
        <MechanicalObject template="Rigid3" dx="2" dy="0" dz="0" rx="0" ry="0" rz="0" scale="1.0" />
        <UniformMass totalMass="1.0"/>
        <!-- forces for a rigid is composed of two parts translation of the rigid dof [x y z] and a quaternion for the rotation [x y z w] -->
        <LinearForceField points="0" forces="0 0 0 0 0 0  1 0 0 0 0 0  -1 0 0 0 0 0  -1 0 0 0 0 0  0 0 0 0 0 0" force="2.0" times="0 4 8 10 12" />
        <Node name="Visu">
            <MeshOBJLoader name="meshLoader_0" filename="mesh/torus.obj" scale="0.3" handleSeams="1" />
            <OglModel name="Visual" src="@meshLoader_0" color="gray" />
            <RigidMapping input="@.." output="@Visual" />
        </Node>
    </Node>
    <Node name="TorusRigidY">
        <EulerExplicitIntegrationScheme />
        <CGLinearSolver iterations="25" threshold="0.00000001" tolerance="1e-5"/>
        <MechanicalObject template="Rigid3" dx="2" dy="2" dz="0" rx="0" ry="0" rz="0" scale="1.0" />
        <UniformMass totalMass="1.0"/>
        <!-- forces for a rigid is composed of two parts translation of the rigid dof [x y z] and a quaternion for the rotation [x y z w] -->
        <LinearForceField points="0" forces="0 0 0 0 0 0  0 1 0 0 0 0  0 -1 0 0 0 0  0 -1 0 0 0 0  0 0 0 0 0 0" force="2.0" times="0 4 8 10 12" />
        <Node name="Visu">
            <MeshOBJLoader name="meshLoader_1" filename="mesh/torus.obj" scale="0.3" handleSeams="1" />
            <OglModel name="Visual" src="@meshLoader_1" color="gray" />
            <RigidMapping input="@.." output="@Visual" />
        </Node>
    </Node>
</Node>
