<Node name="root" dt="0.01">
    <RequiredPlugin pluginName="Sofa.Component.Collision.Detection.Algorithm"/> <!-- Needed to use components [BVHNarrowPhase BruteForceBroadPhase CollisionPipeline] -->
    <RequiredPlugin pluginName="Sofa.Component.Collision.Detection.Intersection"/> <!-- Needed to use components [MinProximityIntersection] -->
    <RequiredPlugin pluginName="Sofa.Component.Collision.Geometry"/> <!-- Needed to use components [LineCollisionModel PointCollisionModel TriangleCollisionModel] -->
    <RequiredPlugin pluginName="Sofa.Component.Collision.Response.Contact"/> <!-- Needed to use components [CollisionResponse] -->
    <RequiredPlugin pluginName="Sofa.Component.Constraint.Projective"/> <!-- Needed to use components [FixedProjectiveConstraint] -->
    <RequiredPlugin pluginName="Sofa.Component.Engine.Select"/> <!-- Needed to use components [BoxROI] -->
    <RequiredPlugin pluginName="Sofa.Component.IO.Mesh"/> <!-- Needed to use components [MeshOBJLoader] -->
    <RequiredPlugin pluginName="Sofa.Component.LinearSolver.Iterative"/> <!-- Needed to use components [CGLinearSolver] -->
    <RequiredPlugin pluginName="Sofa.Component.Mapping.Linear"/> <!-- Needed to use components [BarycentricMapping] -->
    <RequiredPlugin pluginName="Sofa.Component.Mass"/> <!-- Needed to use components [UniformMass] -->
    <RequiredPlugin pluginName="Sofa.Component.MechanicalLoad"/> <!-- Needed to use components [SurfacePressureForceField] -->
    <RequiredPlugin pluginName="Sofa.Component.IntegrationSchemes.Backward"/> <!-- Needed to use components [EulerImplicitIntegrationScheme] -->
    <RequiredPlugin pluginName="Sofa.Component.SolidMechanics.Spring"/> <!-- Needed to use components [MeshSpringForceField] -->
    <RequiredPlugin pluginName="Sofa.Component.StateContainer"/> <!-- Needed to use components [MechanicalObject] -->
    <RequiredPlugin pluginName="Sofa.Component.Topology.Container.Constant"/> <!-- Needed to use components [MeshTopology] -->
    <RequiredPlugin pluginName="Sofa.Component.Topology.Container.Grid"/> <!-- Needed to use components [SparseGridTopology] -->
    <RequiredPlugin pluginName="Sofa.GL.Component.Rendering3D"/> <!-- Needed to use components [OglModel] -->

    <DefaultAnimationLoop/>
    <CollisionPipeline depth="6" verbose="0" draw="0" />
    <BruteForceBroadPhase/>
    <BVHNarrowPhase/>
    <MinProximityIntersection name="Proximity" usePointPoint="1" alarmDistance="3.5" contactDistance="1.5" />
    <CollisionResponse name="Response" response="PenalityContactForceField" />
    <Node name="Frog">
        <EulerImplicitIntegrationScheme  rayleighStiffness="0.1" rayleighMass="0.1" />
        <CGLinearSolver iterations="30" tolerance="1e-5" threshold="1e-5"/>
        <SparseGridTopology n="10 5 10" fileTopology="mesh/frog.obj" />
        <MechanicalObject dx="-10.0" />
        <UniformMass vertexMass="1.0" />
        <BoxConstraint box="-18.0 2.0 -5.0 -2.0 3.0 5.0" />
        <MeshSpringForceField name="Springs" stiffness="50000" damping="4" />
        <Node name="Visu">
            <MeshOBJLoader name="meshLoader_0" filename="mesh/frog.obj" handleSeams="1" />
            <OglModel name="Visual" src="@meshLoader_0" color="0.5 1.0 0.5 1.0" />
            <BarycentricMapping input="@.." output="@Visual" />
        </Node>
        <Node name="TriangleSurf">
            <MeshOBJLoader name="loader" filename="mesh/frog.obj" />
            <MeshTopology src="@loader" />
            <MechanicalObject src="@loader" />
            <TriangleCollisionModel group="1" />
            <LineCollisionModel group="1" />
            <PointCollisionModel group="1" />
            <SurfacePressureForceField pressure="50000.0" pulseMode="true" pressureSpeed="20000.0" />
            <BarycentricMapping input="@.." output="@." />
        </Node>
    </Node>
    <Node name="Frog2">
        <EulerImplicitIntegrationScheme />
        <CGLinearSolver iterations="30" tolerance="1e-5" threshold="1e-5"/>
        <SparseGridTopology n="10 5 10" fileTopology="mesh/frog_quads.obj" />
        <MechanicalObject dx="10.0" />
        <UniformMass vertexMass="1.0" />
        <BoxConstraint box="2.0 2.0 -5.0 18.0 3.0 5.0" />
        <MeshSpringForceField name="Springs" stiffness="50000" damping="4" />
        <Node name="Visu">
            <MeshOBJLoader name="meshLoader_1" filename="mesh/frog_quads.obj" handleSeams="1" />
            <OglModel name="Visual" src="@meshLoader_1" color="1.0 0.5 0.5 1.0" />
            <BarycentricMapping input="@.." output="@Visual" />
        </Node>
        <Node name="QuadSurf">
            <MeshOBJLoader name="loader" filename="mesh/frog_quads.obj" />
            <MeshTopology src="@loader" />
            <MechanicalObject src="@loader" />
            <TriangleCollisionModel group="1" />
            <LineCollisionModel group="1" />
            <PointCollisionModel group="1" />
            <SurfacePressureForceField pressure="50000.0" pulseMode="true" pressureSpeed="20000.0" />
            <BarycentricMapping input="@.." output="@." />
        </Node>
    </Node>
</Node>
