<?xml version="1.0" ?>
<Node name="root" dt="0.005" showBoundingTree="0" gravity="0 -9 0">
    <RequiredPlugin pluginName="Sofa.Component.Collision.Detection.Algorithm"/> <!-- Needed to use components [BVHNarrowPhase BruteForceBroadPhase CollisionPipeline] -->
    <RequiredPlugin pluginName="Sofa.Component.Collision.Detection.Intersection"/> <!-- Needed to use components [MinProximityIntersection] -->
    <RequiredPlugin pluginName="Sofa.Component.Collision.Geometry"/> <!-- Needed to use components [TriangleCollisionModel] -->
    <RequiredPlugin pluginName="Sofa.Component.Collision.Response.Contact"/> <!-- Needed to use components [CollisionResponse] -->
    <RequiredPlugin pluginName="Sofa.Component.Constraint.Projective"/> <!-- Needed to use components [FixedProjectiveConstraint] -->
    <RequiredPlugin pluginName="Sofa.Component.IO.Mesh"/> <!-- Needed to use components [MeshGmshLoader] -->
    <RequiredPlugin pluginName="Sofa.Component.LinearSolver.Iterative"/> <!-- Needed to use components [CGLinearSolver] -->
    <RequiredPlugin pluginName="Sofa.Component.Mapping.Linear"/> <!-- Needed to use components [IdentityMapping] -->
    <RequiredPlugin pluginName="Sofa.Component.Mass"/> <!-- Needed to use components [DiagonalMass] -->
    <RequiredPlugin pluginName="Sofa.Component.IntegrationSchemes.Backward"/> <!-- Needed to use components [EulerImplicitIntegrationScheme] -->
    <RequiredPlugin pluginName="Sofa.Component.SolidMechanics.FEM.Elastic"/> <!-- Needed to use components [HexahedralFEMForceField] -->
    <RequiredPlugin pluginName="Sofa.Component.StateContainer"/> <!-- Needed to use components [MechanicalObject] -->
    <RequiredPlugin pluginName="Sofa.Component.Topology.Container.Dynamic"/> <!-- Needed to use components [HexahedronSetGeometryAlgorithms HexahedronSetTopologyContainer HexahedronSetTopologyModifier QuadSetGeometryAlgorithms QuadSetTopologyContainer QuadSetTopologyModifier TriangleSetGeometryAlgorithms TriangleSetTopologyContainer TriangleSetTopologyModifier] -->
    <RequiredPlugin pluginName="Sofa.Component.Topology.Mapping"/> <!-- Needed to use components [Hexa2QuadTopologicalMapping Quad2TriangleTopologicalMapping] -->
    <RequiredPlugin pluginName="Sofa.Component.Visual"/> <!-- Needed to use components [VisualStyle] -->
    <RequiredPlugin pluginName="Sofa.GL.Component.Rendering3D"/> <!-- Needed to use components [OglModel] -->
    <DefaultAnimationLoop/>
    <VisualStyle displayFlags="showBehaviorModels showForceFields" />
    <CollisionPipeline verbose="0" />
    <BruteForceBroadPhase/>
    <BVHNarrowPhase/>
    <CollisionResponse response="PenalityContactForceField" />
    <MinProximityIntersection name="Proximity" alarmDistance="0.8" contactDistance="0.5" />
    <Node name="H">
        <EulerImplicitIntegrationScheme name="cg_odesolver" printLog="false"  rayleighStiffness="0.1" rayleighMass="0.1" />
        <CGLinearSolver iterations="25" name="linear solver" tolerance="1.0e-9" threshold="1.0e-9" />
        <MeshGmshLoader name="loader" filename="mesh/nine_hexa.msh" />
        <MechanicalObject src="@loader" name="Hexa" />
        <HexahedronSetTopologyContainer name="Container" src="@loader"/>
        <HexahedronSetTopologyModifier name="Modifier" />
        <HexahedronSetGeometryAlgorithms name="GeomAlgo" />
        <HexahedralFEMForceField name="FEM" youngModulus="100" poissonRatio="0.3" method="large" />
        <DiagonalMass massDensity="0.2" />
        <FixedProjectiveConstraint indices="12 15 28 31" />
        <Node name="Q">
            <QuadSetTopologyContainer name="Container" />
            <QuadSetTopologyModifier name="Modifier" />
            <QuadSetGeometryAlgorithms name="GeomAlgo" />
            <Hexa2QuadTopologicalMapping input="@../Container" output="@Container" />

            <Node name="T">
                <TriangleSetTopologyContainer name="Container" />
                <TriangleSetTopologyModifier name="Modifier" />
                <TriangleSetGeometryAlgorithms name="GeomAlgo" />
                <Quad2TriangleTopologicalMapping input="@../Container" output="@Container" />
                <TriangleCollisionModel />

                <Node name="Visu">
                    <OglModel name="Visual" color="yellow" />
                    <IdentityMapping input="@../../../Hexa" output="@Visual" />
                </Node>
            </Node>
        </Node>
    </Node>
</Node>
