<?xml version="1.0" ?>
<Node name="root" dt="0.02">
    <RequiredPlugin pluginName="Sofa.Component.Collision.Detection.Algorithm"/> <!-- Needed to use components [BVHNarrowPhase BruteForceBroadPhase CollisionPipeline] -->
    <RequiredPlugin pluginName="Sofa.Component.Collision.Detection.Intersection"/> <!-- Needed to use components [MinProximityIntersection] -->
    <RequiredPlugin pluginName="Sofa.Component.Collision.Geometry"/> <!-- Needed to use components [LineCollisionModel PointCollisionModel TriangleCollisionModel] -->
    <RequiredPlugin pluginName="Sofa.Component.Collision.Response.Contact"/> <!-- Needed to use components [CollisionResponse] -->
    <RequiredPlugin pluginName="Sofa.Component.Constraint.Projective"/> <!-- Needed to use components [FixedProjectiveConstraint] -->
    <RequiredPlugin pluginName="Sofa.Component.LinearSolver.Iterative"/> <!-- Needed to use components [CGLinearSolver] -->
    <RequiredPlugin pluginName="Sofa.Component.Mass"/> <!-- Needed to use components [UniformMass] -->
    <RequiredPlugin pluginName="Sofa.Component.IntegrationSchemes.Backward"/> <!-- Needed to use components [EulerImplicitIntegrationScheme] -->
    <RequiredPlugin pluginName="Sofa.Component.SolidMechanics.FEM.Elastic"/> <!-- Needed to use components [HexahedronFEMForceField] -->
    <RequiredPlugin pluginName="Sofa.Component.StateContainer"/> <!-- Needed to use components [MechanicalObject] -->
    <RequiredPlugin pluginName="Sofa.Component.Topology.Container.Grid"/> <!-- Needed to use components [RegularGridTopology] -->
    <RequiredPlugin pluginName="Sofa.Component.Visual"/> <!-- Needed to use components [VisualStyle] -->

    <DefaultAnimationLoop/>
    <VisualStyle displayFlags="showBehaviorModels showForceFields" />
    <CollisionPipeline depth="6" verbose="0" draw="0" />
    <BruteForceBroadPhase/>
    <BVHNarrowPhase/>
    <MinProximityIntersection name="Proximity" alarmDistance="0.5" contactDistance="0.3" />
    <CollisionResponse name="Response" response="PenalityContactForceField" />
    <Node name="M1">
        <EulerImplicitIntegrationScheme name="cg_odesolver" printLog="false"  rayleighStiffness="0.1" rayleighMass="0.1" />
        <CGLinearSolver iterations="25" name="linear solver" tolerance="1.0e-9" threshold="1.0e-9" template="CompressedRowSparseMatrixMat3x3"/>
        <MechanicalObject />
        <UniformMass vertexMass="1" />
        <RegularGridTopology nx="4" ny="4" nz="20" xmin="-9" xmax="-6" ymin="0" ymax="3" zmin="0" zmax="19" />
        <FixedProjectiveConstraint indices="0 1 2 3 4 5 6 7 8 9 10 11 12 13 14 15" />
        <HexahedronFEMForceField name="FEM" youngModulus="4000" poissonRatio="0.3" method="large" />
        <TriangleCollisionModel />
        <LineCollisionModel />
        <PointCollisionModel />
    </Node>
</Node>
