<?xml version="1.0" ?>
<Node name="root" dt="0.00001" showBoundingTree="0" gravity="0 0 0">
    <Node name="plugins">
        <RequiredPlugin pluginName="Sofa.Component.Constraint.Projective"/> <!-- Needed to use components [FixedProjectiveConstraint] -->
        <RequiredPlugin pluginName="Sofa.Component.Engine.Select"/> <!-- Needed to use components [BoxROI] -->
        <RequiredPlugin pluginName="Sofa.Component.LinearSolver.Direct"/> <!-- Needed to use components [SparseLDLSolver] -->
        <RequiredPlugin pluginName="Sofa.Component.LinearSystem"/> <!-- Needed to use components [ConstantSparsityPatternSystem] -->
        <RequiredPlugin pluginName="Sofa.Component.Mass"/> <!-- Needed to use components [MeshMatrixMass] -->
        <RequiredPlugin pluginName="Sofa.Component.IntegrationScheme.Backward"/> <!-- Needed to use components [EulerImplicitIntegrationScheme] -->
        <RequiredPlugin pluginName="Sofa.Component.SolidMechanics.FEM.HyperElastic"/> <!-- Needed to use components [TetrahedronHyperelasticityFEMForceField] -->
        <RequiredPlugin pluginName="Sofa.Component.StateContainer"/> <!-- Needed to use components [MechanicalObject] -->
        <RequiredPlugin pluginName="Sofa.Component.Topology.Container.Dynamic"/> <!-- Needed to use components [TetrahedronSetGeometryAlgorithms TetrahedronSetTopologyContainer TetrahedronSetTopologyModifier] -->
        <RequiredPlugin pluginName="Sofa.Component.Topology.Container.Grid"/> <!-- Needed to use components [RegularGridTopology] -->
        <RequiredPlugin pluginName="Sofa.Component.Topology.Mapping"/> <!-- Needed to use components [Hexa2TetraTopologicalMapping] -->
        <RequiredPlugin pluginName="Sofa.Component.Visual"/> <!-- Needed to use components [VisualStyle] -->
    </Node>

    <VisualStyle displayFlags="showForceFields showBehaviorModels" />

    <DefaultAnimationLoop/>

    <Node name="StableNeoHookean">
        <EulerImplicitIntegrationScheme name="odesolver"/>
        <ConstantSparsityPatternSystem template="CompressedRowSparseMatrixd" name="A"/>
        <SparseLDLSolver template="CompressedRowSparseMatrixd"/>

        <RegularGridTopology name="hexaGrid"     min="0 0 0" max="1 1 2.7" n="6 6 16" p0="0 0 0"/>
        <Node name="invertedConfiguration">
            <RegularGridTopology name="hexaGrid" min="0 0 0" max="1 1 -2.7" n="6 6 16" p0="0 0 0"/>
        </Node>

        <MechanicalObject name="mechObj" rest_position="@hexaGrid.position" position="@invertedConfiguration/hexaGrid.position"/>

        <Node name="tetras">
            <TetrahedronSetTopologyContainer name="Container"/>
            <TetrahedronSetTopologyModifier name="Modifier" />
            <TetrahedronSetGeometryAlgorithms template="Vec3" name="GeomAlgo" />
            <Hexa2TetraTopologicalMapping name="default28" input="@../hexaGrid" output="@Container" swapping="true"/>

            <MeshMatrixMass totalMass="1.0" topology="@Container" geometryState="@../mechObj" computeMassOnRest="true"/>

            <TetrahedronHyperelasticityFEMForceField name="FEM" topology="@Container" ParameterSet="1644295.30201342 33557.0469798658" materialName="StableNeoHookean"/>
        </Node>

        <BoxROI drawBoxes="1" box="0 0 0 1 1 0.05" name="box" position="@mechObj.rest_position"/>
        <FixedProjectiveConstraint indices="@box.indices"/>
    </Node>

</Node>
