<Node name="root">
    <Node name="plugins">
        <RequiredPlugin pluginName="Sofa.Component.Constraint.Projective"/> <!-- Needed to use components [FixedProjectiveConstraint] -->
        <RequiredPlugin pluginName="Sofa.Component.Engine.Select"/> <!-- Needed to use components [BoxROI] -->
        <RequiredPlugin pluginName="Sofa.Component.LinearSolver.Direct"/> <!-- Needed to use components [EigenSimplicialLDLT] -->
        <RequiredPlugin pluginName="Sofa.Component.Mapping.Linear"/> <!-- Needed to use components [IdentityMapping] -->
        <RequiredPlugin pluginName="Sofa.Component.Mass"/> <!-- Needed to use components [UniformMass] -->
        <RequiredPlugin pluginName="Sofa.Component.IntegrationSchemes.Backward"/> <!-- Needed to use components [EulerImplicitIntegrationScheme] -->
        <RequiredPlugin pluginName="Sofa.Component.SolidMechanics.TensorMass"/> <!-- Needed to use components [TetrahedralTensorMassForceField] -->
        <RequiredPlugin pluginName="Sofa.Component.StateContainer"/> <!-- Needed to use components [MechanicalObject] -->
        <RequiredPlugin pluginName="Sofa.Component.Topology.Container.Dynamic"/> <!-- Needed to use components [QuadSetGeometryAlgorithms QuadSetTopologyContainer QuadSetTopologyModifier TetrahedronSetGeometryAlgorithms TetrahedronSetTopologyContainer TetrahedronSetTopologyModifier] -->
        <RequiredPlugin pluginName="Sofa.Component.Topology.Container.Grid"/> <!-- Needed to use components [RegularGridTopology] -->
        <RequiredPlugin pluginName="Sofa.Component.Topology.Mapping"/> <!-- Needed to use components [Hexa2QuadTopologicalMapping Hexa2TetraTopologicalMapping] -->
        <RequiredPlugin pluginName="Sofa.Component.Visual"/> <!-- Needed to use components [VisualStyle] -->
        <RequiredPlugin pluginName="Sofa.GL.Component.Rendering3D"/> <!-- Needed to use components [OglModel] -->
    </Node>

    <VisualStyle displayFlags="showBehaviorModels showForceFields" />

    <DefaultAnimationLoop name="animationLoop"/>
    <DefaultVisualManagerLoop name="visualLoop"/>

    <EulerImplicitIntegrationScheme name="odesolver" rayleighStiffness="0.1" rayleighMass="0.1" />
    <EigenSimplicialLDLT template="CompressedRowSparseMatrixMat3x3"/>
    <MechanicalObject name="DoFs" />
    <UniformMass name="mass" totalMass="320" />
    <RegularGridTopology name="grid" nx="4" ny="4" nz="20" xmin="-9" xmax="-6" ymin="0" ymax="3" zmin="0" zmax="19" />
    <BoxROI name="box" box="-10 -1 -0.0001  -5 4 0.0001"/>
    <FixedProjectiveConstraint indices="@box.indices" />

    <TetrahedronSetTopologyContainer name="Tetra_topo"/>
    <TetrahedronSetTopologyModifier name="Modifier" />
    <TetrahedronSetGeometryAlgorithms template="Vec3" name="GeomAlgo" />
    <Hexa2TetraTopologicalMapping input="@grid" output="@Tetra_topo" swapping="true"/>
    <TetrahedralTensorMassForceField name="deformable" youngModulus="100000" poissonRatio="0.4" />

    <Node name="quads">
        <QuadSetTopologyContainer  name="Container" />
        <QuadSetTopologyModifier   name="Modifier" />
        <QuadSetGeometryAlgorithms name="GeomAlgo" template="Vec3" />
        <Hexa2QuadTopologicalMapping input="@../grid" output="@Container" />
        <Node name="Visu">
            <OglModel name="Visual" color="yellow" />
            <IdentityMapping input="@../../DoFs" output="@Visual" />
        </Node>
    </Node>
</Node>
