<?xml version="1.0" ?>
<!-- Automatic Tetrahedron adding example with Tetra2Triangle mapping: Element added are define in: ./AddingTetrahedraProcess.txt -->
<Node name="root" gravity="0 0 -9" dt="0.01">
    <RequiredPlugin pluginName="Sofa.Component.Collision.Detection.Algorithm"/> <!-- Needed to use components [BVHNarrowPhase BruteForceBroadPhase CollisionPipeline] -->
    <RequiredPlugin pluginName="Sofa.Component.Collision.Detection.Intersection"/> <!-- Needed to use components [MinProximityIntersection] -->
    <RequiredPlugin pluginName="Sofa.Component.Collision.Geometry"/> <!-- Needed to use components [TriangleCollisionModel] -->
    <RequiredPlugin pluginName="Sofa.Component.Collision.Response.Contact"/> <!-- Needed to use components [CollisionResponse] -->
    <RequiredPlugin pluginName="Sofa.Component.Constraint.Projective"/> <!-- Needed to use components [FixedProjectiveConstraint] -->
    <RequiredPlugin pluginName="Sofa.Component.IO.Mesh"/> <!-- Needed to use components [MeshGmshLoader] -->
    <RequiredPlugin pluginName="Sofa.Component.LinearSolver.Iterative"/> <!-- Needed to use components [CGLinearSolver] -->
    <RequiredPlugin pluginName="Sofa.Component.Mapping.Linear"/> <!-- Needed to use components [IdentityMapping] -->
    <RequiredPlugin pluginName="Sofa.Component.Mass"/> <!-- Needed to use components [UniformMass] -->
    <RequiredPlugin pluginName="Sofa.Component.IntegrationSchemes.Backward"/> <!-- Needed to use components [EulerImplicitIntegrationScheme] -->
    <RequiredPlugin pluginName="Sofa.Component.SolidMechanics.FEM.Elastic"/> <!-- Needed to use components [TetrahedralCorotationalFEMForceField TriangularFEMForceField] -->
    <RequiredPlugin pluginName="Sofa.Component.StateContainer"/> <!-- Needed to use components [MechanicalObject] -->
    <RequiredPlugin pluginName="Sofa.Component.Topology.Container.Dynamic"/> <!-- Needed to use components [TetrahedronSetGeometryAlgorithms TetrahedronSetTopologyContainer TetrahedronSetTopologyModifier TriangleSetGeometryAlgorithms TriangleSetTopologyContainer TriangleSetTopologyModifier] -->
    <RequiredPlugin pluginName="Sofa.Component.Topology.Mapping"/> <!-- Needed to use components [Tetra2TriangleTopologicalMapping] -->
    <RequiredPlugin pluginName="Sofa.Component.Topology.Utility"/> <!-- Needed to use components [TopologicalChangeProcessor] -->
    <RequiredPlugin pluginName="Sofa.Component.Visual"/> <!-- Needed to use components [VisualStyle] -->
    <RequiredPlugin pluginName="Sofa.GL.Component.Rendering3D"/> <!-- Needed to use components [OglModel] -->

    <VisualStyle displayFlags="showVisual showBehaviorModels showForceFields showWireframe" />
    <CollisionPipeline verbose="0" />
    <BruteForceBroadPhase/>
    <BVHNarrowPhase/>
    <CollisionResponse response="PenalityContactForceField" />
    <MinProximityIntersection name="Proximity" alarmDistance="0.8" contactDistance="0.5" />
    <DefaultAnimationLoop/>
    <Node name="TT">
        <EulerImplicitIntegrationScheme name="cg_odesolver" rayleighStiffness="0.1" rayleighMass="0.1" />
        <CGLinearSolver iterations="25" name="linear solver" tolerance="1e-5" threshold="1e-5"/>
        <MeshGmshLoader name="loader" filename="mesh/cubeDof.msh" />
        <MechanicalObject src="@loader" name="Volume" />
        <TetrahedronSetTopologyContainer src="@loader" name="Tetra_topo" listening="1" />
        <TetrahedronSetTopologyModifier name="Modifier" />
        <TetrahedronSetGeometryAlgorithms template="Vec3" name="GeomAlgo" drawTetrahedra="1" />

        <UniformMass totalMass="1.0" />

        <FixedProjectiveConstraint indices="0 1 2" />
        <TetrahedralCorotationalFEMForceField name="FEM" youngModulus="360" poissonRatio="0.3" method="large" />

        <Node name="T">
            <TriangleSetTopologyContainer name="Triangle_topo" listening="1" />
            <TriangleSetTopologyModifier name="Modifier" />
            <TriangleSetGeometryAlgorithms template="Vec3" name="GeomAlgo" drawTriangles="1" />
            <Tetra2TriangleTopologicalMapping input="@../Tetra_topo" output="@Triangle_topo" listening="1" />
            <TriangularFEMForceField name="FEM" youngModulus="60" poissonRatio="0.3" method="large" />

            <TriangleCollisionModel />
            <Node name="Visu">
                <OglModel name="Visual" color="yellow" />
                <IdentityMapping input="@../../Volume" output="@Visual" />
            </Node>
        </Node>

        <TopologicalChangeProcessor listening="1" filename="AddingTetrahedraProcess.txt" />
    </Node>
</Node>
