<?xml version="1.0"?>
<!-- SparseGrid examples -->
<Node name="root" dt="0.02" gravity="0 -9 0">
    <RequiredPlugin pluginName="Sofa.Component.Collision.Detection.Algorithm"/> <!-- Needed to use components [BVHNarrowPhase BruteForceBroadPhase CollisionPipeline] -->
    <RequiredPlugin pluginName="Sofa.Component.Collision.Detection.Intersection"/> <!-- Needed to use components [DiscreteIntersection] -->
    <RequiredPlugin pluginName="Sofa.Component.Collision.Geometry"/> <!-- Needed to use components [SphereCollisionModel] -->
    <RequiredPlugin pluginName="Sofa.Component.Collision.Response.Contact"/> <!-- Needed to use components [CollisionResponse] -->
    <RequiredPlugin pluginName="Sofa.Component.Constraint.Projective"/> <!-- Needed to use components [FixedProjectiveConstraint] -->
    <RequiredPlugin pluginName="Sofa.Component.Engine.Select"/> <!-- Needed to use components [BoxROI] -->
    <RequiredPlugin pluginName="Sofa.Component.IO.Mesh"/> <!-- Needed to use components [MeshOBJLoader SphereLoader] -->
    <RequiredPlugin pluginName="Sofa.Component.LinearSolver.Iterative"/> <!-- Needed to use components [CGLinearSolver] -->
    <RequiredPlugin pluginName="Sofa.Component.Mapping.Linear"/> <!-- Needed to use components [BarycentricMapping] -->
    <RequiredPlugin pluginName="Sofa.Component.Mass"/> <!-- Needed to use components [UniformMass] -->
    <RequiredPlugin pluginName="Sofa.Component.IntegrationSchemes.Backward"/> <!-- Needed to use components [EulerImplicitIntegrationScheme] -->
    <RequiredPlugin pluginName="Sofa.Component.SolidMechanics.Spring"/> <!-- Needed to use components [MeshSpringForceField] -->
    <RequiredPlugin pluginName="Sofa.Component.StateContainer"/> <!-- Needed to use components [MechanicalObject] -->
    <RequiredPlugin pluginName="Sofa.Component.Topology.Container.Grid"/> <!-- Needed to use components [SparseGridTopology] -->
    <RequiredPlugin pluginName="Sofa.Component.Visual"/> <!-- Needed to use components [VisualStyle] -->
    <RequiredPlugin pluginName="Sofa.GL.Component.Rendering3D"/> <!-- Needed to use components [OglModel] -->

    <VisualStyle displayFlags="showBehaviorModels showForceFields showVisual" />
    <DefaultAnimationLoop/>
    <CollisionPipeline verbose="0" />
    <BruteForceBroadPhase/>
    <BVHNarrowPhase/>
    <CollisionResponse name="Response" response="PenalityContactForceField"/>
    <DiscreteIntersection/>

    <MeshOBJLoader name="loader" filename="mesh/dragon.obj" />

    <Node name="DragonCoarse">
        <SparseGridTopology n="6 5 4" fileTopology="mesh/dragon.obj" />
        <EulerImplicitIntegrationScheme rayleighStiffness="0.1" rayleighMass="0.1"/>
        <CGLinearSolver iterations="100" tolerance="1e-5" threshold="1e-5"/>
        <MechanicalObject />
        <UniformMass vertexMass="0.5" />
        <MeshSpringForceField name="Springs" stiffness="500" damping="10" />
        <BoxConstraint box="10 -10 -6 12 10 6" />
        <Node name="Visu">
            <OglModel name="Visual" src="@../../loader" color="blue" />
            <BarycentricMapping input="@.." output="@Visual" />
        </Node>
        <Node name="Surf">
	    <SphereLoader filename="mesh/dragon.sph" />
            <MechanicalObject position="@[-1].position" />
            <SphereCollisionModel listRadius="@[-2].listRadius" />
            <BarycentricMapping />
        </Node>
    </Node>
    <Node name="DragonMiddle">
        <SparseGridTopology n="12 9 6" fileTopology="mesh/dragon.obj" />
        <EulerImplicitIntegrationScheme rayleighStiffness="0.1" rayleighMass="0.1"/>
        <CGLinearSolver iterations="100" tolerance="1e-5" threshold="1e-5"/>
        <MechanicalObject dz="15" />
        <UniformMass vertexMass="0.5" />
        <MeshSpringForceField name="Springs" stiffness="500" damping="10" />
        <BoxConstraint box="10 -10 10 12 10 22" />
        <Node name="Visu">
            <OglModel name="Visual" src="@../../loader" color="white" />
            <BarycentricMapping input="@.." output="@Visual" />
        </Node>
        <Node name="Surf">
	    <SphereLoader filename="mesh/dragon.sph" />
            <MechanicalObject position="@[-1].position" />
            <SphereCollisionModel listRadius="@[-2].listRadius" />
            <BarycentricMapping />
        </Node>
    </Node>
    <Node name="DragonFine">
        <SparseGridTopology n="25 20 9" fileTopology="mesh/dragon.obj" />
        <EulerImplicitIntegrationScheme rayleighStiffness="0.1" rayleighMass="0.1"/>
        <CGLinearSolver iterations="100" tolerance="1e-5" threshold="1e-5"/>
        <MechanicalObject dz="30" />
        <UniformMass vertexMass="0.5" />
        <MeshSpringForceField name="Springs" stiffness="500" damping="10" />
        <BoxConstraint box="10 -10 26 12 10 38" />
        <Node name="Visu">
            <OglModel name="Visual" src="@../../loader" color="red" />
            <BarycentricMapping input="@.." output="@Visual" />
        </Node>
        <Node name="Surf">
	    <SphereLoader filename="mesh/dragon.sph" />
            <MechanicalObject position="@[-1].position" />
            <SphereCollisionModel listRadius="@[-2].listRadius" />
            <BarycentricMapping />
        </Node>
    </Node>
</Node>
