<?xml version="1.0" ?>
<Node name="root" dt="0.01" showBoundingTree="0" gravity="0 -9 0">
    <Node name="RequiredPlugins">
        <RequiredPlugin pluginName="Sofa.Component.Collision.Detection.Algorithm"/> <!-- Needed to use components [BVHNarrowPhase BruteForceBroadPhase CollisionPipeline] -->
        <RequiredPlugin pluginName="Sofa.Component.Collision.Detection.Intersection"/> <!-- Needed to use components [MinProximityIntersection] -->
        <RequiredPlugin pluginName="Sofa.Component.Collision.Response.Contact"/> <!-- Needed to use components [CollisionResponse] -->
        <RequiredPlugin pluginName="Sofa.Component.Constraint.Projective"/> <!-- Needed to use components [FixedProjectiveConstraint] -->
        <RequiredPlugin pluginName="Sofa.Component.LinearSolver.Iterative"/> <!-- Needed to use components [CGLinearSolver] -->
        <RequiredPlugin pluginName="Sofa.Component.Mapping.Linear"/> <!-- Needed to use components [TubularMapping] -->
        <RequiredPlugin pluginName="Sofa.Component.Mass"/> <!-- Needed to use components [UniformMass] -->
        <RequiredPlugin pluginName="Sofa.Component.IntegrationSchemes.Backward"/> <!-- Needed to use components [EulerImplicitIntegrationScheme] -->
        <RequiredPlugin pluginName="Sofa.Component.SolidMechanics.FEM.Elastic"/> <!-- Needed to use components [BeamFEMForceField] -->
        <RequiredPlugin pluginName="Sofa.Component.StateContainer"/> <!-- Needed to use components [MechanicalObject] -->
        <RequiredPlugin pluginName="Sofa.Component.Topology.Container.Dynamic"/> <!-- Needed to use components [QuadSetGeometryAlgorithms QuadSetTopologyContainer QuadSetTopologyModifier] -->
        <RequiredPlugin pluginName="Sofa.Component.Topology.Container.Grid"/> <!-- Needed to use components [RegularGridTopology] -->
        <RequiredPlugin pluginName="Sofa.Component.Topology.Mapping"/> <!-- Needed to use components [Edge2QuadTopologicalMapping] -->
        <RequiredPlugin pluginName="Sofa.GL.Component.Rendering3D"/> <!-- Needed to use components [OglModel] -->
    </Node>

    <DefaultAnimationLoop />
    <CollisionPipeline />
    <BruteForceBroadPhase/>
    <BVHNarrowPhase/>
    <CollisionResponse response="PenalityContactForceField" />
    <MinProximityIntersection name="Proximity" alarmDistance="0.5" contactDistance="0.02"/>

   	<Node name="Beam">
        <EulerImplicitIntegrationScheme  rayleighStiffness="0.1" rayleighMass="0.1" />
        <CGLinearSolver iterations="125" tolerance="1e-16" threshold="1e-16" />

        <RegularGridTopology name="MeshLines" nx="100" ny="1" nz="1" xmax="100" xmin="0" ymin="0" ymax="0" zmax="0" zmin="0"/>
		<MechanicalObject template="Rigid3" name="BeamDof" />
		<FixedProjectiveConstraint name="fix" indices="0" />
        <UniformMass totalMass="0.1" />
        <BeamFEMForceField name="BeamFEM" radius="1.0" youngModulus="1000" poissonRatio="0.45" />


        <Node name="VisuBeam" activated="true">
			<OglModel template="Vec3" name="SurfDof" color="0.7 0.7 0.7" />
			<QuadSetTopologyContainer  name="Container" />
			<QuadSetTopologyModifier   name="Modifier" />
            <QuadSetGeometryAlgorithms name="GeomAlgo"  template="Vec3" drawQuads="1"/>
			<Edge2QuadTopologicalMapping nbPointsOnEachCircle="10" radius="2" input="@../MeshLines" output="@Container" flipNormals="true"/>
            <TubularMapping nbPointsOnEachCircle="10" radius="2" input="@../BeamDof" output="@SurfDof" />

		</Node>
	</Node>
</Node>
