<Node name="root" dt="0.05" showBoundingTree="0" gravity="0 -9.81 0">
    <RequiredPlugin pluginName="Sofa.Component.Collision.Detection.Algorithm"/> <!-- Needed to use components [BVHNarrowPhase BruteForceBroadPhase CollisionPipeline] -->
    <RequiredPlugin pluginName="Sofa.Component.Collision.Detection.Intersection"/> <!-- Needed to use components [MinProximityIntersection] -->
    <RequiredPlugin pluginName="Sofa.Component.Collision.Geometry"/> <!-- Needed to use components [TriangleCollisionModel] -->
    <RequiredPlugin pluginName="Sofa.Component.Collision.Response.Contact"/> <!-- Needed to use components [CollisionResponse] -->
    <RequiredPlugin pluginName="Sofa.Component.Constraint.Projective"/> <!-- Needed to use components [FixedProjectiveConstraint] -->
    <RequiredPlugin pluginName="Sofa.Component.IO.Mesh"/> <!-- Needed to use components [MeshGmshLoader] -->
    <RequiredPlugin pluginName="Sofa.Component.LinearSolver.Iterative"/> <!-- Needed to use components [CGLinearSolver] -->
    <RequiredPlugin pluginName="Sofa.Component.Mapping.Linear"/> <!-- Needed to use components [IdentityMapping] -->
    <RequiredPlugin pluginName="Sofa.Component.Mass"/> <!-- Needed to use components [DiagonalMass] -->
    <RequiredPlugin pluginName="Sofa.Component.IntegrationScheme.Backward"/> <!-- Needed to use components [EulerImplicitIntegrationScheme] -->
    <RequiredPlugin pluginName="Sofa.Component.SolidMechanics.FEM.Elastic"/> <!-- Needed to use components [HexahedralFEMForceField TriangularFEMForceField] -->
    <RequiredPlugin pluginName="Sofa.Component.SolidMechanics.Spring"/> <!-- Needed to use components [QuadularBendingSprings TriangularBendingSprings] -->
    <RequiredPlugin pluginName="Sofa.Component.StateContainer"/> <!-- Needed to use components [MechanicalObject] -->
    <RequiredPlugin pluginName="Sofa.Component.Topology.Container.Dynamic"/> <!-- Needed to use components [HexahedronSetGeometryAlgorithms HexahedronSetTopologyContainer HexahedronSetTopologyModifier QuadSetGeometryAlgorithms QuadSetTopologyContainer QuadSetTopologyModifier TriangleSetGeometryAlgorithms TriangleSetTopologyContainer TriangleSetTopologyModifier] -->
    <RequiredPlugin pluginName="Sofa.Component.Topology.Mapping"/> <!-- Needed to use components [Hexa2QuadTopologicalMapping Quad2TriangleTopologicalMapping] -->
    <RequiredPlugin pluginName="Sofa.Component.Visual"/> <!-- Needed to use components [VisualStyle] -->
    <RequiredPlugin pluginName="Sofa.GL.Component.Rendering3D"/> <!-- Needed to use components [OglModel] -->

    <VisualStyle displayFlags="showBehaviorModels showVisual" />
    <CollisionPipeline verbose="0" />
    <BruteForceBroadPhase/>
    <BVHNarrowPhase/>
    <CollisionResponse response="PenalityContactForceField" />
    <MinProximityIntersection name="Proximity" alarmDistance="0.8" contactDistance="0.5" />
    <DefaultAnimationLoop/>

    <Node name="H">
        <EulerImplicitIntegrationScheme name="cg_odesolver" printLog="false"  rayleighStiffness="0.1" rayleighMass="0.1" />
        <CGLinearSolver iterations="25" name="linear solver" tolerance="1.0e-9" threshold="1.0e-9" />
        <MeshGmshLoader name="loader" filename="mesh/nine_hexa.msh" />
        <MechanicalObject src="@loader" name="Hexa" />
        <include href="Objects/HexahedronSetTopology.xml" src="@loader" tags=" " />
        <HexahedralFEMForceField name="FEM" youngModulus="10" poissonRatio="0.3" method="large" />
        <DiagonalMass massDensity="0.5" />
        <FixedProjectiveConstraint indices="12 15 28 31" />
        <Node name="Q">
            <QuadSetTopologyContainer  name="Container" />
            <QuadSetTopologyModifier   name="Modifier" />
            <QuadSetGeometryAlgorithms name="GeomAlgo"   template="Vec3" />
            <Hexa2QuadTopologicalMapping input="@../Container" output="@Container" />
            <Hexa2QuadTopologicalMapping input="@../Container" output="@Container" />
            <QuadularBendingSprings name="FEM-Bend" stiffness="3000" damping="1.0" />
            <Node name="Visu">
                <OglModel name="Visual" color="blue" />
                <IdentityMapping input="@../../Hexa" output="@Visual" />
            </Node>
            <Node name="T">
                <TriangleSetTopologyContainer  name="Container" />
                <TriangleSetTopologyModifier   name="Modifier" />
                <TriangleSetGeometryAlgorithms name="GeomAlgo"   template="Vec3" />
                <Quad2TriangleTopologicalMapping input="@../Container" output="@Container" />
                <TriangularFEMForceField name="FEM" youngModulus="10" poissonRatio="0.3" method="large" />
                <TriangularBendingSprings name="FEM-Bend" stiffness="3000" damping="1.0" />
                <TriangleCollisionModel />
            </Node>
        </Node>
    </Node>
</Node>
