<?xml version="1.0" ?>
<!-- Mechanical PointSplatModel Example -->
<Node dt="0.005" gravity="0 -10 0">
    <RequiredPlugin pluginName="Sofa.Component.Collision.Detection.Algorithm"/> <!-- Needed to use components [BVHNarrowPhase BruteForceBroadPhase CollisionPipeline] -->
    <RequiredPlugin pluginName="Sofa.Component.Collision.Detection.Intersection"/> <!-- Needed to use components [NewProximityIntersection] -->
    <RequiredPlugin pluginName="Sofa.Component.Collision.Geometry"/> <!-- Needed to use components [LineCollisionModel PointCollisionModel TriangleCollisionModel] -->
    <RequiredPlugin pluginName="Sofa.Component.Collision.Response.Contact"/> <!-- Needed to use components [CollisionResponse] -->
    <RequiredPlugin pluginName="Sofa.Component.IO.Mesh"/> <!-- Needed to use components [MeshOBJLoader] -->
    <RequiredPlugin pluginName="Sofa.Component.Mass"/> <!-- Needed to use components [UniformMass] -->
    <RequiredPlugin pluginName="Sofa.Component.IntegrationSchemes.Forward"/> <!-- Needed to use components [RungeKutta4IntegrationScheme] -->
    <RequiredPlugin pluginName="Sofa.Component.StateContainer"/> <!-- Needed to use components [MechanicalObject] -->
    <RequiredPlugin pluginName="Sofa.Component.Topology.Container.Constant"/> <!-- Needed to use components [MeshTopology] -->
    <RequiredPlugin pluginName="Sofa.Component.Topology.Container.Dynamic"/> <!-- Needed to use components [PointSetTopologyContainer PointSetTopologyModifier] -->
    <RequiredPlugin pluginName="Sofa.GL.Component.Rendering3D"/> <!-- Needed to use components [OglModel PointSplatModel] -->

    <DefaultAnimationLoop/>
    <CollisionPipeline verbose="0" />
    <NewProximityIntersection alarmDistance="0.5" contactDistance="0.3" />
    <BruteForceBroadPhase/>
    <BVHNarrowPhase/>
    <CollisionResponse response="PenalityContactForceField" />
    <Node name="Fluid">
        <RungeKutta4IntegrationScheme />
		<MeshOBJLoader name="meshLoader" filename="mesh/dragon_clean.obj" scale3d="0.2 0.2 0.2"/>
        <PointSetTopologyContainer />
        <MechanicalObject name="MModel" position="@meshLoader.position"/>

		<PointSetTopologyContainer name="con" />
        <PointSetTopologyModifier name="mod" />

        <UniformMass name="M1" vertexMass="1" />
        <!-- Visual model -->
        <PointSplatModel name="VModel" radius="0.25" alpha="0.1" color="cyan" />
		<PointCollisionModel contactStiffness="100"  />
    </Node>
    <Node name="World">
        <MechanicalObject position="-4 -1.6 -4    4 -5.6 -4    4 -6.4 4    -4 -2.4 4" scale="1.075" />
        <MeshTopology triangles="0 1 2  0 2 3" />
        <TriangleCollisionModel contactStiffness="20" moving="false" simulated="false" />
        <LineCollisionModel contactStiffness="20" moving="false" simulated="false" />
        <PointCollisionModel contactStiffness="20" moving="false" simulated="false" />
        <OglModel name="VModel" color="blue" printLog="true" />
    </Node>
</Node>
