<?xml version="1.0"?>

<Node name="root" gravity="0 -9.81 0" dt="0.01">
    <DefaultAnimationLoop/>
    <Node name="plugins">
        <RequiredPlugin pluginName="Sofa.Component.Mass"/> <!-- Needed to use components [UniformMass] -->
        <RequiredPlugin pluginName="Sofa.Component.IntegrationSchemes.Forward"/> <!-- Needed to use components [EulerExplicitIntegrationScheme] -->
        <RequiredPlugin pluginName="Sofa.Component.StateContainer"/> <!-- Needed to use components [MechanicalObject] -->
        <RequiredPlugin pluginName="Sofa.Component.Visual"/> <!-- Needed to use components [TrailRenderer VisualGrid] -->
    </Node>

    <VisualGrid size="20"/>

    <DefaultAnimationLoop/>

    <EulerExplicitIntegrationScheme/>
    <MechanicalObject template="Vec3" name="particle"
                      position="0 0 0  0 0 0  0 0 0  0 0 0"
                      velocity="5 5 0  -5 5 0  7 7 0  -7 7 0" showObject="true" showObjectScale="10"/>
    <UniformMass totalMass="1.0"/>
    <TrailRenderer template="Vec3" position="@particle.position" nbSteps="200" color="HSV" thickness="10"/>
</Node>
