<?xml version="1.0"?>
<Node name="root" dt="0.01" gravity="0 -9.81 0">

    <Node name="tetra">
        <EulerImplicitSolver name="cg_odesolver" printLog="false"  rayleighStiffness="0.1" rayleighMass="0.1" />
        <CGLinearSolver iterations="25" name="linear solver" tolerance="1.0e-9" threshold="1.0e-9" />

        <RegularGridTopology name="grid" min="-5 -5 0" max="5 5 40" n="5 5 20"/>
        <MechanicalObject template="Vec3" name="state"/>

        <TetrahedronSetTopologyContainer name="Tetra_topo"/>
        <TetrahedronSetTopologyModifier name="Modifier" />
        <TetrahedronSetGeometryAlgorithms template="Vec3" name="GeomAlgo" />
        <Hexa2TetraTopologicalMapping input="@grid" output="@Tetra_topo" />

        <DiagonalMass massDensity="0.2" />
        <TetrahedronFEMForceField name="FEM" youngModulus="1000" poissonRatio="0.4" computeGlobalMatrix="false"/>

        <BoxROI template="Vec3" name="box_roi" box="-6 -6 -1 50 6 0.1" drawBoxes="1" />
        <FixedProjectiveConstraint template="Vec3" indices="@box_roi.indices" />

        <VisualMesh position="@state.position" topology="@Tetra_topo"/>
    </Node>

    <Node name="hexa">
        <EulerImplicitSolver name="cg_odesolver" printLog="false"  rayleighStiffness="0.1" rayleighMass="0.1" />
        <CGLinearSolver iterations="25" name="linear solver" tolerance="1.0e-9" threshold="1.0e-9" />

        <RegularGridTopology name="grid" min="-5 -5 0" max="5 5 40" n="5 5 20"/>
        <MechanicalObject template="Vec3" name="state" translation="15 0 0"/>

        <DiagonalMass massDensity="0.2" />
        <HexahedronFEMForceField name="FEM" youngModulus="1000" poissonRatio="0.4" method="large"/>

        <BoxROI template="Vec3" name="box_roi" box="-6 -6 -1 50 6 0.1" drawBoxes="1" />
        <FixedProjectiveConstraint template="Vec3" indices="@box_roi.indices" />

        <VisualMesh position="@state.position" topology="@grid"/>
    </Node>
</Node>
