<Node name="root" gravity="0 -9.81 0" dt="0.01">

    <Node name="plugins">
        <RequiredPlugin pluginName="Sofa.Component.Constraint.Projective"/> <!-- Needed to use components [FixedProjectiveConstraint] -->
        <RequiredPlugin pluginName="Sofa.Component.Engine.Select"/> <!-- Needed to use components [BoxROI] -->
        <RequiredPlugin pluginName="Sofa.Component.LinearSolver.Direct"/> <!-- Needed to use components [BTDLinearSolver,EigenSimplicialLDLT] -->
        <RequiredPlugin pluginName="Sofa.Component.LinearSystem"/> <!-- Needed to use components [ConstantSparsityPatternSystem] -->
        <RequiredPlugin pluginName="Sofa.Component.Mass"/> <!-- Needed to use components [UniformMass] -->
        <RequiredPlugin pluginName="Sofa.Component.IntegrationSchemes.Backward"/> <!-- Needed to use components [EulerImplicitIntegrationScheme] -->
        <RequiredPlugin pluginName="Sofa.Component.SolidMechanics.FEM.Elastic"/> <!-- Needed to use components [BeamFEMForceField,HexahedronFEMForceField] -->
        <RequiredPlugin pluginName="Sofa.Component.StateContainer"/> <!-- Needed to use components [MechanicalObject] -->
        <RequiredPlugin pluginName="Sofa.Component.Topology.Container.Constant"/> <!-- Needed to use components [MeshTopology] -->
        <RequiredPlugin pluginName="Sofa.Component.Topology.Container.Grid"/> <!-- Needed to use components [RegularGridTopology] -->
        <RequiredPlugin pluginName="Sofa.Component.Visual"/> <!-- Needed to use components [LineAxis,VisualGrid,VisualPointCloud,VisualStyle] -->
    </Node>

    <DefaultAnimationLoop parallelODESolving="true"/>
    <DefaultVisualManagerLoop name="visualLoop"/>
    <VisualStyle displayFlags="showVisual" />
    <VisualGrid name="grid"/>
    <LineAxis size="@grid.size"/>

    <Node name="3d_point">
        <EulerImplicitIntegrationScheme name="odesolver" rayleighStiffness="0.1" rayleighMass="0.1" />
        <ConstantSparsityPatternSystem template="CompressedRowSparseMatrixd" name="A"/>
        <EigenSimplicialLDLT template="CompressedRowSparseMatrixd"/>
        <MechanicalObject name="DoFs" template="Vec3" />
        <UniformMass name="mass" totalMass="320" />
        <RegularGridTopology name="grid" nx="4" ny="4" nz="10" xmin="-5" xmax="-3" ymin="2" ymax="5" zmin="0" zmax="9" />
        <BoxROI name="box" box="-6 1 -0.0001  -2 6 0.0001"/>
        <FixedProjectiveConstraint indices="@box.indices" />
        <HexahedronFEMForceField name="FEM" youngModulus="4000" poissonRatio="0.3" method="large" />

        <VisualPointCloud position="@DoFs.position" pointSize="10" drawMode="Point" color="navy"/>
    </Node>

    <Node name="3d_sphere">
        <EulerImplicitIntegrationScheme name="odesolver" rayleighStiffness="0.1" rayleighMass="0.1" />
        <ConstantSparsityPatternSystem template="CompressedRowSparseMatrixd" name="A"/>
        <EigenSimplicialLDLT template="CompressedRowSparseMatrixd"/>
        <MechanicalObject name="DoFs" template="Vec3" />
        <UniformMass name="mass" totalMass="320" />
        <RegularGridTopology name="grid" nx="4" ny="4" nz="10" xmin="-5" xmax="-3" ymin="-5" ymax="-2" zmin="0" zmax="9" />
        <BoxROI name="box" box="-6 -6 -0.0001  -2 -1 0.0001"/>
        <FixedProjectiveConstraint indices="@box.indices" />
        <HexahedronFEMForceField name="FEM" youngModulus="4000" poissonRatio="0.3" method="large" />

        <VisualPointCloud position="@DoFs.position" drawMode="Sphere" sphereRadius="0.1" color="lime"/>
    </Node>

    <Node name="rigid3">
        <EulerImplicitIntegrationScheme rayleighStiffness="0" printLog="false" rayleighMass="0.1"/>
        <BTDLinearSolver template="BTDMatrix6d"/>

        <MechanicalObject template="Rigid3" name="DoFs" position="0 0 1 0 0 0 1  1 0 1 0 0 0 1  2 0 1 0 0 0 1  3 0 1 0 0 0 1" />
        <MeshTopology name="lines" lines="0 1 1 2 2 3" />
        <FixedProjectiveConstraint name="FixedProjectiveConstraint" indices="0" />
        <UniformMass totalMass="4" />
        <BeamFEMForceField name="FEM" radius="0.05" radiusInner="0" youngModulus="20000000" poissonRatio="0.49"/>

        <VisualPointCloud position="@DoFs.position" pointSize="1" template="Rigid3" drawMode="Frame"/>
    </Node>
</Node>
