<?xml version="1.0"?>
<Node name="root" dt="0.02">
    <RequiredPlugin name="SofaOpenglVisual"/>
    <RequiredPlugin name="SofaImplicitOdeSolver"/>
    <RequiredPlugin name="SofaLoader"/>
    <RequiredPlugin name="SofaMeshCollision"/>
    <RequiredPlugin name="SofaSimpleFem"/>

    <VisualStyle displayFlags="showBehaviorModels showForceFields" />
    <DefaultPipeline verbose="0" draw="0" />
    <BruteForceBroadPhase/>
    <BVHNarrowPhase/>
    <LMDNewProximityIntersection name="Proximity" alarmDistance="0.8" contactDistance="0.5" />
    <DefaultContactManager name="Response" response="default" />
    <Node name="cubeFEM">
        <EulerImplicitSolver name="cg_odesolver" printLog="false"  rayleighStiffness="0.1" rayleighMass="0.1" />
        <CGLinearSolver iterations="25" name="linear solver" tolerance="1.0e-9" threshold="1.0e-9" />
        <MechanicalObject />
        <UniformMass vertexMass="0.25" />
        <RegularGridTopology nx="5" ny="5" nz="5" xmin="-3.5" xmax="3.5" ymin="-3.5" ymax="3.5" zmin="-3.5" zmax="3.5" />
        <TetrahedronFEMForceField name="FEM" youngModulus="25" poissonRatio="0.3" computeGlobalMatrix="false" updateStiffnessMatrix="false" method="large" />
        <Node name="Visu">
            <MeshObjLoader name="meshLoader_0" filename="mesh/smCube125.obj" handleSeams="1" />
            <OglModel name="Visual" src="@meshLoader_0" color="red" />
            <SubsetMapping input="@.." output="@Visual" />
        </Node>
        <Node name="Surf">
            <MeshObjLoader name="loader" filename="mesh/smCube125.obj" />
            <MeshTopology src="@loader" />
            <MechanicalObject src="@loader" />
            <TriangleCollisionModel />
            <TriangleLocalMinDistanceFilter />
            <LineLocalMinDistanceFilter />
            <LineCollisionModel />
            <PointLocalMinDistanceFilter />
            <PointCollisionModel />
            <SubsetMapping />
        </Node>
    </Node>
    <Node name="Floor">
        <MeshObjLoader name="loader" filename="mesh/floor3.obj" triangulate="true"  translation="0 -10 0" scale="1.75"/>
        <MeshTopology src="@loader" />
        <MechanicalObject src="@loader" />
        <TriangleCollisionModel name="FloorTriangle" simulated="0" moving="0" />
        <TriangleLocalMinDistanceFilter />
        <LineCollisionModel name="FloorLine" simulated="0" moving="0" />
        <LineLocalMinDistanceFilter />
        <PointCollisionModel name="FloorPoint" simulated="0" moving="0" />
        <PointLocalMinDistanceFilter />
        <MeshObjLoader name="meshLoader_1" filename="mesh/floor3.obj" scale="1.75" handleSeams="1" />
        <OglModel name="FloorV" src="@meshLoader_1" texturename="textures/brushed_metal.bmp" dy="-10" />
    </Node>
</Node>
