<Node name="root" dt="0.03333">
    <RequiredPlugin name="SofaOpenglVisual"/>
    <DefaultPipeline verbose="0" depth="10" draw="0" />
    <RayTraceDetection name="N2" />
    <NewProximityIntersection name="Proximity" alarmDistance="2" contactDistance="0.7" />
    <DefaultContactManager name="Response" response="default" />
    <DefaultCollisionGroupManager name="Group" />
    <Node name="Torus">
        <EulerImplicitSolver name="cg_odesolver" printLog="false"  rayleighStiffness="0.1" rayleighMass="0.1" />
        <CGLinearSolver iterations="25" name="linear solver" tolerance="1.0e-9" threshold="1.0e-9" />
        <MechanicalObject dx="0" dy="20" dz="-11" />
        <UniformMass totalMass="30" />
        <RegularGridTopology nx="6" ny="5" nz="2" xmin="-7.5" xmax="7.5" ymin="-6" ymax="6" zmin="-1.75" zmax="1.75" />
        <RegularGridSpringForceField name="Springs" stiffness="270" damping="0" />
        <Node name="Visu">
            <MeshObjLoader name="meshLoader_6" filename="mesh/torus2_scale3.obj" handleSeams="1" />
            <OglModel name="Visual" src="@meshLoader_6" color="blue" />
            <BarycentricMapping input="@.." output="@Visual" />
        </Node>
        <Node name="Surf">
            <MeshObjLoader name="loader" filename="mesh/torus2_scale3_for_collision.obj" />
            <Mesh src="@loader" />
            <MechanicalObject src="@loader" />
            <TriangleOctree />
            <BarycentricMapping />
        </Node>
    </Node>
    <Node name="Torus">
        <EulerImplicitSolver name="cg_odesolver" printLog="false" />
        <CGLinearSolver iterations="25" name="linear solver" tolerance="1.0e-9" threshold="1.0e-9" />
        <MechanicalObject dx="0" dy="20" dz="-13" />
        <UniformMass totalMass="30" />
        <RegularGridTopology nx="6" ny="5" nz="2" xmin="-7.5" xmax="7.5" ymin="-6" ymax="6" zmin="-1.75" zmax="1.75" />
        <RegularGridSpringForceField name="Springs" stiffness="270" damping="0" />
        <Node name="Visu">
            <MeshObjLoader name="meshLoader_1" filename="mesh/torus2_scale3.obj" handleSeams="1" />
            <OglModel name="Visual" src="@meshLoader_1" color="blue" />
            <BarycentricMapping input="@.." output="@Visual" />
        </Node>
        <Node name="Surf">
            <MeshObjLoader name="loader" filename="mesh/torus2_scale3_for_collision.obj" />
            <Mesh src="@loader" />
            <MechanicalObject src="@loader"/>
            <TriangleOctree />
            <BarycentricMapping />
        </Node>
    </Node>
    <Node name="Torus">
        <EulerImplicitSolver name="cg_odesolver" printLog="false" />
        <CGLinearSolver iterations="25" name="linear solver" tolerance="1.0e-9" threshold="1.0e-9" />
        <MechanicalObject dx="0" dy="20" dz="-15" />
        <UniformMass totalMass="30" />
        <RegularGridTopology nx="6" ny="5" nz="2" xmin="-7.5" xmax="7.5" ymin="-6" ymax="6" zmin="-1.75" zmax="1.75" />
        <RegularGridSpringForceField name="Springs" stiffness="270" damping="0" />
        <Node name="Visu">
            <MeshObjLoader name="meshLoader_8" filename="mesh/torus2_scale3.obj" handleSeams="1" />
            <OglModel name="Visual" src="@meshLoader_8" color="blue" />
            <BarycentricMapping input="@.." output="@Visual" />
        </Node>
        <Node name="Surf">
            <MeshObjLoader name="loader" filename="mesh/torus2_scale3_for_collision.obj" />
            <Mesh src="@loader" />
            <MechanicalObject src="@loader" />
            <TriangleOctree />
            <BarycentricMapping />
        </Node>
    </Node>
    <Node name="Torus">
        <EulerImplicitSolver name="cg_odesolver" printLog="false" />
        <CGLinearSolver iterations="25" name="linear solver" tolerance="1.0e-9" threshold="1.0e-9" />
        <MechanicalObject dx="0" dy="20" dz="-17" />
        <UniformMass totalMass="30" />
        <RegularGridTopology nx="6" ny="5" nz="2" xmin="-7.5" xmax="7.5" ymin="-6" ymax="6" zmin="-1.75" zmax="1.75" />
        <RegularGridSpringForceField name="Springs" stiffness="270" damping="0" />
        <Node name="Visu">
            <MeshObjLoader name="meshLoader_3" filename="mesh/torus2_scale3.obj" handleSeams="1" />
            <OglModel name="Visual" src="@meshLoader_3" color="blue" />
            <BarycentricMapping input="@.." output="@Visual" />
        </Node>
        <Node name="Surf">
            <MeshObjLoader name="loader" filename="mesh/torus2_scale3_for_collision.obj" />
            <Mesh src="@loader" />
            <MechanicalObject src="@loader" />
            <TriangleOctree />
            <BarycentricMapping />
        </Node>
    </Node>
    <Node name="Torus">
        <EulerImplicitSolver name="cg_odesolver" printLog="false" />
        <CGLinearSolver iterations="25" name="linear solver" tolerance="1.0e-9" threshold="1.0e-9" />
        <MechanicalObject dx="0" dy="20" dz="-19" />
        <UniformMass totalMass="30" />
        <RegularGridTopology nx="6" ny="5" nz="2" xmin="-7.5" xmax="7.5" ymin="-6" ymax="6" zmin="-1.75" zmax="1.75" />
        <RegularGridSpringForceField name="Springs" stiffness="270" damping="0" />
        <Node name="Visu">
            <MeshObjLoader name="meshLoader_10" filename="mesh/torus2_scale3.obj" handleSeams="1" />
            <OglModel name="Visual" src="@meshLoader_10" color="blue" />
            <BarycentricMapping input="@.." output="@Visual" />
        </Node>
        <Node name="Surf">
            <MeshObjLoader name="loader" filename="mesh/torus2_scale3_for_collision.obj" />
            <Mesh src="@loader" />
            <MechanicalObject src="@loader" />
            <TriangleOctree />
            <BarycentricMapping />
        </Node>
    </Node>
    <Node name="Torus">
        <EulerImplicitSolver name="cg_odesolver" printLog="false" />
        <CGLinearSolver iterations="25" name="linear solver" tolerance="1.0e-9" threshold="1.0e-9" />
        <MechanicalObject dx="0" dy="20" dz="-23" />
        <UniformMass totalMass="30" />
        <RegularGridTopology nx="6" ny="5" nz="2" xmin="-7.5" xmax="7.5" ymin="-6" ymax="6" zmin="-1.75" zmax="1.75" />
        <RegularGridSpringForceField name="Springs" stiffness="270" damping="0" />
        <Node name="Visu">
            <MeshObjLoader name="meshLoader_5" filename="mesh/torus2_scale3.obj" handleSeams="1" />
            <OglModel name="Visual" src="@meshLoader_5" color="blue" />
            <BarycentricMapping input="@.." output="@Visual" />
        </Node>
        <Node name="Surf">
            <MeshObjLoader name="loader" filename="mesh/torus2_scale3_for_collision.obj" />
            <Mesh src="@loader" />
            <MechanicalObject src="@loader" />
            <TriangleOctree />
            <BarycentricMapping />
        </Node>
    </Node>
    <Node name="Torus">
        <EulerImplicitSolver name="cg_odesolver" printLog="false" />
        <CGLinearSolver iterations="25" name="linear solver" tolerance="1.0e-9" threshold="1.0e-9" />
        <MechanicalObject dx="0" dy="20" dz="-21" />
        <UniformMass totalMass="30" />
        <RegularGridTopology nx="6" ny="5" nz="2" xmin="-7.5" xmax="7.5" ymin="-6" ymax="6" zmin="-1.75" zmax="1.75" />
        <RegularGridSpringForceField name="Springs" stiffness="270" damping="0" />
        <Node name="Visu">
            <MeshObjLoader name="meshLoader_0" filename="mesh/torus2_scale3.obj" handleSeams="1" />
            <OglModel name="Visual" src="@meshLoader_0" color="blue" />
            <BarycentricMapping input="@.." output="@Visual" />
        </Node>
        <Node name="Surf">
            <MeshObjLoader name="loader" filename="mesh/torus2_scale3_for_collision.obj" />
            <Mesh src="@loader" />
            <MechanicalObject src="@loader" />
            <TriangleOctree />
            <BarycentricMapping />
        </Node>
    </Node>
    <Node name="Torus">
        <EulerImplicitSolver name="cg_odesolver" printLog="false" />
        <CGLinearSolver iterations="25" name="linear solver" tolerance="1.0e-9" threshold="1.0e-9" />
        <MechanicalObject dx="0" dy="20" dz="-29" />
        <UniformMass totalMass="30" />
        <RegularGridTopology nx="6" ny="5" nz="2" xmin="-7.5" xmax="7.5" ymin="-6" ymax="6" zmin="-1.75" zmax="1.75" />
        <RegularGridSpringForceField name="Springs" stiffness="270" damping="0" />
        <Node name="Visu">
            <MeshObjLoader name="meshLoader_7" filename="mesh/torus2_scale3.obj" handleSeams="1" />
            <OglModel name="Visual" src="@meshLoader_7" color="blue" />
            <BarycentricMapping input="@.." output="@Visual" />
        </Node>
        <Node name="Surf">
            <MeshObjLoader name="loader" filename="mesh/torus2_scale3_for_collision.obj" />
            <Mesh src="@loader" />
            <MechanicalObject src="@loader" />
            <TriangleOctree />
            <BarycentricMapping />
        </Node>
    </Node>
    <Node name="Torus">
        <EulerImplicitSolver name="cg_odesolver" printLog="false" />
        <CGLinearSolver iterations="25" name="linear solver" tolerance="1.0e-9" threshold="1.0e-9" />
        <MechanicalObject dx="0" dy="20" dz="-27" />
        <UniformMass totalMass="30" />
        <RegularGridTopology nx="6" ny="5" nz="2" xmin="-7.5" xmax="7.5" ymin="-6" ymax="6" zmin="-1.75" zmax="1.75" />
        <RegularGridSpringForceField name="Springs" stiffness="270" damping="0" />
        <Node name="Visu">
            <MeshObjLoader name="meshLoader_2" filename="mesh/torus2_scale3.obj" handleSeams="1" />
            <OglModel name="Visual" src="@meshLoader_2" color="blue" />
            <BarycentricMapping input="@.." output="@Visual" />
        </Node>
        <Node name="Surf">
            <MeshObjLoader name="loader" filename="mesh/torus2_scale3_for_collision.obj" />
            <Mesh src="@loader" />
            <MechanicalObject src="@loader" />
            <TriangleOctree />
            <BarycentricMapping />
        </Node>
    </Node>
    <Node name="Torus">
        <EulerImplicitSolver name="cg_odesolver" printLog="false" />
        <CGLinearSolver iterations="25" name="linear solver" tolerance="1.0e-9" threshold="1.0e-9" />
        <MechanicalObject dx="0" dy="20" dz="-25" />
        <UniformMass totalMass="30" />
        <RegularGridTopology nx="6" ny="5" nz="2" xmin="-7.5" xmax="7.5" ymin="-6" ymax="6" zmin="-1.75" zmax="1.75" />
        <RegularGridSpringForceField name="Springs" stiffness="270" damping="0" />
        <Node name="Visu">
            <MeshObjLoader name="meshLoader_9" filename="mesh/torus2_scale3.obj" handleSeams="1" />
            <OglModel name="Visual" src="@meshLoader_9" color="blue" />
            <BarycentricMapping input="@.." output="@Visual" />
        </Node>
        <Node name="Surf">
            <MeshObjLoader name="loader" filename="mesh/torus2_scale3_for_collision.obj" />
            <Mesh src="@loader" />
            <MechanicalObject src="@loader" />
            <TriangleOctree />
            <BarycentricMapping />
        </Node>
    </Node>
    <Node name="Floor">
        <MeshObjLoader name="loader" filename="mesh/floor2b.obj" />
        <Mesh src="@loader" />
        <MechanicalObject src="@loader" dy="-10" scale="0.5" />
        <TriangleOctree name="Floor" simulated="0" moving="0" />
        <MeshObjLoader name="meshLoader_4" filename="mesh/floor2b.obj" scale="0.5" handleSeams="1" />
        <OglModel name="FloorV" src="@meshLoader_4" texturename="textures/floor.bmp" color="lightgray" dy="-10" />
    </Node>
</Node>
