<?xml version="1.0"?>
<!-- Mechanical RuleBasedContactManager Example -->
<Node name="root" dt="0.01">
    <RequiredPlugin name="SofaOpenglVisual"/>
    <RequiredPlugin name="SofaMiscCollision"/>
    <RequiredPlugin name='SofaLoader'/>
    <RequiredPlugin pluginName='SofaConstraint'/>
    <RequiredPlugin pluginName='SofaImplicitOdeSolver'/>
    <RequiredPlugin pluginName='SofaMeshCollision'/>
    <RequiredPlugin pluginName='SofaRigid'/>

    <VisualStyle displayFlags="showBehaviorModels showVisual" />
    <FreeMotionAnimationLoop />
	<GenericConstraintSolver maxIterations="1000" tolerance="0.001"/>
    <DefaultPipeline depth="6" verbose="0" draw="0" />
    <BruteForceDetection name="N2" />
    <LocalMinDistance name="Proximity" alarmDistance="1.5" contactDistance="1.0" angleCone="0.0" />
    <RuleBasedContactManager name="Response" response="FrictionContact" rules="4 * default" />
    <DefaultCollisionGroupManager name="Group" />

    <Node name="Torus1">
        <MeshObjLoader filename="mesh/torus2_for_collision.obj" name="loader" />
        <MeshTopology src="@loader"/>
        <MechanicalObject src="@loader" scale="5.0" />
        <TriangleCollisionModel simulated="0" moving="0" name="Torus1Triangle" group="1" />
        <LineCollisionModel simulated="0" moving="0" name="Torus1Line" group="1" />
        <PointCollisionModel simulated="0" moving="0" name="Torus1Point" group="1" />
        <MeshObjLoader name="meshLoader_2" filename="mesh/torus2.obj" scale="5.0" handleSeams="1" />
        <OglModel name="Visual" src="@meshLoader_2" color="0.5 0.5 0.5 1.0" />
    </Node>

    <Node name="Torus2">
        <EulerImplicitSolver  rayleighStiffness="0.1" rayleighMass="0.1" />
        <CGLinearSolver iterations="25" tolerance="1e-5" threshold="1e-5"/>
        <MechanicalObject template="Rigid3d" scale="5.0" dx="-12" dy="0" />
        <UniformMass filename="BehaviorModels/torus.rigid"/>
        <UncoupledConstraintCorrection />
        <Node name="Visu">
            <MeshObjLoader name="meshLoader_3" filename="mesh/torus.obj" scale="5.0" handleSeams="1" />
            <OglModel name="Visual" src="@meshLoader_3" color="0.0 0.5 0.5 1.0" />
            <RigidMapping input="@.." output="@Visual" />
        </Node>
        <Node name="Surf2">
            <MeshObjLoader filename="mesh/torus_for_collision.obj" name="loader" />
            <MeshTopology src="@loader"/>
            <MechanicalObject src="@loader" scale="5.0" />
            <TriangleCollisionModel name="Torus2Triangle" group="2" />
            <LineCollisionModel name="Torus2Line" group="2" />
            <PointCollisionModel name="Torus2Point" group="2" />
            <RigidMapping />
        </Node>
    </Node>

    <Node name="Torus3">
        <EulerImplicitSolver rayleighStiffness="0.1" rayleighMass="0.1"/>
        <CGLinearSolver iterations="25" tolerance="1e-5" threshold="1e-5"/>
        <MechanicalObject template="Rigid3d" scale="5.0" dx="-25" dy="0" />
        <UniformMass filename="BehaviorModels/torus2.rigid"/>
        <UncoupledConstraintCorrection />
        <Node name="Visu">
            <MeshObjLoader name="meshLoader_1" filename="mesh/torus2.obj" scale="5.0" handleSeams="1" />
            <OglModel name="Visual" src="@meshLoader_1" color="1.0 0.5 0.25 1.0" />
            <RigidMapping input="@.." output="@Visual" />
        </Node>
        <Node name="Surf2">
            <MeshObjLoader filename="mesh/torus2_for_collision.obj" name="loader" />
            <MeshTopology src="@loader" />
            <MechanicalObject src="@loader" scale="5.0" />
            <TriangleCollisionModel name="Torus3Triangle" group="3" />
            <LineCollisionModel name="Torus3Line" group="3" />
            <PointCollisionModel name="Torus3Point" group="3" />
            <RigidMapping />
        </Node>
    </Node>

    <Node name="Torus4">
        <EulerImplicitSolver rayleighStiffness="0.1" rayleighMass="0.1"/>
        <CGLinearSolver iterations="25" tolerance="1e-5" threshold="1e-5"/>
        <MechanicalObject template="Rigid3d" scale="5.0" dx="-38" dy="0" />
        <UniformMass filename="BehaviorModels/torus.rigid"/>
        <UncoupledConstraintCorrection />
        <Node name="Visu">
            <MeshObjLoader name="meshLoader_0" filename="mesh/torus.obj" scale="5.0" handleSeams="1" />
            <OglModel name="Visual" src="@meshLoader_0" color="0.0 0.5 0.5 1.0" />
            <RigidMapping input="@.." output="@Visual" />
        </Node>
        <Node name="Surf2">
            <MeshObjLoader filename="mesh/torus_for_collision.obj" name="loader" />
            <MeshTopology src="@loader"/>
            <MechanicalObject src="@loader" scale="5.0" />
            <TriangleCollisionModel name="Torus4Triangle" group="4" />
            <LineCollisionModel name="Torus4Line" group="4" />
            <PointCollisionModel name="Torus4Point" group="4" />
            <RigidMapping />
        </Node>
    </Node>
</Node>
