<?xml version="1.0" ?>
<Node dt="0.005" gravity="0 -10 0">
    <RequiredPlugin name="SofaOpenglVisual"/>
    <RequiredPlugin pluginName="SofaSphFluid"/>
    <RequiredPlugin pluginName="SofaMiscCollision"/>
    <RequiredPlugin pluginName='SofaGeneralExplicitOdeSolver'/>
    <RequiredPlugin pluginName='SofaMeshCollision'/>

    <VisualStyle displayFlags="showBehaviorModels showForceFields" />
    <DefaultPipeline verbose="0" />
    <NewProximityIntersection alarmDistance="0.5" contactDistance="0.3" />
    <BruteForceBroadPhase/>
    <BVHNarrowPhase/>
    <DefaultContactManager response="default" />
    <Node name="Fluid">
        <RungeKutta4Solver />
        <PointSetTopologyContainer />
        <MechanicalObject name="MModel" />
        <PointSetTopologyContainer name="con" />
        <PointSetTopologyModifier name="mod" />
        <ParticleSource name="Source" center="&#x0A;-0.375 0 -0.75&#x0A; 0.0   0 -0.75&#x0A; 0.375 0 -0.75&#x0A;-0.75  0 -0.375&#x0A;-0.375 0 -0.375&#x0A; 0.0   0 -0.375&#x0A; 0.375 0 -0.375&#x0A; 0.75  0 -0.375&#x0A;-0.75  0  0.0&#x0A;-0.375 0  0.0&#x0A; 0.0   0  0.0&#x0A; 0.375 0  0.0&#x0A; 0.75  0  0.0&#x0A;-0.75  0  0.375&#x0A;-0.375 0  0.375&#x0A; 0.0   0  0.375&#x0A; 0.375 0  0.375&#x0A; 0.75  0  0.375&#x0A;-0.375 0  0.75&#x0A; 0.0   0  0.75&#x0A; 0.375 0  0.75&#x0A; " translation="0 3 0" radius="0.01 0.1 0.01" velocity="0 -20 0" delay="0.01875" start="-0.1" stop="2" />
        <ParticleSink normal="0 1 0" d0="-10" d1="-11" showPlane="true" printLog="false" />
        <UniformMass name="M1" vertexMass="1" />
        <SpatialGridContainer cellWidth="0.75" sortPoints="true" />
        <SPHFluidForceField radius="0.75" density="15" viscosity="10" pressure="1000" surfaceTension="-1000" />
        <Node id="Visual">
            <OglModel name="VModel" color="blue" />
            <SPHFluidSurfaceMapping name="MarchingCube" input="@../MModel" output="@VModel" isoValue="0.5" radius="0.75" step="0.25" />
        </Node>
        <SpatialGridPointModel contactStiffness="1000" />
    </Node>
    <Node name="World">
        <MechanicalObject position="&#x0A;&#x09;&#x09;&#x09;&#x09;&#x09;&#x09;    -4 -1.6 -4    4 -5.6 -4    4 -6.4 4    -4 -2.4 4&#x0A;&#x09;&#x09;&#x09;&#x09;&#x09;&#x09;    -4 -1.6 -4    -4 -1.5 -4    4 -1.5 -4    4 -5.6 -4&#x0A;&#x09;&#x09;&#x09;&#x09;&#x09;&#x09;    4 -5.6 -4    4 -1.5 -4    4 -1.5 4    4 -6.4 4&#x0A;&#x09;&#x09;&#x09;&#x09;&#x09;&#x09;    4 -6.4 4    4 -1.5 4    -4 -1.5 4    -4 -2.4 4&#x0A;&#x09;&#x09;&#x09;&#x09;&#x09;&#x09;    -4 -2.4 4    -4 -1.5 4    -4 -1.5 -4    -4 -1.6 -4&#x0A;&#x09;&#x09;&#x09;&#x09;&#x09;&#x09;    " scale="1.075" />
        <MeshTopology triangles="0 1 2  0 2 3    4 5 6  4 6 7    8 9 10  8 10 11    12 13 14  12 14 15    16 17 18  16 18 19" />
        <TriangleCollisionModel contactStiffness="20" moving="false" simulated="false" />
        <LineCollisionModel contactStiffness="20" moving="false" simulated="false" />
        <PointCollisionModel contactStiffness="20" moving="false" simulated="false" />
        <OglModel name="VModel" color="0.95 1.0 0.95 0.25" printLog="true" />
    </Node>
</Node>
