<?xml version="1.0"?>
<!-- BilateralInteractionConstraint example -->
<Node name="root" dt="0.001" gravity="0 -981 0">
    <RequiredPlugin pluginName="SofaOpenglVisual"/>
    <RequiredPlugin pluginName="SofaMiscCollision"/>
    <RequiredPlugin pluginName='SofaLoader'/>
    <RequiredPlugin pluginName='SofaConstraint'/>
    <RequiredPlugin pluginName='SofaImplicitOdeSolver'/>
    <RequiredPlugin pluginName='SofaMeshCollision'/>
    <RequiredPlugin pluginName='SofaRigid'/>

    <VisualStyle displayFlags="showForceFields" />
    <FreeMotionAnimationLoop />
    <GenericConstraintSolver tolerance="0.001" maxIterations="1000"/>
    <DefaultPipeline depth="6" verbose="0" draw="0" />
    <BruteForceBroadPhase/>
    <BVHNarrowPhase/>
    <LocalMinDistance name="Proximity" alarmDistance="0.2" contactDistance="0.09" angleCone="0.0" />
    <DefaultContactManager name="Response" response="FrictionContact" />
    <DefaultCollisionGroupManager name="Group" />
    <Node name="CUBE_0">
        <MechanicalObject dy="2.5" />
        <Node name="Visu">
            <MeshOBJLoader name="meshLoader_0" filename="mesh/cube.obj" handleSeams="1" />
            <OglModel name="Visual" src="@meshLoader_0" color="1 0 0 1" dy="2.5" />
        </Node>
        <Node name="ColliCube">
            <MeshOBJLoader name="loader" filename="mesh/cube.obj" triangulate="1" />
            <MeshTopology src="@loader" />
            <MechanicalObject src="@loader" template="Vec3d" dy="2.5" />
            <TriangleCollisionModel simulated="0" moving="0" />
            <LineCollisionModel simulated="0" moving="0" />
            <PointCollisionModel simulated="0" moving="0" />
        </Node>
        <Node name="Constraints">
            <MechanicalObject name="points" template="Vec3d" position="1 1.25 1" />
        </Node>
    </Node>
    <Node name="CUBE_1">
        <EulerImplicitSolver printLog="false" rayleighStiffness="0.1" rayleighMass="0.1"/>
        <CGLinearSolver iterations="25" tolerance="1.0e-9" threshold="1.0e-9" />
        <MechanicalObject template="Rigid3d" scale="1.0" dx="0.0" dy="0" dz="0.0" />
        <UniformMass totalMass="0.1" />
        <UncoupledConstraintCorrection />
        <Node name="Visu">
            <MeshOBJLoader name="meshLoader_2" filename="mesh/cube.obj" handleSeams="1" />
            <OglModel name="Visual" src="@meshLoader_2" color="1 1 0 1.0" />
            <RigidMapping input="@.." output="@Visual" />
        </Node>
        <Node name="ColliCube">
            <MeshOBJLoader name="loader" filename="mesh/cube.obj" triangulate="1" />
            <MeshTopology src="@loader" />
            <MechanicalObject src="@loader" />
            <TriangleCollisionModel contactStiffness="10.0" />
            <LineCollisionModel contactStiffness="10.0" />
            <PointCollisionModel contactStiffness="10.0" />
            <RigidMapping />
        </Node>
        <Node name="Constraints">
            <MechanicalObject name="points" template="Vec3d" position="1 1.25 1&#x09;-1.25 -1.25 1.25" />
            <RigidMapping />
        </Node>
    </Node>
    <BilateralInteractionConstraint template="Vec3d" object1="@CUBE_0/Constraints/points" object2="@CUBE_1/Constraints/points" first_point="0" second_point="0" />
    <Node name="CUBE_2">
        <EulerImplicitSolver printLog="false" rayleighStiffness="0.1" rayleighMass="0.1"/>
        <CGLinearSolver iterations="25" tolerance="1.0e-9" threshold="1.0e-9" />
        <MechanicalObject template="Rigid3d" scale="1.0" dx="0.0" dy="-2.5" dz="0.0" />
        <UniformMass totalMass="0.1" />
        <UncoupledConstraintCorrection />
        <Node name="Visu">
            <MeshOBJLoader name="meshLoader_3" filename="mesh/cube.obj" handleSeams="1" />
            <OglModel name="Visual" src="@meshLoader_3" color="0 1 0 1.0" />
            <RigidMapping input="@.." output="@Visual" />
        </Node>
        <Node name="ColliCube">
            <MeshOBJLoader name="loader" filename="mesh/cube.obj" />
            <MeshTopology src="@loader" />
            <MechanicalObject src="@loader" scale="1.0" />
            <TriangleCollisionModel />
            <LineCollisionModel />
            <PointCollisionModel />
            <RigidMapping />
        </Node>
        <Node name="Constraints">
            <MechanicalObject name="points" template="Vec3d" position="-1.25 1.25 1.25&#x09;1.25 -1.25 -1.25" />
            <RigidMapping />
        </Node>
    </Node>
    <BilateralInteractionConstraint template="Vec3d" object1="@CUBE_1/Constraints/points" object2="@CUBE_2/Constraints/points" first_point="1" second_point="0" />
    <Node name="CUBE_3">
        <EulerImplicitSolver printLog="false" rayleighStiffness="0.1" rayleighMass="0.1"/>
        <CGLinearSolver iterations="25" tolerance="1.0e-9" threshold="1.0e-9" />
        <MechanicalObject template="Rigid3d" scale="1.0" dx="0.0" dy="-5.0" dz="0.0" />
        <UniformMass totalMass="0.1" />
        <UncoupledConstraintCorrection />
        <Node name="Visu">
            <MeshOBJLoader name="meshLoader_4" filename="mesh/cube.obj" handleSeams="1" />
            <OglModel name="Visual" src="@meshLoader_4" color="0 1 1 1.0" />
            <RigidMapping input="@.." output="@Visual" />
        </Node>
        <Node name="ColliCube">
            <MeshOBJLoader name="loader" filename="mesh/cube.obj" />
            <MeshTopology src="@loader" />
            <MechanicalObject src="@loader" scale="1.0" />
            <TriangleCollisionModel />
            <LineCollisionModel />
            <PointCollisionModel />
            <RigidMapping />
        </Node>
        <Node name="Constraints">
            <MechanicalObject name="points" template="Vec3d" position="1.25 1.25 -1.25" />
            <RigidMapping />
        </Node>
    </Node>
    <BilateralInteractionConstraint template="Vec3d" object1="@CUBE_2/Constraints/points" object2="@CUBE_3/Constraints/points" first_point="1" second_point="0" />
    <Node name="CUBE_4">
        <EulerImplicitSolver printLog="false" rayleighStiffness="0.1" rayleighMass="0.1"/>
        <CGLinearSolver iterations="25" tolerance="1.0e-9" threshold="1.0e-9" />
        <MechanicalObject template="Rigid3d" scale="1.0" dx="0.0" dy="-2.5" dz="-2.5" />
        <UniformMass totalMass="0.1" />
        <UncoupledConstraintCorrection />
        <Node name="Visu">
            <MeshOBJLoader name="meshLoader_1" filename="mesh/cube.obj" handleSeams="1" />
            <OglModel name="Visual" src="@meshLoader_1" color="0 0 1 1.0" />
            <RigidMapping input="@.." output="@Visual" />
        </Node>
        <Node name="ColliCube">
            <MeshOBJLoader name="loader" filename="mesh/cube.obj" />
            <MeshTopology src="@loader" />
            <MechanicalObject src="@loader" scale="1.0" />
            <TriangleCollisionModel />
            <LineCollisionModel />
            <PointCollisionModel />
            <RigidMapping />
        </Node>
        <Node name="Constraints">
            <MechanicalObject name="points" template="Vec3d" position="1.25 -1.25 1.25&#x09;1.25 1.25 1.25" />
            <RigidMapping />
        </Node>
    </Node>
    <BilateralInteractionConstraint template="Vec3d" object1="@CUBE_2/Constraints/points" object2="@CUBE_4/Constraints/points" first_point="1" second_point="0" />
</Node>
