<Node name="Root" gravity="0 0 0" dt="0.001">
    <RequiredPlugin name="CUDA computing" pluginName="SofaCUDA" />
    <VisualStyle displayFlags="showForceFields showBoundingCollisionModels" />
    <CudaRasterizer template="Vec3d" name="default2" printLog="0" tags="LDI" listening="1" sceneBBox="0 0 0 0 0 0 " pixelSize="0.1" maxLayers="8" drawIntersection="0" zsortBits="8" responseType="3" responseStiffness="10000" />
    <EulerImplicitSolver name="default26" printLog="0" />
    <LMConstraintSolver name="ConstraintSolver" constraintVel="1" constraintPos="1" />
    <CGLinearSolver template="GraphScattered" name="default31" tolerance="1e-07" threshold="1e-07" />
    <Node name="CubeFree" gravity="0 -9.81 0">
        <MechanicalObject template="Rigid" name="wY=2" translation="0 0 0" restScale="1" velocity="0 0 0 0 2 0" />
        <UncoupledConstraintCorrection template="Rigid" name="default67" />
        <UniformMass template="Rigid" name="default17" mass="10 1 [1 0 0,0 1 0,0 0 1]" totalmass="2" />
        <Node name="Visu" gravity="0 -9.81 0">
            <OglModel template="ExtVec3f" name="Visual" fileMesh="mesh/cube.obj" material="Default Diffuse 1 1 0.5 0.25 1 Ambient 1 0.2 0.1 0.05 1 Specular 0 1 0.5 0.25 1 Emissive 0 1 0.5 0.25 1 Shininess 0 45" />
            <RigidMapping template="Mapping&lt;Rigid,ExtVec3f&gt;" name="default19" object1="../.." object2="Visual" />
        </Node>
        <Node name="Surf2" gravity="0 -9.81 0">
            <MeshTopology name="default20" tags="LDI" fileTopology="mesh/cube.obj" position="1 -1 -1 1 -1 1 -1 -1 1 -1 -1 -1 1 1 -1 0.999999 1 1 -1 1 1 -1 1 -1" triangles="4 0 7  0 3 7  2 6 7  2 7 3  1 5 2  5 6 2  0 4 1  4 5 1  4 7 6  4 6 5  0 1 2  0 2 3 " />
            <MechanicalObject template="Vec3d" name="default21" useMask="0" restScale="1" />
            <RigidMapping template="MechanicalMapping&lt;Rigid,Vec3d&gt;" name="default22" />
            <TriangleModel name="FrictionCoeff" contactFriction="1" />
        </Node>
    </Node>
    <Node name="CudaRotationConstrained" gravity="0 -9.81 0">
        <MechanicalObject template="Rigid" name="wY=2" translation="3 0 0" restScale="1" velocity="0 0 0 0 2 0" />
        <UncoupledConstraintCorrection template="Rigid" name="default67" />
        <UniformMass template="Rigid" name="default17" mass="10 1 [1 0 0,0 1 0,0 0 1]" totalmass="2" />
        <Node name="Visu" gravity="0 -9.81 0">
            <OglModel template="ExtVec3f" name="Visual" fileMesh="mesh/cube.obj" material="Default Diffuse 1 1 0.5 0.25 1 Ambient 1 0.2 0.1 0.05 1 Specular 0 1 0.5 0.25 1 Emissive 0 1 0.5 0.25 1 Shininess 0 45" />
            <RigidMapping template="Mapping&lt;Rigid,ExtVec3f&gt;" name="default19" object1="../.." object2="Visual" />
        </Node>
        <Node name="Surf2" gravity="0 -9.81 0">
            <MeshTopology name="default20" tags="LDI" fileTopology="mesh/cube.obj" position="1 -1 -1 1 -1 1 -1 -1 1 -1 -1 -1 1 1 -1 0.999999 1 1 -1 1 1 -1 1 -1" triangles="4 0 7  0 3 7  2 6 7  2 7 3  1 5 2  5 6 2  0 4 1  4 5 1  4 7 6  4 6 5  0 1 2  0 2 3 " />
            <MechanicalObject template="Vec3d" name="default21" useMask="0" restScale="1" />
            <RigidMapping template="MechanicalMapping&lt;Rigid,Vec3d&gt;" name="default22" />
            <TriangleModel name="FrictionCoeff" contactFriction="1" />
        </Node>
        <DOFBlockerLMConstraint template="Rigid" name="RotationConstraint" rotationAxis="0 0 0 0 1 0 0 0 0 0 0 1" factorAxis="1" indices="0" />
    </Node>
</Node>
