<Node name="root" dt="0.03" gravity="0 -9.810 0">
    <RequiredPlugin name="SofaOpenglVisual"/>
    <VisualStyle displayFlags="showVisual" />
    <GenericConstraintSolver tolerance="1e-6" maxIterations="1000"/>
    <FreeMotionAnimationLoop solveVelocityConstraintFirst="1" />
    <DefaultPipeline depth="15" verbose="0" draw="0" />
    <BruteForceDetection name="N2" />
    <LocalMinDistance name="Proximity" alarmDistance="0.3" contactDistance="0.1" useLMDFilters="0" />
    <DefaultContactManager name="Response" response="FrictionContact" />
    <Node>
        <EulerImplicitSolver name="cg_odesolver" printLog="false"  rayleighStiffness="0.1" rayleighMass="0.1" />
        <CGLinearSolver iterations="25" name="linear solver" tolerance="1.0e-9" threshold="1.0e-9" />
        <DefaultCollisionGroupManager name="Group" />
        <Node name="CUBE_1_1">
            <MechanicalObject template="Rigid3d" scale="0.3" dx="-2.8" dy="-1.5" dz="0.0" rx="0" />
            <UniformMass totalMass="100.0" />
            <UncoupledConstraintCorrection />
            <Node name="Visu">
                <MeshObjLoader name="meshLoader_4" filename="mesh/smCube27.obj" scale="0.3" handleSeams="1" />
                <OglModel name="Visual" src="@meshLoader_4" color="0.0 0.5 0.8 1.0" />
                <RigidMapping input="@.." output="@Visual" />
            </Node>
            <Node name="Surf2">
                <MeshObjLoader name="loader" filename="mesh/smCube27.obj" triangulate="true" />
                <MeshTopology src="@loader"/>
                <MechanicalObject src="@loader" scale="0.3" />
                <TriangleCollisionModel />
                <LineCollisionModel />
                <PointCollisionModel />
                <RigidMapping />
            </Node>
        </Node>
        <Node name="CUBE_1_2">
            <MechanicalObject template="Rigid3d" scale="0.3" dx="0.0" dy="-1.5" dz="0.0" ry="0" />
            <UniformMass totalMass="100.0" />
            <UncoupledConstraintCorrection />
            <Node name="Visu">
                <MeshObjLoader name="meshLoader_1" filename="mesh/smCube27.obj" scale="0.3" handleSeams="1" />
                <OglModel name="Visual" src="@meshLoader_1" color="0.0 0.9 0.8 1.0" />
                <RigidMapping input="@.." output="@Visual" />
            </Node>
            <Node name="Surf2">
                <MeshObjLoader name="loader" filename="mesh/smCube27.obj" triangulate="true" />
                <MeshTopology src="@loader"/>
                <MechanicalObject src="@loader" scale="0.3" />
                <TriangleCollisionModel />
                <LineCollisionModel />
                <PointCollisionModel />
                <RigidMapping />
            </Node>
        </Node>
        <Node name="CUBE_1_3">
            <MechanicalObject template="Rigid3d" scale="0.3" dx="2.8" dy="-1.5" dz="0.0" rx="0" />
            <UniformMass totalMass="100.0" />
            <UncoupledConstraintCorrection />
            <Node name="Visu">
                <MeshObjLoader name="meshLoader_5" filename="mesh/smCube27.obj" scale="0.3" handleSeams="1" />
                <OglModel name="Visual" src="@meshLoader_5" color="0.0 0.5 0.8 1.0" />
                <RigidMapping input="@.." output="@Visual" />
            </Node>
            <Node name="Surf2">
                <MeshObjLoader name="loader" filename="mesh/smCube27.obj" triangulate="true" />
                <MeshTopology src="@loader"/>
                <MechanicalObject src="@loader" scale="0.3" />
                <TriangleCollisionModel />
                <LineCollisionModel />
                <PointCollisionModel />
                <RigidMapping />
            </Node>
        </Node>
        <Node name="CUBE_2_1">
            <MechanicalObject template="Rigid3d" scale="0.3" dx="-1.5" dy="1" dz="0.0" rz="45" />
            <UniformMass totalMass="100.0" />
            <UncoupledConstraintCorrection />
            <Node name="Visu">
                <MeshObjLoader name="meshLoader_2" filename="mesh/smCube27.obj" scale="0.3" handleSeams="1" />
                <OglModel name="Visual" src="@meshLoader_2" color="0.5 0.0 0.5 1.0" />
                <RigidMapping input="@.." output="@Visual" />
            </Node>
            <Node name="Surf2">
                <MeshObjLoader name="loader" filename="mesh/smCube27.obj" triangulate="true" />
                <MeshTopology src="@loader"/>
                <MechanicalObject src="@loader" scale="0.3" />
                <TriangleCollisionModel />
                <LineCollisionModel />
                <PointCollisionModel />
                <RigidMapping />
            </Node>
        </Node>
        <Node name="CUBE_2_2">
            <MechanicalObject template="Rigid3d" scale="0.3" dx="1.5" dy="1" dz="0.0" rz="45" />
            <UniformMass totalMass="100.0" />
            <UncoupledConstraintCorrection />
            <Node name="Visu">
                <MeshObjLoader name="meshLoader_6" filename="mesh/smCube27.obj" scale="0.3" handleSeams="1" />
                <OglModel name="Visual" src="@meshLoader_6" color="0.5 0.0 0.5 1.0" />
                <RigidMapping input="@.." output="@Visual" />
            </Node>
            <Node name="Surf2">
                <MeshObjLoader name="loader" filename="mesh/smCube27.obj" triangulate="true" />
                <MeshTopology src="@loader"/>
                <MechanicalObject src="@loader" scale="0.3" />
                <TriangleCollisionModel />
                <LineCollisionModel />
                <PointCollisionModel />
                <RigidMapping />
            </Node>
        </Node>
        <Node name="CUBE_3_1">
            <MechanicalObject template="Rigid3d" scale="0.3" dx="0.0" dy="3.5" dz="0.0" rx="0" />
            <UniformMass totalMass="100.0" />
            <UncoupledConstraintCorrection />
            <Node name="Visu">
                <MeshObjLoader name="meshLoader_3" filename="mesh/smCube27.obj" scale="0.3" handleSeams="1" />
                <OglModel name="Visual" src="@meshLoader_3" color="0.9 0.0 0.2 1.0" />
                <RigidMapping input="@.." output="@Visual" />
            </Node>
            <Node name="Surf2">
                <MeshObjLoader name="loader" filename="mesh/smCube27.obj" triangulate="true" />
                <MeshTopology src="@loader"/>
                <MechanicalObject src="@loader" scale="0.3" />
                <TriangleCollisionModel />
                <LineCollisionModel />
                <PointCollisionModel />
                <RigidMapping />
            </Node>
        </Node>
        <Node name="BOX">
            <MeshObjLoader name="loader" filename="mesh/box_inside.obj" triangulate="true" />
            <MeshTopology src="@loader"/>
            <MechanicalObject src="@loader" />
            <TriangleCollisionModel simulated="0" moving="0" />
            <LineCollisionModel simulated="0" moving="0" />
            <PointCollisionModel simulated="0" moving="0" />
            <MeshObjLoader name="meshLoader_0" filename="mesh/box_outside.obj" handleSeams="1" />
            <OglModel name="Visual" src="@meshLoader_0" color="0 0.8 0.3 0.3" />
        </Node>
    </Node>
</Node>
