<Node name="root" gravity="0 -9.81 0" dt="0.01" time="0" animate="0">
    <RequiredPlugin name="Sofa.Component.LinearSolver.Iterative"/> <!-- Needed to use components [CGLinearSolver] -->
    <RequiredPlugin name="Sofa.Component.Mass"/> <!-- Needed to use components [UniformMass] -->
    <RequiredPlugin name="Sofa.Component.ODESolver.Backward"/> <!-- Needed to use components [EulerImplicitSolver] -->
    <RequiredPlugin name="Sofa.Component.StateContainer"/> <!-- Needed to use components [MechanicalObject] -->
    <RequiredPlugin name="Sofa.Component.Visual"/> <!-- Needed to use components [VisualStyle] -->
    <RequiredPlugin name="SofaBoundaryCondition"/> <!-- Needed to use components [HermiteSplineConstraint] -->
    <VisualStyle displayFlags="showVisual showBehaviorModels showForceFields" />
    <CGImplicitSolver>
        <Attribute type="name">
            <Data value="solver" />
        </Attribute>
        <Attribute type="printLog">
            <Data value="0" />
        </Attribute>
        <Attribute type="iterations">
            <Data value="25" />
        </Attribute>
        <Attribute type="rayleighStiffness">
            <Data value="0" />
        </Attribute>
        <Attribute type="rayleighMass">
            <Data value="0" />
        </Attribute>
    </CGImplicitSolver>
    <MechanicalObject template="Vec3d" showObject="1" drawMode="1">
        <Attribute type="name">
            <Data value="particleDOF" />
        </Attribute>
        <Attribute type="position">
            <Data value="0 0 0" />
        </Attribute>
        <Attribute type="velocity">
            <Data value="0 10 0" />
        </Attribute>
        <Attribute type="derivX">
            <Data value="0 0 0" />
        </Attribute>
        <Attribute type="free_position">
            <Data value="0 0 0" />
        </Attribute>
        <Attribute type="free_velocity">
            <Data value="0 0 0" />
        </Attribute>
        <Attribute type="rest_position">
            <Data value="0 0 0" />
        </Attribute>
        <Attribute type="translation">
            <Data value="0 0 0" />
        </Attribute>
        <Attribute type="rotation">
            <Data value="0 0 0" />
        </Attribute>
        <Attribute type="scale">
            <Data value="1" />
        </Attribute>
    </MechanicalObject>
    <HermiteSplineConstraint template="Vec3d">
        <Attribute type="name">
            <Data value="thierry" />
        </Attribute>
        <Attribute type="indices">
            <Data value="0" />
        </Attribute>
        <Attribute type="BeginTime">
            <Data value="0" />
        </Attribute>
        <Attribute type="EndTime">
            <Data value="5" />
        </Attribute>
        <Attribute type="X0">
            <Data value="0 0 0" />
        </Attribute>
        <Attribute type="dX0">
            <Data value="0 10 0" />
        </Attribute>
        <Attribute type="X1">
            <Data value="5 0 0" />
        </Attribute>
        <Attribute type="dX1">
            <Data value="0 5 0" />
        </Attribute>
        <Attribute type="SX0">
            <Data value="1 0" />
        </Attribute>
        <Attribute type="SX1">
            <Data value="0 2" />
        </Attribute>
    </HermiteSplineConstraint>
    <UniformMass >
        <Attribute type="name">
            <Data value="particleMass" />
        </Attribute>
        <Attribute type="totalMass">
            <Data value="1" />
        </Attribute>
    </UniformMass>
</Node>
