<Node dt="0.01" multiThreadSimulation="0" name="root" time="0">
    <RequiredPlugin name="SofaOpenglVisual"/>
    <RequiredPlugin pluginName='SofaBoundaryCondition'/>
    <RequiredPlugin pluginName='SofaGeneralLoader'/>
    <RequiredPlugin pluginName='SofaImplicitOdeSolver'/>
    <RequiredPlugin pluginName='SofaLoader'/>
    <RequiredPlugin pluginName='SofaMeshCollision'/>
    <RequiredPlugin pluginName='SofaMiscCollision'/>
    <RequiredPlugin pluginName='SofaRigid'/>
    <VisualStyle displayFlags="showVisual showBehaviorModels" />
    <DefaultPipeline depth="6" verbose="0" draw="0" />
    <BruteForceBroadPhase/>
    <BVHNarrowPhase/>
    <NewProximityIntersection name="Proximity" alarmDistance="0.3" contactDistance="0.2" />
    <DefaultContactManager name="Response" response="PenalityContactForceField" />
    <DefaultCollisionGroupManager name="Group" />
    <Node name="LiverParabolic">
        <EulerImplicitSolver name="cg_odesolver" printLog="false"  rayleighStiffness="0.1" rayleighMass="0.1" />
        <CGLinearSolver iterations="25" name="linear solver" tolerance="1.0e-9" threshold="1.0e-9" />
        <MechanicalObject template="Rigid3d" name="DOFs" position="0 0 0 0 0 0 1" />
        <UniformMass name="mass" totalMass="1" showAxisSizeFactor="0.1" />
        <ParabolicConstraint name="parabol" indices="0" P1="1 0 0" P2="5 3 1" P3="7 6 -5" BeginTime="0.5" EndTime="1.5" />
        <Node name="Visu">
            <MeshOBJLoader name="meshLoader_1" filename="mesh/liver-smooth.obj" handleSeams="1" />
            <OglModel name="VisualModel" src="@meshLoader_1" color="red" />
            <RigidMapping input="@.." output="@VisualModel" name="visual mapping" />
        </Node>
        <Node name="Surf">
	    <SphereLoader filename="mesh/liver.sph" />
            <MechanicalObject position="@[-1].position" />
            <SphereCollisionModel name="CollisionModel" listRadius="@[-2].listRadius" />
            <RigidMapping name="sphere mapping" />
        </Node>
    </Node>
    <Node name="CubeFixed">
        <MeshOBJLoader name="loader" filename="mesh/cube.obj" />
        <MeshTopology src="@loader" />
        <MechanicalObject src="@loader" scale="20" dz="-35" />
        <TriangleCollisionModel simulated="0" moving="0" />
        <MeshOBJLoader name="meshLoader_0" filename="mesh/cube.obj" scale="20" handleSeams="1" />
        <OglModel name="Visual" src="@meshLoader_0" color="gray" dz="-35" />
    </Node>
</Node>
