<Node name="root" dt="0.02">
    <RequiredPlugin name="SofaOpenglVisual"/>
    <!-- <Simulation name="Simulation" /> -->
    <VisualStyle displayFlags="showBehaviorModels" />
    <DefaultPipeline verbose="0" name="CollisionPipeline" />
    <BruteForceDetection name="N2" />
    <DefaultContactManager response="default" name="collision response" />
    <DiscreteIntersection />
    <!--<DefaultCollisionGroupManager />-->
    <Node name="Liver">
        <EulerImplicitSolver name="cg_odesolver" printLog="false" rayleighMass="0"  rayleighStiffness="0.1" />
        <CGLinearSolver iterations="25" name="linear solver" tolerance="1.0e-9" threshold="1.0e-9" />
        <MeshGmshLoader name="loader" filename="mesh/liver.msh" />
        <MeshTopology src="@loader" />
        <MechanicalObject src="@loader" template="Vec3f" name="dofs" />
        <UniformMass name="mass" vertexMass="0.05" />
        <TetrahedronFEMForceField name="FEM" youngModulus="500" poissonRatio="0.3" computeGlobalMatrix="false" method="large" />
        <PartialFixedConstraint name="partialFixedConstraint" indices="3 39 64" fixedDirections="0 1 1" />
        <Node name="Visu">
            <MeshObjLoader name="meshLoader_0" filename="mesh/liver-smooth.obj" handleSeams="1" />
            <OglModel name="VisualModel" src="@meshLoader_0" color="red" />
            <BarycentricMapping input="@.." output="@VisualModel" name="visual mapping" />
        </Node>
        <Node name="Surf">
	    <SphereLoader filename="mesh/liver.sph" />
            <MechanicalObject position="@[-1].position" />
            <SphereCollisionModel listRadius="@[-2].listRadius" />
            <BarycentricMapping name="sphere mapping" />
        </Node>
    </Node>
</Node>
