<Node dt="0.005" gravity="0 -10 0">
    <RequiredPlugin name="SofaOpenglVisual"/>
    <RequiredPlugin name="SofaImplicitField"/>
    <RequiredPlugin name='SofaSphFluid' />
    <VisualStyle displayFlags="showBehaviorModels showForceFields showWireframe" />
    <Node name="Fluid">
        <RungeKutta4 />
        <MechanicalObject name="MModel" />
        <ParticleSource name="Source" center="&#x0A;&#x09;&#x09;&#x09;&#x09;&#x09;&#x09;&#x09;&#x09;    -0.375 0 -0.75&#x0A;&#x09;&#x09;&#x09;&#x09;&#x09;&#x09;&#x09;&#x09;    0.0   0 -0.75&#x0A;&#x09;&#x09;&#x09;&#x09;&#x09;&#x09;&#x09;&#x09;    0.375 0 -0.75&#x0A;&#x09;&#x09;&#x09;&#x09;&#x09;&#x09;&#x09;&#x09;    -0.75  0 -0.375&#x0A;&#x09;&#x09;&#x09;&#x09;&#x09;&#x09;&#x09;&#x09;    -0.375 0 -0.375&#x0A;&#x09;&#x09;&#x09;&#x09;&#x09;&#x09;&#x09;&#x09;    0.0   0 -0.375&#x0A;&#x09;&#x09;&#x09;&#x09;&#x09;&#x09;&#x09;&#x09;    0.375 0 -0.375&#x0A;&#x09;&#x09;&#x09;&#x09;&#x09;&#x09;&#x09;&#x09;    0.75  0 -0.375&#x0A;&#x09;&#x09;&#x09;&#x09;&#x09;&#x09;&#x09;&#x09;    -0.75  0  0.0&#x0A;&#x09;&#x09;&#x09;&#x09;&#x09;&#x09;&#x09;&#x09;    -0.375 0  0.0&#x0A;&#x09;&#x09;&#x09;&#x09;&#x09;&#x09;&#x09;&#x09;    0.0   0  0.0&#x0A;&#x09;&#x09;&#x09;&#x09;&#x09;&#x09;&#x09;&#x09;    0.375 0  0.0&#x0A;&#x09;&#x09;&#x09;&#x09;&#x09;&#x09;&#x09;&#x09;    0.75  0  0.0&#x0A;&#x09;&#x09;&#x09;&#x09;&#x09;&#x09;&#x09;&#x09;    -0.75  0  0.375&#x0A;&#x09;&#x09;&#x09;&#x09;&#x09;&#x09;&#x09;&#x09;    -0.375 0  0.375&#x0A;&#x09;&#x09;&#x09;&#x09;&#x09;&#x09;&#x09;&#x09;    0.0   0  0.375&#x0A;&#x09;&#x09;&#x09;&#x09;&#x09;&#x09;&#x09;&#x09;    0.375 0  0.375&#x0A;&#x09;&#x09;&#x09;&#x09;&#x09;&#x09;&#x09;&#x09;    0.75  0  0.375&#x0A;&#x09;&#x09;&#x09;&#x09;&#x09;&#x09;&#x09;&#x09;    -0.375 0  0.75&#x0A;&#x09;&#x09;&#x09;&#x09;&#x09;&#x09;&#x09;&#x09;    0.0   0  0.75&#x0A;&#x09;&#x09;&#x09;&#x09;&#x09;&#x09;&#x09;&#x09;    0.375 0  0.75&#x0A;&#x09;&#x09;&#x09;&#x09;&#x09;&#x09;&#x09;&#x09;    " translation="0 3 0" radius="0.01 0.1 0.01" velocity="0 -20 0" delay="0.01875" start="-0.1" stop="2" />
        <UniformMass name="M1" vertexMass="1" />
        <Node id="Visual">
            <OglModel name="VModel" color="blue" />
            <ImplicitSurfaceMapping name="MarchingCube" input="@../MModel" output="@VModel" isoValue="0.5" radius="0.75" step="0.25" />
        </Node>
    </Node>
</Node>
