<?xml version="1.0"?>
<Node 	name="root" gravity="0 0 0" dt="0.05"  >
  <RequiredPlugin name="Sofa.Component.Constraint.Projective"/> <!-- Needed to use components [PatchTestMovementConstraint] -->
  <RequiredPlugin name="Sofa.Component.LinearSolver.Iterative"/> <!-- Needed to use components [CGLinearSolver] -->
  <RequiredPlugin name="Sofa.Component.Mass"/> <!-- Needed to use components [UniformMass] -->
  <RequiredPlugin name="Sofa.Component.ODESolver.Backward"/> <!-- Needed to use components [EulerImplicitSolver] -->
  <RequiredPlugin name="Sofa.Component.SolidMechanics.Spring"/> <!-- Needed to use components [MeshSpringForceField] -->
  <RequiredPlugin name="Sofa.Component.StateContainer"/> <!-- Needed to use components [MechanicalObject] -->
  <RequiredPlugin name="Sofa.Component.Topology.Container.Grid"/> <!-- Needed to use components [RegularGridTopology] -->
  <RequiredPlugin name="Sofa.Component.Visual"/> <!-- Needed to use components [VisualStyle] -->
  <RequiredPlugin name="SofaEngine"/> <!-- Needed to use components [BoxROI] -->
  <RequiredPlugin name="SofaGeneralEngine"/> <!-- Needed to use components [PairBoxROI] -->

  <VisualStyle displayFlags="hideVisualModels showBehavior" />
  <Node 	name="Square"  >
    <EulerImplicitSolver name="Euler Implicit"  printLog="0"  rayleighStiffness="0.5"  rayleighMass="0.5"  vdamping="0"  verbose="0" />
    <CGLinearSolver template="GraphScattered" name="CG Solver"  printLog="0"  iterations="40"  tolerance="1e-06"  threshold="1e-10"  verbose="0" />
    <RegularGrid name ="loader" nx="5" ny="5" nz="5" xmin="0" xmax="1" ymin="0" ymax="1" zmin="0" zmax="1" />
    <MechanicalObject name="mObject1" position="@loader.position"  showIndices="true" showIndicesScale="0.0005" />
    <UniformMass totalMass="1"/>
    <MeshSpringForceField name="forcefield" linesStiffness="10" />
    <BoxROI name="Box" box="-0.1 -0.1 0  1.1 1.1 0"/>
    <PairBoxROI name="PairBox" inclusiveBox="-0.1 -0.1 0  1.1 1.1 0" includedBox="0.1 0.1 0 0.9 0.9 0"/>
    <PatchTestMovementConstraint name="patchTestConstraint" indices="@PairBox.indices" meshIndices = "@Box.indices" constrainedPoints="@PairBox.pointsInROI"
        cornerMovements=" -0.3 -0.1 0
                           0.1 -0.3 0
                           1.1  0.1 0
                          -0.1  1.1 0"/>
  </Node>
</Node>
