<?xml version="1.0" ?>
<Node name="root" gravity="0 -9.81 1" dt="0.02">
    <RequiredPlugin name="SofaEngine"/>
    <RequiredPlugin name="SofaImplicitOdeSolver"/>
    <RequiredPlugin name="SofaBoundaryCondition"/>
    <RequiredPlugin name="SofaDeformable"/>

    <VisualStyle displayFlags="showBehaviorModels showForceFields" />

    <DefaultAnimationLoop/>
    <DefaultVisualManagerLoop/>

    <Node name="M1">
        <EulerImplicitSolver name="odesolver" rayleighStiffness="0.1" rayleighMass="0.1" />
        <CGLinearSolver template="CompressedRowSparseMatrixd" iterations="1000" threshold="1e-9" tolerance="1e-9"/>
        <MechanicalObject template="Vec2d"/>
        <UniformMass vertexMass="1" />
        <RegularGridTopology nx="21" ny="5" nz="1" xmin="0" xmax="20" ymin="0" ymax="4" zmin="0" zmax="0"/>
        <BoxROI name="box" box="-0.1 -0.1 -1e4  0.1 4.1 1e4"/>
        <FixedConstraint indices="@box.indices" />
        <MeshSpringForceField stiffness="10000"/>
    </Node>
</Node>
