<Node 	name="root" gravity="0 -9 1" dt="0.05" showBehaviorModels="1"
	showCollisionModels="0" showMappings="0" showForceFields="0" showWireFrame="1"  >
	<DefaultPipeline name="default0"  verbose="0" />
	<BruteForceDetection name="N2" />
	<DefaultContactManager name="default1"  response="default" />
	<MinProximityIntersection name="Proximity"  alarmDistance="0.8"  contactDistance="0.5" />
	<TreeCollisionGroupManager name="default2" />
	<Node 	name="SquareGravity" gravity="0 -9.81 0"  >
		<CGImplicitSolver name="default3"  iterations="40"  tolerance="1e-06"  threshold="1e-10" />
 		<MeshLoader name="meshLoader"  filename="mesh/square3.msh" />
 		<MechanicalObject template="Vec3d" name="mecaObj"  scale3d="10 10 10"  restScale="1" />
 		<TriangleSetTopologyContainer name="Container" />
		<TriangleSetTopologyModifier name="Modifier" />
		<TriangleSetTopologyAlgorithms template="Vec3d" name="TopoAlgo" />
		<TriangleSetGeometryAlgorithms template="Vec3d" name="GeomAlgo" />
		<DiagonalMass template="Vec3d" name="default5"  massDensity="0.15" />
		<BoxROI template="Vec3d" box="2 9.5 -0.5 8 10.5 0.5" drawBoxes="1" position="@mecaObj.rest_position" name="FixedROI"
 			computeTriangles="0" computeTetrahedra="0" computeEdges="0"/>
		<FixedConstraint template="Vec3d" name="default6"  indices="@FixedROI.indices" />
		<TriangularFEMForceField template="Vec3d" name="FEM"  method="large"  poissonRatio="0.3"  youngModulus="60" />
		<TriangularBendingSprings template="Vec3d" name="FEM-Bend"  stiffness="300"  damping="1" />
		<TTriangleModel template="Vec3d" name="default7" />
		<OglModel template="ExtVec3f" name="Visual"  material="Default Diffuse 1 1 0 0 1 Ambient 1 0.2 0 0 1 Specular 0 1 0 0 1 Emissive 0 1 0 0 1 Shininess 0 45" />
		<IdentityMapping template="Mapping&lt;Vec3d,ExtVec3f&gt;" name="default8"  object1=".."  object2="Visual" />
		<BoxROI template="Vec3d" box="3 3 0 6 6 1" drawBoxes="1"
 		position="@mecaObj.position" drawTriangles="1"
 		triangles="@Container.triangles" name="boxROI"/>
	</Node>
</Node>
