<?xml version="1.0" ?>
<Node name="root" dt="0.02">
    <RequiredPlugin pluginName="SofaOpenglVisual"/>
    <RequiredPlugin pluginName='SofaGeneralEngine'/>
    <RequiredPlugin pluginName='SofaLoader'/>
    <RequiredPlugin pluginName='SofaTopologyMapping'/>
    <RegularGridTopology name="GridTopology" nx="10" ny="10" nz="10" min="-10 -10 -10" max="10 10 10" drawEdges="1"/>
    <Node name="Tetra-Topo">
        <TetrahedronSetTopologyContainer name="Container" checkTopology="1"/>
        <TetrahedronSetTopologyModifier name="Modifier" />
        <Hexa2TetraTopologicalMapping name="default28" input="@../GridTopology" output="@Container" />
        <Node name="Liver">
            <MeshOBJLoader name="meshLoader" filename="mesh/liver.obj" />
            <MeshTopology src="@meshLoader" name="LiverTopo"  />
            <MeshBarycentricMapperEngine inputPositions="@../../GridTopology.position" mappedPointPositions="@./LiverTopo.position" topology="@../Container"/>
            <OglModel name="Visual" src="@meshLoader" color='1.0 0.0 0.0 1' />
        </Node>
    </Node>
</Node>
