<?xml version="1.0" ?>
<Node name="root" gravity="0 -9 1" dt="0.05">
    <RequiredPlugin name="SofaOpenglVisual"/>
    <VisualStyle displayFlags="showForceFields" />

    <Node name="SquareGravity" gravity="0 -9.81 0">
        <EulerImplicitSolver name="cg_odesolver" printLog="false"  rayleighStiffness="0.1" rayleighMass="0.1" />
        <CGLinearSolver iterations="25" name="linear solver" tolerance="1.0e-9" threshold="1.0e-9" />
        <MeshGmshLoader name="loader" filename="mesh/square3.msh" createSubelements="true"/>
        <MechanicalObject src="@loader" template="Vec3d" name="mecaObj" scale3d="10 10 10" restScale="1" />
        <TriangleSetTopologyContainer src="@loader" name="Container" />
        <TriangleSetTopologyModifier name="Modifier" />
        <TriangleSetTopologyAlgorithms template="Vec3d" name="TopoAlgo" />
        <TriangleSetGeometryAlgorithms template="Vec3d" name="GeomAlgo" />
        <DiagonalMass template="Vec3d" name="default5" massDensity="0.15" />
        <BoxROI template="Vec3d" name="FixedROI" box="2 9.5 -0.5 8 10.5 0.5" drawBoxes="1" position="@mecaObj.rest_position" computeTriangles="0" computeTetrahedra="0" computeEdges="0" />
        <FixedConstraint template="Vec3d" name="default6" indices="@FixedROI.indices" />
        <TriangularFEMForceField template="Vec3d" name="FEM" method="large" poissonRatio="0.3" youngModulus="60" />
        <TriangularBendingSprings template="Vec3d" name="FEM-Bend" stiffness="300" damping="1" />

        <PointsFromIndices name="PFI" position="@mecaObj.position" indices="10 20 30" />

        <Node name="Selection" >
            <MechanicalObject template="Vec3d" position="@../PFI.indices_position" name="SelectedDOFs" showIndices="1" showIndicesScale="0.2"  />
        </Node>

    </Node>
</Node>
