<?xml version="1.0" ?>
<Node name="Root" gravity="0 0 0" dt="0.02">
    <RequiredPlugin pluginName="SofaOpenglVisual"/>
    <RequiredPlugin pluginName='SofaGeneralEngine'/>
    <RequiredPlugin pluginName='SofaImplicitOdeSolver'/>
    <RequiredPlugin pluginName='SofaMeshCollision'/>
    <RequiredPlugin pluginName='SofaMiscCollision'/>
    <RequiredPlugin pluginName='SofaRigid'/>
    <RequiredPlugin pluginName='SofaSimpleFem'/>
    <RequiredPlugin pluginName='SofaTopologyMapping'/>

    <VisualStyle displayFlags="showVisual showWireframe" />
    <DefaultPipeline name="DefaultCollisionPipeline" verbose="0" draw="0" depth="6" />
    <BruteForceBroadPhase/>
    <BVHNarrowPhase/>
    <MinProximityIntersection name="Proximity" alarmDistance="0.3" contactDistance="0.2" />
    <DefaultContactManager name="Response" response="PenalityContactForceField" />
    <DefaultCollisionGroupManager name="Group" />
    <Node name="Cylinder" gravity="0 -9.81 0">
        <EulerImplicitSolver name="cg_odesolver"  rayleighStiffness="0.1" rayleighMass="0.1" />
        <CGLinearSolver template="GraphScattered" name="default18" iterations="100" tolerance="1e-05" threshold="1e-05"/>
        <MechanicalObject template="Rigid3d" name="rigid" position="0 0 0 0 0 0 1" velocity="0 0 0 0 0 0" force="0 0 0 0 0 0" externalForce="0 0 0 0 0 0" derivX="0 0 0 0 0 0" free_position="0 0 0 0 0 0 1" free_velocity="0 0 0 0 0 0" restScale="1" />
        <UniformMass name="default0" />
        <Node name="topology" gravity="0 -9.81 0">
            <MeshGmshLoader name="loader" filename="mesh/truthcylinder1.msh" />
            <MeshTopology src="@loader" name="meshTopology" />
            <SubsetTopology template="Vec3d" name="Subset" box="-5 -20 -5 5 -10 5" rest_position="@meshTopology.position" edges="@meshTopology.edges" triangles="@meshTopology.triangles" tetrahedra="@meshTopology.tetrahedra" indices="0" localIndices="1" drawROI="0" />
            <OglModel template="Vec3d" name="visual" position="@meshTopology.position" useNormals="0" computeTangents="1" vertices="@meshTopology.position" triangles="@meshTopology.triangles" material="Default Diffuse 1 0.74902 0.74902 0.74902 1 Ambient 1 0.2 0.2 0.2 1 Specular 0 1 1 1 1 Emissive 0 0 0 0 0 Shininess 0 45" />
            <RigidMapping template="Rigid3d,Vec3d" name="default15" mapForces="0" mapConstraints="0" mapMasses="0" input="@.." output="@visual" />
        </Node>
        <Node name="InROI" gravity="0 -9.81 0">
            <MechanicalObject template="Vec3d" name="mobj" position="@../topology/Subset.pointsInROI" velocity="0 0 0" force="0 0 0" externalForce="0 0 0" derivX="0 0 0" free_position="0 0 0" free_velocity="0 0 0" restScale="1" />
            <TetrahedronSetTopologyContainer name="container" position="@../topology/Subset.pointsInROI" tetrahedra="@../topology/Subset.tetrahedraInROI" />
            <TetrahedronSetTopologyModifier name="default10" />
            <TetrahedronSetGeometryAlgorithms template="Vec3d" name="default12" />
            <UniformMass name="mass" vertexMass="15" />
            <TetrahedronFEMForceField template="Vec3d" name="FEM" poissonRatio="0.49" youngModulus="1000" gatherPt=" " gatherBsize=" " />
            <RigidMapping template="Rigid3d,Vec3d" name="rigidMapping" input="@.." output="@." />
            <Node name="Surf" gravity="0 -9.81 0">
                <VisualStyle displayFlags="hideWireframe" />
                <TriangleSetTopologyContainer name="container" />
                <TriangleSetGeometryAlgorithms template="Vec3d" />
                <TriangleSetTopologyModifier />
                <Tetra2TriangleTopologicalMapping input="@../container" output="@container" />
                <TriangleCollisionModel template="Vec3d" />
            </Node>
        </Node>
    </Node>
</Node>
