<Node name="root" dt="0.02">
    <RequiredPlugin name="Sofa.Component.StateContainer"/> <!-- Needed to use components [MechanicalObject] -->
    <RequiredPlugin name="Sofa.Component.Topology.Container.Grid"/> <!-- Needed to use components [RegularGridTopology] -->
    <RequiredPlugin name="Sofa.Component.Visual"/> <!-- Needed to use components [VisualStyle] -->
    <RequiredPlugin name="SofaGeneralEngine"/> <!-- Needed to use components [Spiral] -->
    <VisualStyle displayFlags="showCollisionModels" />
    <Node name="Spiral">
        <RegularGridTopology name="topo" n="201 5 2" min="-5 -0.1 -0.1" max="5 0.1 0.1" />
        <MechanicalObject name="dofs1" />
        <Spiral name="spiral" template="Vec3d" rest_position="@dofs1.position" />
        <Node>
            <MechanicalObject name="dofs" position="@../spiral.position" />
            <TriangleCollisionModel />
            <LineCollisionModel />
            <PointCollisionModel />
        </Node>
    </Node>
</Node>
