<Node name="root" dt="0.02">
    <RequiredPlugin name="SofaOpenglVisual"/>
    <VisualStyle displayFlags="showCollisionModels" />
    <MeshObjLoader name="loader" filename="mesh/icosahedron.obj" />
    <Vertex2Frame name="vertex2frame" template="Rigid" src="@loader" />
    <MechanicalObject name="dofs" template="Rigid" position="@vertex2frame.frames" />
    <UniformMass totalMass="0.1" />
    <OglModel name="Visual" color="red" filename="mesh/icosahedron.obj" />
</Node>
