<Node name="root" dt="0.05" gravity="0 0 0">
    <RequiredPlugin name="SofaOpenglVisual"/>
    <!-- Constant force for a deformable -->
    <VisualStyle displayFlags="showBehaviorModels showForceFields" />
    <Node name="BasicDeformableObject">
        <EulerImplicitSolver name="cg_odesolver" printLog="false"  rayleighMass="0.1" />
        <CGLinearSolver iterations="25" name="linear solver" tolerance="1.0e-9" threshold="1.0e-9" />
        <MechanicalObject position="0 0 0  1 0 0  1 1 0  0 1 0" velocity="0 0 0  0 0 0  0 0 0  0 0 0" />
        <UniformMass vertexMass="0.1" />
        <MeshTopology triangles="0 1 2  0 2 3" />
        <!--		<FixedConstraint indices="2 3"/>-->
        <TriangleFEMForceField name="FEM0" youngModulus="100" poissonRatio="0.3" method="large" />
        <ConstantForceField indices="0 1 2 3" forces="-1 -1 0  1 -1 0  1 1 0  -1 1 0" showArrowSize="0.5" printLog="1"/>
        <Node name="Visu">
            <OglModel name="Visual" color="red" />
            <IdentityMapping input="@.." output="@Visual" />
        </Node>
    </Node>
    <Node name="TorusRigid">
        <EulerImplicitSolver rayleighStiffness="0.01" />
        <CGLinearSolver iterations="25" threshold="0.00000001" tolerance="1e-5"/>
        <MechanicalObject template="Rigid" dx="2" dy="0" dz="0" rx="0" ry="0" rz="0" scale="1.0" />
        <UniformMass />
        <!-- forces for a rigid is composed of two parts translation of the rigid dof [x y z] and a quaternion for the rotation [x y z w] -->
        <ConstantForceField indices="0" forces="0 0.10 0     0 1 0 0" />
        <Node name="Visu">
            <MeshObjLoader name="meshLoader_0" filename="mesh/torus.obj" scale="0.3" handleSeams="1" />
            <OglModel name="Visual" src="@meshLoader_0" color="gray" />
            <RigidMapping input="@.." output="@Visual" />
        </Node>
    </Node>
</Node>
