<?xml version="1.0" ?>
<Node name="root" dt="0.05" showBoundingTree="0" gravity="0 0 0">
    <RequiredPlugin name="SofaOpenglVisual"/>
    <VisualStyle displayFlags="showBehaviorModels showForceFields showCollisionModels showVisual" />
    <DefaultPipeline verbose="0" name="CollisionPipeline" />
    <BruteForceDetection name="N2" />
    <DefaultContactManager response="default" name="collision response" />
    <DiscreteIntersection />
    <Node name="TT_FAST">
        <EulerImplicitSolver name="cg_odesolver" printLog="false"  rayleighStiffness="0.1" rayleighMass="0.1" />
        <CGLinearSolver iterations="25" name="linear solver" tolerance="1.0e-9" threshold="1.0e-9" />
        <MeshGmshLoader name="loader" filename="mesh/cylinder_8x30x6.msh" />
        <MechanicalObject src="@loader" name="Volume" translation="1 0 0"/>
        <include href="Objects/TetrahedronSetTopology.xml" src="@loader" tags=" " />
        <DiagonalMass massDensity="0.5" />
        <FixedPlaneConstraint direction="0 0 1" dmin="-0.1" dmax="0.1" />
        <FixedConstraint indices="0" />
        <FastTetrahedralCorotationalForceField poissonRatio="0.3" youngModulus="3600" method="large" />

        <Node name="T_FAST">
            <include href="Objects/TriangleSetTopology.xml" src="@" tags=" " />
            <Tetra2TriangleTopologicalMapping input="@../Container" output="@Container" />
            <TrianglePressureForceField normal="0 0 1" dmin="0.9" dmax="1.1" pressure="0.4 0 0" />
            <TriangleSet />
            <Node name="Visu">
                <OglModel name="Visual" color="blue" />
                <IdentityMapping input="@../../Volume" output="@Visual" />
            </Node>
        </Node>
    </Node>
</Node>
