<?xml version="1.0" ?>
<Node name="root" dt="2" showBoundingTree="0" gravity="0 0 0">
    <VisualStyle displayFlags="showBehaviorModels showForceFields showCollisionModels showVisual" />
    <CollisionPipeline verbose="0" name="CollisionPipeline" />
    <BruteForceDetection name="N2" />
    <CollisionResponse response="default" name="collision response" />
    <DiscreteIntersection />
    <Node name="MeshTopology">
        <MeshGmshLoader name="meshLoader0" filename="mesh/cylinder.msh" />
        <TetrahedronSetTopologyContainer name="Container1" src="@meshLoader0" />
        <TetrahedronSetGeometryAlgorithms name="GeomAlgo" />
        <MechanicalObject name="dofs" />
		<Node name="FastTetrahedronCorotationalForceField">
            <CGLinearSolver iterations="500" name="linear solver" tolerance="1.0e-9" threshold="1.0e-9" />
            <StaticSolver  />
            <TetrahedronSetTopologyContainer name="Container2" />
            <TetrahedronSetGeometryAlgorithms drawEdges="1" drawColorEdges="0 1 0" name="GeomAlgo" />
            <SimpleTesselatedTetraTopologicalMapping input="@Container1" output="@Container2" />
            <MechanicalObject translation="0 0 0" />
            <MeshMatrixMass name="mass" lumping="1" printMass="0" massDensity="1" />
            <BoxROI box="-1.2 -1.2 -0.01 1.2 1.2 0.01" drawBoxes="1" name="fixedPlane2"  />
            <FixedConstraint indices="@fixedPlane2.indices" />
            <BoxROI box="-1.2 -1.2 0.99 1.2 1.2 1.01" drawBoxes="0" name="pressurePlane2"  />
            <ConstantForceField points="@pressurePlane2.indices" totalForce="0.05 0 -0.2" />
            <FastTetrahedralCorotationalForceField poissonRatio="0.45" youngModulus="30" method="large" />
		 </Node>
        <Node name="TetrahedronCorotationalForceField">
            <CGLinearSolver iterations="500" name="linear solver" tolerance="1.0e-9" threshold="1.0e-9" />
            <StaticSolver  />
			<TetrahedronSetTopologyContainer name="Container3" />
			<TetrahedronSetGeometryAlgorithms drawEdges="1" drawColorEdges="1 0 0" name="GeomAlgo" />
			<SimpleTesselatedTetraTopologicalMapping input="@Container1" output="@Container3" />
            <MechanicalObject translation="0 0 0" />
			<MeshMatrixMass name="mass" lumping="1" printMass="0" massDensity="1" />
			<BoxROI box="-1.2 -1.2 -0.01 1.2 1.2 0.01" drawBoxes="1" name="fixedPlane"  />
			<FixedConstraint indices="@fixedPlane.indices" />
			<BoxROI box="-1.2 -1.2 0.99 1.2 1.2 1.01" drawBoxes="0" name="pressurePlane"  />
			<ConstantForceField points="@pressurePlane.indices" totalForce="0.05 0 -0.2" />
			<TetrahedralCorotationalFEMForceField poissonRatio="0.45" youngModulus="30" method="large" />
        </Node>
    </Node>
</Node>
