<?xml version="1.0" ?>
<Node name="root" gravity="0 -9.81 0" dt="0.01" time="0">
    <RequiredPlugin name="SofaOpenglVisual"/>
    <VisualStyle displayFlags="showVisual showBehaviorModels showForceFields showCollisionModels showMechanicalMappings" />
    <BruteForceDetection name="default40" />
    <DefaultContactManager name="default41" response="default" />
    <DefaultPipeline name="default42" />
    <MinProximityIntersection name="default43" alarmDistance="1" contactDistance="0.5"/>
    <Node name="default44" gravity="0 -9.81 0">
        <EulerImplicitSolver name="cg_odesolver" printLog="0"  rayleighStiffness="0.1" rayleighMass="0.1" />
        <CGLinearSolver template="GraphScattered" name="linear solver" iterations="25" tolerance="1e-009" threshold="1e-009" />
        <MechanicalObject template="Rigid" name="DOFs" position="0 0 0 0 0 0 1 1 0 0 0 0 0 1 3 0 0 0 0 0 1 5 0 0 0 0 0 1 7 0 0 0 0 0 1" velocity="0 0 0 0 0 0" force="0 0 0 0 0 0" externalForce="0 0 0 0 0 0" derivX="0 0 0 0 0 0" restScale="1" />
        <UniformMass template="Rigid" name="mass" vertexMass="1 1 [1 0 0,0 1 0,0 0 1]" />
        <FixedConstraint template="Rigid" name="fixOrigin" indices="0" />
        <Node name="default45" gravity="0 -9.81 0">
            <MechanicalObject template="Rigid" name="attaches" position="0 0 0 0.707914 0 0 0.707914 -1 0 0 0.707914 0 0 0.707914 1 0 0 0.707914 0 0 0.707914 -1 0 0 0.707914 0 0 0.707914 1 0 0 0.707914 0 0 0.707914 -1 0 0 0.707914 0 0 0.707914 1 0 0 0.707914 0 0 0.707914 -1 0 0 0.707914 0 0 0.707914 1 0 0 0.707914 0 0 0.707914" velocity="0 0 0 0 0 0" force="0 0 0 0 0 0" externalForce="0 0 0 0 0 0" derivX="0 0 0 0 0 0" restScale="1" />
            <RigidRigidMapping template="Rigid,Rigid" name="default46" input="@.." output="@." repartition="1 2 2 2 2" />
            <JointSpringForceField template="Rigid" name="joint springs" spring="BEGIN_SPRING  0 1  FREE_AXIS 0 0 0 0 1 0  KS_T 0 30000  KS_R 0 200000  KD 1  R_LIM_X -0.8 0.8  R_LIM_Y -1.57 1.57  R_LIM_Z 0 0  END_SPRING&#x0A; BEGIN_SPRING  2 3  FREE_AXIS 0 0 0 0 1 0  KS_T 0 30000  KS_R 0 200000  KD 1  R_LIM_X -0.8 0.8  R_LIM_Y -1.57 1.57  R_LIM_Z 0 0  END_SPRING&#x0A; BEGIN_SPRING  4 5  FREE_AXIS 0 0 0 0 1 0  KS_T 0 30000  KS_R 0 200000  KD 1  R_LIM_X -0.8 0.8  R_LIM_Y -1.57 1.57  R_LIM_Z 0 0  END_SPRING&#x0A; BEGIN_SPRING  6 7  FREE_AXIS 0 0 0 0 1 0  KS_T 0 30000  KS_R 0 200000  KD 1  R_LIM_X -0.8 0.8  R_LIM_Y -1.57 1.57  R_LIM_Z 0 0  END_SPRING&#x0A;" />
        </Node>
        <Node name="Visu" gravity="0 -9.81 0">
            <OglModel template="ExtVec3f" name="Visual" position="-1 -0.5 -0.5 -1 0.5 -0.5 -1 0.5 0.5 -1 -0.5 0.5 1 -0.5 -0.5 1 0.5 -0.5 1 0.5 0.5 1 -0.5 0.5 -1 -0.5 -0.5 -1 0.5 -0.5 -1 0.5 0.5 -1 -0.5 0.5 1 -0.5 -0.5 1 0.5 -0.5 1 0.5 0.5 1 -0.5 0.5 -1 -0.5 -0.5 -1 0.5 -0.5 -1 0.5 0.5 -1 -0.5 0.5 1 -0.5 -0.5 1 0.5 -0.5 1 0.5 0.5 1 -0.5 0.5 -1 -0.5 -0.5 -1 0.5 -0.5 -1 0.5 0.5 -1 -0.5 0.5 1 -0.5 -0.5 1 0.5 -0.5 1 0.5 0.5 1 -0.5 0.5" vertices="-1 -0.5 -0.5 -1 0.5 -0.5 -1 0.5 0.5 -1 -0.5 0.5 1 -0.5 -0.5 1 0.5 -0.5 1 0.5 0.5 1 -0.5 0.5 -1 -0.5 -0.5 -1 0.5 -0.5 -1 0.5 0.5 -1 -0.5 0.5 1 -0.5 -0.5 1 0.5 -0.5 1 0.5 0.5 1 -0.5 0.5 -1 -0.5 -0.5 -1 0.5 -0.5 -1 0.5 0.5 -1 -0.5 0.5 1 -0.5 -0.5 1 0.5 -0.5 1 0.5 0.5 1 -0.5 0.5 -1 -0.5 -0.5 -1 0.5 -0.5 -1 0.5 0.5 -1 -0.5 0.5 1 -0.5 -0.5 1 0.5 -0.5 1 0.5 0.5 1 -0.5 0.5" triangles="3 1 0  3 2 1  3 6 2  3 7 6  7 5 6  7 4 5  4 1 5  4 0 1  5 1 2  2 6 5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" />
            <RigidMapping template="Rigid,ExtVec3f" name="default60" mapForces="0" mapConstraints="0" mapMasses="0" input="@.." output="@Visual" repartition="0 8 8 8 8" />
        </Node>
    </Node>
</Node>
