<Node name="root" dt="0.01">
    <RequiredPlugin pluginName="SofaOpenglVisual"/>
    <RequiredPlugin pluginName='SofaBoundaryCondition'/>
    <RequiredPlugin pluginName='SofaGeneralDeformable'/>
    <RequiredPlugin pluginName='SofaImplicitOdeSolver'/>
    <RequiredPlugin pluginName='SofaLoader'/>
    <RequiredPlugin pluginName='SofaMeshCollision'/>

    <VisualStyle displayFlags="showBehaviorModels showForceFields" />
    <DefaultPipeline depth="6" verbose="0" draw="0" />
    <BruteForceBroadPhase/>
    <BVHNarrowPhase/>
    <NewProximityIntersection name="Proximity" alarmDistance="0.3" contactDistance="0.2" />
    <DefaultContactManager name="Response" response="default" />
    <Node name="M1">
        <EulerImplicitSolver name="cg_odesolver" printLog="false"  rayleighStiffness="0.1" rayleighMass="0.1" />
        <CGLinearSolver iterations="25" name="linear solver" tolerance="1.0e-9" threshold="1.0e-9" />
        <MechanicalObject />
        <UniformMass totalMass="10" />
        <RegularGridTopology nx="2" ny="2" nz="2" xmin="-3.5" xmax="3.5" ymin="-3.5" ymax="3.5" zmin="-3.5" zmax="3.5" />
        <RegularGridSpringForceField name="Springs" stiffness="1000" />
        <PlaneForceField normal="0 1 0" d="-10" stiffness="100000" showPlane="1" showPlaneSize="20"/>
        <Node name="Visu">
            <MeshOBJLoader name="meshLoader_0" filename="mesh/smCube125.obj" handleSeams="1" />
            <OglModel name="Visual" src="@meshLoader_0" color="blue" />
            <BarycentricMapping input="@.." output="@Visual" />
        </Node>
        <Node name="Collis">
            <MeshOBJLoader name="loader" filename="mesh/smCube125.obj" />
            <MeshTopology src="@loader" />
            <MechanicalObject src="@loader" />
            <TriangleCollisionModel />
            <BarycentricMapping input="@.." output="@Collis" />
        </Node>
    </Node>
</Node>
