<?xml version="1.0" ?>
<Node name="root" gravity="0.0 -2.0 0.0" dt="0.04">
    <RequiredPlugin name="SofaOpenglVisual"/>
    <DefaultPipeline verbose="0" />
    <BruteForceDetection name="N2" />
    <DefaultContactManager name="Response" />
    <NewProximityIntersection alarmDistance="0.002" contactDistance="0.001" />
    <Node name="SquareCloth1">
        <EulerImplicitSolver name="cg_odesolver" printLog="false"  rayleighStiffness="0.1" rayleighMass="0.1" />
        <CGLinearSolver iterations="25" name="linear solver" tolerance="1.0e-9" threshold="1.0e-9" />
        <RegularGridTopology nx="20" ny="1" nz="20" xmin="12" xmax="-12" ymin="7" ymax="7" zmin="-12" zmax="12" />
        <MechanicalObject />
        <UniformMass totalMass="100" />
        <MeshSpringForceField name="Springs" stiffness="1000" damping="0" />
        <QuadBendingSprings name="Bend" stiffness="2000" damping="1" />
        <FixedConstraint name="FixedConstraint" indices="0 19" />
        <Node name="Visu">
            <OglModel name="Visual" color="green" />
            <IdentityMapping input="@.." output="@Visual" />
        </Node>
        <Node name="Surf">
            <MechanicalObject />
            <RegularGridTopology nx="20" ny="1" nz="20" xmin="12" xmax="-12" ymin="7" ymax="7" zmin="-12" zmax="12" />
            <IdentityMapping />
            <TriangleCollisionModel />
        </Node>
    </Node>
</Node>
