<?xml version="1.0"?>

<Node name="root" dt="2.0e-3" gravity="0 0 0" >
    <RequiredPlugin name="Sofa.Component.AnimationLoop"/> <!-- Needed to use components [FreeMotionAnimationLoop] -->
    <RequiredPlugin name="Sofa.Component.Collision.Geometry"/> <!-- Needed to use components [SphereCollisionModel] -->
    <RequiredPlugin name="Sofa.Component.Constraint.Lagrangian.Correction"/> <!-- Needed to use components [LinearSolverConstraintCorrection] -->
    <RequiredPlugin name="Sofa.Component.Constraint.Lagrangian.Solver"/> <!-- Needed to use components [GenericConstraintSolver] -->
    <RequiredPlugin name="Sofa.Component.LinearSolver.Direct"/> <!-- Needed to use components [SparseLUSolver] -->
    <RequiredPlugin name="Sofa.Component.Mass"/> <!-- Needed to use components [UniformMass] -->
    <RequiredPlugin name="Sofa.Component.ODESolver.Backward"/> <!-- Needed to use components [EulerImplicitSolver] -->
    <RequiredPlugin name="Sofa.Component.SolidMechanics.Spring"/> <!-- Needed to use components [RestShapeSpringsForceField] -->
    <RequiredPlugin name="Sofa.Component.StateContainer"/> <!-- Needed to use components [MechanicalObject] -->
    <RequiredPlugin name="Sofa.Component.Visual"/> <!-- Needed to use components [VisualStyle] -->

    <VisualStyle displayFlags=" showCollisionModels showForceFields" />
    <DefaultAnimationLoop/>

    <Node name="Object1">
        <MechanicalObject name="object1MO" template="Rigid3d" position="0 0 0 0 0 0 1" showObject="true"/>
    </Node>

    <Node name="Object2">
        <EulerImplicitSolver rayleighMass="0" rayleighStiffness="0"/>
        <SparseLUSolver name="LULinearSolver" template="CompressedRowSparseMatrixMat3x3d"/>
        <MechanicalObject name="object2MO" template="Rigid3d" position="0.5 0.5 0 0.2705980500730985 0.2705980500730985 0 0.9238795325112867" showObject="true"/>
        <RestShapeSpringsForceField stiffness="11" angularStiffness="12"
                                    external_rest_shape="@../Object1/object1MO"
                                    points="0" external_points="0"
                                    drawSpring="true" springColor="1 1 1 1"
                                    activeDirections="1 0 1 1 0 1"/>
        <UniformMass totalMass="0.01" />
    </Node>
</Node>
