<?xml version="1.0"?>
<Node 	 name="root"  dt="0.005"  >
	<VisualStyle name="visualStyle1"  displayFlags="showBehaviorModels showForceFields showCollisionModels showMappings" />
	<Node 	 name="Poutre1"  >
		<EulerImplicitSolver name="cg_odesolver"  printLog="0" />
		<CGLinearSolver template="GraphScattered" name="linear solver"  iterations="25"  tolerance="1e-09"  threshold="1e-09" />
		<Node 	 name="M1"  >
			<MeshGmshLoader name="loader"  filename="mesh/smCube27.msh" />
			<MechanicalObject template="Vec3d" name="mObject1"  position="@loader.position"  velocity="0 0 0"  force="0 0 0"  externalForce="0 0 0"  derivX="0 0 0"  restScale="1" />
			<UniformMass template="Vec3d" name="uniformMass1"  mass="0.1" />
			<FixedConstraint template="Vec3d" name="fixedConstraint1"  indices="0 3 6 9 12 15 18 21 24" />
			<StiffSpringForceField template="Vec3d" name="InternalSprings1"  spring="0 9 100 5 3.5
 1 10 500 5 3.5
 2 11 500 5 3.5
 3 12 500 5 3.5
 4 13 500 5 3.5
 5 14 500 5 3.5
 6 15 500 5 3.5
 7 16 500 5 3.5
 8 17 500 5 3.5
 9 18 500 5 3.5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"  object1="@./"  object2="@./" />
		</Node>
		<Node 	 name="M5"  >
			<MeshGmshLoader name="loader"  filename="mesh/smCube27.msh" />
			<MechanicalObject template="Vec3d" name="mObject5"  position="@loader.position"  velocity="0 0 0"  force="0 0 0"  externalForce="0 0 0"  derivX="0 0 0"  restScale="1"  translation="0 0 42" />
			<UniformMass template="Vec3d" name="uniformMass5"  mass="0.1" />
			<StiffSpringForceField template="Vec3d" name="InternalSprings5"  spring="0 9 100 5 3.5
 1 10 500 5 3.5
 2 11 500 5 3.5
 3 12 500 5 3.5
 4 13 500 5 3.5
 5 14 500 5 3.5
 6 15 500 5 3.5
 7 16 500 5 3.5
 8 17 500 5 3.5
 9 18 500 5 3.5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"  object1="@./"  object2="@./" />
		</Node>
		<Node 	 name="M4"  >
			<MeshGmshLoader name="loader"  filename="mesh/smCube27.msh" />
			<MechanicalObject template="Vec3d" name="mObject4"  position="@loader.position"  velocity="0 0 0"  force="0 0 0"  externalForce="0 0 0"  derivX="0 0 0"  restScale="1"  translation="0 0 31.5" />
			<UniformMass template="Vec3d" name="uniformMass4"  mass="0.1" />
			<StiffSpringForceField template="Vec3d" name="InternalSprings4"  spring="0 9 100 5 3.5
 1 10 500 5 3.5
 2 11 500 5 3.5
 3 12 500 5 3.5
 4 13 500 5 3.5
 5 14 500 5 3.5
 6 15 500 5 3.5
 7 16 500 5 3.5
 8 17 500 5 3.5
 9 18 500 5 3.5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"  object1="@./"  object2="@./" />
		</Node>
		<Node 	 name="M3"  >
			<MeshGmshLoader name="loader"  filename="mesh/smCube27.msh" />
			<MechanicalObject template="Vec3d" name="mObject3"  position="@loader.position"  velocity="0 0 0"  force="0 0 0"  externalForce="0 0 0"  derivX="0 0 0"  restScale="1"  translation="0 0 21" />
			<UniformMass template="Vec3d" name="uniformMass3"  mass="0.1" />
			<StiffSpringForceField template="Vec3d" name="InternalSprings3"  spring="0 9 100 5 3.5
 1 10 500 5 3.5
 2 11 500 5 3.5
 3 12 500 5 3.5
 4 13 500 5 3.5
 5 14 500 5 3.5
 6 15 500 5 3.5
 7 16 500 5 3.5
 8 17 500 5 3.5
 9 18 500 5 3.5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"  object1="@./"  object2="@./" />
		</Node>
		<Node 	 name="M2"  >
			<MeshGmshLoader name="loader"  filename="mesh/smCube27.msh" />
			<MechanicalObject template="Vec3d" name="mObject2"  position="@loader.position"  velocity="0 0 0"  force="0 0 0"  externalForce="0 0 0"  derivX="0 0 0"  restScale="1"  translation="0 0 10.5" />
			<UniformMass template="Vec3d" name="uniformMass2"  mass="0.1" />
			<StiffSpringForceField template="Vec3d" name="InternalSprings2"  spring="0 9 100 5 3.5
 1 10 500 5 3.5
 2 11 500 5 3.5
 3 12 500 5 3.5
 4 13 500 5 3.5
 5 14 500 5 3.5
 6 15 500 5 3.5
 7 16 500 5 3.5
 8 17 500 5 3.5
 9 18 500 5 3.5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"  object1="@./"  object2="@./" />
		</Node>
		<StiffSpringForceField template="Vec3d" name="ExternalSprings1"  spring="2 0 500 5 3.5
 5 3 500 5 3.5
 8 6 500 5 3.5
 11 9 500 5 3.5
 14 12 500 5 3.5
 17 15 500 5 3.5
 20 18 500 5 3.5
 23 21 500 5 3.5
 26 24 500 5 3.5
 14 0 500 5 6.06218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"  object1="@M1"  object2="@M2" />
		<StiffSpringForceField template="Vec3d" name="ExternalSprings2"  spring="2 0 500 5 3.5
 5 3 500 5 3.5
 8 6 500 5 3.5
 11 9 500 5 3.5
 14 12 500 5 3.5
 17 15 500 5 3.5
 20 18 500 5 3.5
 23 21 500 5 3.5
 26 24 500 5 3.5
 14 0 500 5 6.06218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"  object1="@M2"  object2="@M3" />
		<StiffSpringForceField template="Vec3d" name="ExternalSprings3"  spring="2 0 500 5 3.5
 5 3 500 5 3.5
 8 6 500 5 3.5
 11 9 500 5 3.5
 14 12 500 5 3.5
 17 15 500 5 3.5
 20 18 500 5 3.5
 23 21 500 5 3.5
 26 24 500 5 3.5
 14 0 500 5 6.06218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"  object1="@M3"  object2="@M4" />
		<StiffSpringForceField template="Vec3d" name="ExternalSprings4"  spring="2 0 500 5 3.5
 5 3 500 5 3.5
 8 6 500 5 3.5
 11 9 500 5 3.5
 14 12 500 5 3.5
 17 15 500 5 3.5
 20 18 500 5 3.5
 23 21 500 5 3.5
 26 24 500 5 3.5
 14 0 500 5 6.06218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"  object1="@M4"  object2="@M5" />
	</Node>
</Node>
