<?xml version="1.0" ?>
<!-- Mechanical Tetrahedral Corotational FEM Basic Example -->
<Node name="root" dt="0.05" showBoundingTree="0" gravity="0 0 0">
    <RequiredPlugin name="SofaOpenglVisual"/>
    <VisualStyle displayFlags="showBehaviorModels" />
    <DefaultPipeline verbose="0" />
    <BruteForceDetection name="N2" />
    <DefaultContactManager response="default" />
    <MinProximityIntersection name="Proximity" alarmDistance="0.8" contactDistance="0.5" />
    <Node name="TT">
        <EulerImplicitSolver name="cg_odesolver" printLog="false"  rayleighStiffness="0.1" rayleighMass="0.1" />
        <CGLinearSolver iterations="25" name="linear solver" tolerance="1.0e-9" threshold="1.0e-9" />
        <MeshGmshLoader filename="mesh/cylinder.msh" name="loader" />
        <MechanicalObject src="@loader" name="Volume" />
		<TetrahedronSetTopologyContainer name="Container" position="@loader.position" tetrahedra="@loader.tetrahedra" />
        <TetrahedronSetGeometryAlgorithms />
        <DiagonalMass massDensity="0.5" />
        <FixedPlaneConstraint direction="0 0 1" dmin="-0.1" dmax="0.1" />
        <FixedConstraint indices="0" />
        <TetrahedralCorotationalFEMForceField name="CFEM" youngModulus="360" poissonRatio="0.3" method="large" />
        <Node name="T">
			<TriangleSetTopologyContainer name="ContainerT"/>
			<TriangleSetTopologyModifier />
			<TriangleSetTopologyAlgorithms name="TopoAlgo" />
			<TriangleSetGeometryAlgorithms name="GeomAlgo" showTriangleIndices="false"/>
            <Tetra2TriangleTopologicalMapping input="@../Container" output="@ContainerT" flipNormals="true"/>
            <Triangle/>
            <Node name="Visu">
                <OglModel name="Visual" color="yellow" />
                <IdentityMapping input="@../../Volume" output="@Visual" />
            </Node>
        </Node>
    </Node>
	<!-- <Node name="TT1">
        <EulerImplicitSolver name="cg_odesolver" printLog="false" />
        <CGLinearSolver iterations="25" name="linear solver" tolerance="1.0e-9" threshold="1.0e-9" />
        <MeshGmshLoader filename="mesh/cylinder.msh" name="loader" />
        <MechanicalObject src="@loader" name="Volume" dx="1"/>
		<TetrahedronSetTopologyContainer name="Container" position="@loader.position" tetrahedra="@loader.tetrahedra" />
        <DiagonalMass massDensity="0.5" />
        <FixedPlaneConstraint direction="0 0 1" dmin="-0.1" dmax="0.1" />
        <FixedConstraint indices="0" />
        <TetrahedralCorotationalFEMForceField name="CFEM" youngModulus="360" poissonRatio="0.3" method="large" />
        <Node name="T">
			<TriangleSetTopologyContainer name="ContainerT"/>
			<TriangleSetTopologyModifier />
			<TriangleSetTopologyAlgorithms name="TopoAlgo" />
			<TriangleSetGeometryAlgorithms name="GeomAlgo" showTriangleIndices="false"/>
            <Tetra2TriangleTopologicalMapping object1="../../Container" object2="ContainerT" flipNormals="true"/>
            <Triangle/>
            <Node name="Visu">
                <OglModel name="Visual" color="yellow" />
                <IdentityMapping input="@../../Volume" output="@Visual" />
            </Node>
        </Node>
    </Node>
	<Node name="TT2">
        <EulerImplicitSolver name="cg_odesolver" printLog="false" />
        <CGLinearSolver iterations="25" name="linear solver" tolerance="1.0e-9" threshold="1.0e-9" />
        <MeshGmshLoader filename="mesh/cylinder.msh" name="loader" />
        <MechanicalObject src="@loader" name="Volume" dx="2"/>
		<TetrahedronSetTopologyContainer name="Container" position="@loader.position" tetrahedra="@loader.tetrahedra" />
        <DiagonalMass massDensity="0.5" />
        <FixedPlaneConstraint direction="0 0 1" dmin="-0.1" dmax="0.1" />
        <FixedConstraint indices="0" />
        <TetrahedralCorotationalFEMForceField name="CFEM" youngModulus="360" poissonRatio="0.3" method="large" />
        <Node name="T">
			<TriangleSetTopologyContainer name="ContainerT"/>
			<TriangleSetTopologyModifier />
			<TriangleSetTopologyAlgorithms name="TopoAlgo" />
			<TriangleSetGeometryAlgorithms name="GeomAlgo" showTriangleIndices="false"/>
            <Tetra2TriangleTopologicalMapping object1="../../Container" object2="ContainerT" flipNormals="true"/>
            <Triangle/>
            <Node name="Visu">
                <OglModel name="Visual" color="yellow" />
                <IdentityMapping input="@../../Volume" output="@Visual" />
            </Node>
        </Node>
    </Node>
	<Node name="TT3">
        <EulerImplicitSolver name="cg_odesolver" printLog="false" />
        <CGLinearSolver iterations="25" name="linear solver" tolerance="1.0e-9" threshold="1.0e-9" />
        <MeshGmshLoader filename="mesh/cylinder.msh" name="loader" />
        <MechanicalObject src="@loader" name="Volume" dx="3"/>
		<TetrahedronSetTopologyContainer name="Container" position="@loader.position" tetrahedra="@loader.tetrahedra" />
        <DiagonalMass massDensity="0.5" />
        <FixedPlaneConstraint direction="0 0 1" dmin="-0.1" dmax="0.1" />
        <FixedConstraint indices="0" />
        <TetrahedralCorotationalFEMForceField name="CFEM" youngModulus="360" poissonRatio="0.3" method="large" />
        <Node name="T">
			<TriangleSetTopologyContainer name="ContainerT"/>
			<TriangleSetTopologyModifier />
			<TriangleSetTopologyAlgorithms name="TopoAlgo" />
			<TriangleSetGeometryAlgorithms name="GeomAlgo" showTriangleIndices="false"/>
            <Tetra2TriangleTopologicalMapping object1="../../Container" object2="ContainerT" flipNormals="true"/>
            <Triangle/>
            <Node name="Visu">
                <OglModel name="Visual" color="yellow" />
                <IdentityMapping input="@../../Volume" output="@Visual" />
            </Node>
        </Node>
    </Node> -->
</Node>
