<!-- Automatic Triangle removing with Triangle2Edge mapping example: Element removed are define in: ./RemovingTrianglesProcess.txt -->
<Node name="root" gravity="0 -9 1" dt="0.01">
    <VisualStyle displayFlags="showBehaviorModels showVisual" />
    <DefaultPipeline name="default0" verbose="0" />
    <BruteForceDetection name="N2" />
    <DefaultContactManager name="default1" response="default" />
    <MinProximityIntersection name="Proximity" alarmDistance="0.8" contactDistance="0.5" />
    <TreeCollisionGroupManager name="default2" />

    <Node name="TriangularBendingSprings">
        <EulerImplicit name="cg_odesolver" printLog="false" />
        <CGLinearSolver iterations="25" name="linear solver" tolerance="1.0e-9" threshold="1.0e-9" />
        <MeshGmshLoader name="loader" filename="mesh/square3.msh" translation="-1 0 0"/>
        <MechanicalObject name="TriangularBendingSprings" src="@loader" scale="10" />
        <include href="Objects/TriangleSetTopology.xml" src="@loader" />
        <DiagonalMass massDensity="0.015" />
        <FixedConstraint indices="0 1" />
        <TriangularFEMForceField template="Vec3d" name="FEM" method="large" poissonRatio="0.3" youngModulus="60" />
        <TriangularBendingSprings template="Vec3d" name="FEM-Bend" stiffness="300" damping="1" />
        <TriangleSet />
        <VisualModel name="Visual" color="black" />
        <IdentityMapping template="Mapping&lt;Vec3d,ExtVec3f&gt;" name="default8" object1=".." object2="Visual" />
    </Node>

    <Node name="TriangularBiquadratic">
        <EulerImplicit name="cg_odesolver" printLog="false" />
        <CGLinearSolver iterations="25" name="linear solver" tolerance="1.0e-9" threshold="1.0e-9" />
        <MeshGmshLoader name="loader" filename="mesh/square3.msh" />
        <MechanicalObject name="TriangularBiquadratic" src="@loader" scale="10" />
        <include href="Objects/TriangleSetTopology.xml" src="@loader" />
        <DiagonalMass massDensity="0.015" />
        <FixedConstraint indices="0 1" />
        <TriangularBiquadraticSpringsForceField name="BQS" youngModulus="15" poissonRatio="0.9" useAngularSprings="1" dampingRatio="0.00" />
        <TriangleSet />
        <VisualModel name="Visual" color="white" />
        <IdentityMapping object1=".." object2="Visual" />
    </Node>


    <Node name="TriangularQuadratic">
        <EulerImplicit name="cg_odesolver" printLog="false" />
        <CGLinearSolver iterations="25" name="linear solver" tolerance="1.0e-9" threshold="1.0e-9" />
        <MeshGmshLoader name="loader" filename="mesh/square3.msh" translation="1 0 0"/>
        <MechanicalObject name="TriangularQuadratic" src="@loader" scale="10" />
        <include href="Objects/TriangleSetTopology.xml" src="@loader" />
        <DiagonalMass massDensity="0.015" />
        <FixedConstraint indices="0 1" />
        <TriangularQuadraticSpringsForceField name="QS" youngModulus="15" poissonRatio="0.9" useAngularSprings="1" dampingRatio="0.00" />
        <TriangleSet />
        <VisualModel name="Visual" color="yellow" />
        <IdentityMapping object1=".." object2="Visual" />
    </Node>

    <Node name="TriangularFEM">
        <EulerImplicit name="cg_odesolver" printLog="false" />
        <CGLinearSolver iterations="25" name="linear solver" tolerance="1.0e-9" threshold="1.0e-9" />
        <MeshGmshLoader name="loader" filename="mesh/square3.msh" translation="-1 0 -1"/>
        <MechanicalObject name="TriangularFEM" src="@loader" scale="10" />
        <include href="Objects/TriangleSetTopology.xml" src="@loader" />
        <DiagonalMass massDensity="0.015" />
        <FixedConstraint indices="0 1" />
        <TriangularFEMForceField template="Vec3d" name="FEM" method="large" poissonRatio="0.3" youngModulus="60" />
        <TriangularBendingSprings template="Vec3d" name="FEM-Bend" stiffness="300" damping="1" />
        <TriangleSet />
        <VisualModel name="Visual" color="red" />
        <IdentityMapping template="Mapping&lt;Vec3d,ExtVec3f&gt;" name="default8" object1=".." object2="Visual" />
    </Node>

    <Node name="TriangularTensorMass">
        <EulerImplicit name="cg_odesolver" printLog="false" />
        <CGLinearSolver iterations="25" name="linear solver" tolerance="1.0e-9" threshold="1.0e-9" />
        <MeshGmshLoader name="loader" filename="mesh/square3.msh" translation="0 0 -1" />
        <MechanicalObject name="TriangularTensorMass" src="@loader" scale="10" />
        <include href="Objects/TriangleSetTopology.xml" src="@loader" />
        <DiagonalMass massDensity="0.015" />
        <FixedConstraint indices="0 1" />
        <TriangularTensorMassForceField name="TM" youngModulus="15" poissonRatio="0.9" />
        <TriangleSet />
        <OglModel name="Visual" color="green" />
        <IdentityMapping object1=".." object2="Visual" />
    </Node>

    <Node name="TrianglePressureForceField">
        <EulerImplicit name="cg_odesolver" printLog="false" />
        <CGLinearSolver iterations="25" name="linear solver" tolerance="1.0e-9" threshold="1.0e-9" />
        <MeshGmshLoader name="loader" filename="mesh/square3.msh" translation="1 0 -1" />
        <MechanicalObject name="TrianglePressureForceField" src="@loader" scale="10" />
        <include href="Objects/TriangleSetTopology.xml" src="@loader" />
        <DiagonalMass massDensity="0.015" />
        <FixedConstraint indices="0 1" />
        <TrianglePressureForceField name="PFF" normal="0 0 1" dmin="0.9" dmax="1.1" pressure="0 1 0" />
        <TriangleSet />
        <OglModel name="Visual" color="blue" />
        <IdentityMapping object1=".." object2="Visual" />
    </Node>

</Node>
