<Node name="root" dt="0.02" gravity="0 -10 0">
    <RequiredPlugin name="SofaBoundaryCondition"/>
    <RequiredPlugin name="SofaImplicitOdeSolver"/>
    <RequiredPlugin name="SofaSimpleFem"/>

    <VisualStyle displayFlags="showBehaviorModels showForceFields" />

    <DefaultAnimationLoop/>
    <DefaultVisualManagerLoop/>

    <Node name="M1">
        <EulerImplicitSolver name="odesolver" rayleighStiffness="0.1" rayleighMass="0.1" />
        <CGLinearSolver template="CompressedRowSparseMatrixMat3x3d" iterations="1000" threshold="1e-9" tolerance="1e-9"/>
        <MechanicalObject />
        <UniformMass totalMass="320" />
        <RegularGridTopology nx="4" ny="4" nz="20" xmin="-9" xmax="-6" ymin="0" ymax="3" zmin="0" zmax="19" />
        <BoxROI name="box" box="-10 -1 -0.0001  -5 4 0.0001"/>
        <FixedConstraint indices="@box.indices" />
        <HexahedronFEMForceField name="FEM" youngModulus="4000" poissonRatio="0.3" method="large" />
    </Node>
</Node>
