<Node name="root" gravity="0 0 0" dt="0.01">
    <RequiredPlugin pluginName="SofaOpenglVisual"/>
    <RequiredPlugin pluginName="SofaNonUniformFem"/>
    <RequiredPlugin pluginName='SofaBoundaryCondition'/>
    <RequiredPlugin pluginName='SofaEngine'/>
    <RequiredPlugin pluginName='SofaImplicitOdeSolver'/>
    <RequiredPlugin pluginName='SofaLoader'/>
    <!-- A soft grape containing a very stiff seed is deformed by using only one element. By using the HexahedronCompositeFEMMapping, the seed does not deform.  -->
    <VisualStyle displayFlags="showVisual showBehaviorModels showForceFields" />
    <MeshOBJLoader name="meshLoader_2" filename="mesh/plane_loop_2.obj" scale="1" handleSeams="1" />
    <OglModel name="plan" src="@meshLoader_2" rx="90" rz="90" dy="-10.2" material="Default Diffuse 1 1 0.4 0.4 1 Ambient 1 0.8 0.8 0.8 1 Specular 0 1 1 1 1 Emissive 0 1 1 1 1 Shininess 0 45"/>
    <Node name="HexahedronCompositeFEMMapping">
        <SparseGridMultipleTopology n="2 2 2" fileTopology="mesh/grape_out.obj" fileTopologies="mesh/grape_out.obj mesh/grape_in.obj" stiffnessCoefs="1 1000000" massCoefs="1 1" nbVirtualFinerLevels="4" finestConnectivity="false" />
        <EulerImplicitSolver rayleighMass="0" rayleighStiffness="0" />
        <CGLinearSolver iterations="2000" tolerance="1e-5" threshold="1e-5"/>
        <MechanicalObject dx="15" />
        <HexahedronCompositeFEMForceFieldAndMass completeInterpolation="false" nbVirtualFinerLevels="3" youngModulus="100" poissonRatio="0.35" method="large" density="2" updateStiffnessMatrix="false" printLog="0" useMass="false" totalMass="1" drawSize=".5" />
        <BoxConstraint box="-30 -11 -30   100 -9 30" drawSize="0.75" />
        <Node name="Collinonunif">
            <MeshOBJLoader name="loader" filename="mesh/grape_out.obj" />
            <MeshTopology src="@loader" />
            <MechanicalObject src="@loader" />
            <HexahedronCompositeFEMMapping/>
            <Node name="f1">
                <ConstantForceField indices="340" forces="1000 8000 0" showArrowSize=".001" />
            </Node>
            <Node name="Visu2">
                <MeshOBJLoader name="meshLoader_3" filename="mesh/grape_out.obj" handleSeams="1" />
                <OglModel name="VisualEyes" src="@meshLoader_3" normals="0" color="0.1 .8 .3 .5" />
                <IdentityMapping input="@.." output="@VisualEyes" />
            </Node>
        </Node>
        <Node name="Visu1">
            <MeshOBJLoader name="meshLoader_0" filename="mesh/grape_in.obj" handleSeams="1" />
            <OglModel name="VisualBody" src="@meshLoader_0" normals="0" color="0 0 .6 1" />
            <HexahedronCompositeFEMMapping input="@.." output="@VisualBody" />
        </Node>
    </Node>
    <Node name="BarycentricMapping">
        <SparseGridMultipleTopology n="2 2 2" fileTopology="mesh/grape_out.obj" fileTopologies="mesh/grape_out.obj mesh/grape_in.obj" stiffnessCoefs="1 1000000" massCoefs="1 1" nbVirtualFinerLevels="4" finestConnectivity="false" />
        <EulerImplicitSolver rayleighMass="0" rayleighStiffness="0" />
        <CGLinearSolver iterations="2000" tolerance="1e-5" threshold="1e-5"/>
        <MechanicalObject dx="-15" />
        <HexahedronCompositeFEMForceFieldAndMass completeInterpolation="true" nbVirtualFinerLevels="3" youngModulus="100" poissonRatio="0.35" method="large" density="2" updateStiffnessMatrix="false" printLog="0" useMass="false" totalMass="1" drawSize=".5" />
        <BoxConstraint box="-100 -11 -30   30 -9 30" drawSize="0.75"/>
        <Node name="Collinonunif">
            <MeshOBJLoader name="loader" filename="mesh/grape_out.obj"/>
            <MeshTopology src="@loader"/>
            <MechanicalObject src="@loader"/>
            <BarycentricMapping/>
            <Node name="f2">
                <ConstantForceField indices="340" forces="1000 8000 0" showArrowSize=".001" />
            </Node>
            <Node name="Visu2">
                <MeshOBJLoader name="meshLoader_4" filename="mesh/grape_out.obj" handleSeams="1" />
                <OglModel name="VisualEyes" src="@meshLoader_4" normals="0" color="0.1 .8 .3 .5" />
                <IdentityMapping input="@.." output="@VisualEyes" />
            </Node>
        </Node>
        <Node name="Visu1">
            <MeshOBJLoader name="meshLoader_1" filename="mesh/grape_in.obj" handleSeams="1" />
            <OglModel name="VisualBody" src="@meshLoader_1" normals="0" color="0 0 .6 1" />
            <BarycentricMapping input="@.." output="@VisualBody" />
        </Node>
    </Node>
</Node>
