<?xml version="1.0"?>
<Node name="root" dt="0.01">
    <RequiredPlugin name="SofaOpenglVisual"/>
    <RequiredPlugin pluginName='SofaLoader'/>

	<MeshOBJLoader name="meshLoader_0" filename="data/mesh/add_repo_cube.obj" handleSeams="1" />
	<OglModel name="VisualModel1" src="@meshLoader_0" />

	<AddDataRepository path="./data/mesh" />
    <MeshOBJLoader name="meshLoader_1" filename="add_repo_cube.obj" translation="5 0 0" handleSeams="1" />
    <OglModel name="VisualModel2" src="@meshLoader_1"/>

</Node>
