<Node name="root" gravity="0 -9 0" dt="0.01">
    <RequiredPlugin name="SofaOpenglVisual"/>
    <VisualStyle displayFlags="showBehaviorModels showVisual" />
    <DefaultPipeline name="default0" verbose="0" />
    <BruteForceDetection name="N2" />
    <DefaultContactManager name="default1" response="default" />
    <MinProximityIntersection name="Proximity" alarmDistance="0.8" contactDistance="0.5" />
    <TreeCollisionGroupManager name="default2" />
    <Node name="SquareGravity" gravity="0 -9.81 0">
        <EulerImplicitSolver name="cg_odesolver" printLog="false"  rayleighStiffness="0.1" rayleighMass="0.1" />
        <CGLinearSolver iterations="25" name="linear solver" tolerance="1.0e-9" threshold="1.0e-9" />
        <MeshGmshLoader name="loader" filename="mesh/square3.msh" createSubelements="true"/>
        <MechanicalObject name="mecaObj" src="@loader" template="Vec3d" scale3d="10 10 10" restScale="1" />
        <TriangleSetTopologyContainer src="@loader" name="Container" />
        <TriangleSetTopologyModifier name="Modifier" />
        <TriangleSetTopologyAlgorithms template="Vec3d" name="TopoAlgo" />
        <TriangleSetGeometryAlgorithms template="Vec3d" name="GeomAlgo" />
        <DiagonalMass template="Vec3d" name="default5" massDensity="0.15" />
        <TriangularFEMForceField template="Vec3d" name="FEM" method="large" poissonRatio="0.3" youngModulus="60" />
        <TriangularBendingSprings template="Vec3d" name="FEM-Bend" stiffness="300" damping="1" />
        <TriangleCollisionModel name="default7" />
        <OglModel template="ExtVec3f" name="Visual" material="Default Diffuse 1 0 0 1 0.6 Ambient 1 0.2 0 0 1 Specular 0 1 0 0 1 Emissive 0 1 0 0 1 Shininess 0 45" />
        <IdentityMapping template="Vec3d,ExtVec3f" name="default8" input="@." output="@Visual" />
        <BoxROI template="Vec3d" box="2 0 -1 8 -3 1" drawBoxes="1" position="@mecaObj.position" drawTriangles="1" triangles="@Container.triangles" name="trash" />
        <TopologicalChangeProcessor listening="1" useDataInputs="1" trianglesToRemove="@trash.triangleIndices" timeToRemove="0.1" interval="0.05" />
    </Node>
</Node>
