<?xml version="1.0"?>
<Node name="root" gravity="-1.8 0 100" dt="0.1">
    <RequiredPlugin name="SofaOpenglVisual"/>
    <Node name="Reference">
        <MeshObjLoader name="meshLoader_3" filename="mesh/truthcylinder1-bent.obj" scale="0.95" handleSeams="1" />
        <OglModel src="@meshLoader_3" dx="0" dy="-1" dz="0" color="green" />
    </Node>
    <Node name="Springs">
        <EulerImplicitSolver name="cg_odesolver"  rayleighStiffness="0.1" rayleighMass="0.1" />
        <CGLinearSolver iterations="100" tolerance="1e-5" threshold="1e-5"/>
        <MeshGmshLoader name="loader" filename="mesh/truthcylinder1.msh" />
        <Mesh src="@loader" />
        <MechanicalObject src="@loader" dx="15" />
        <UniformMass totalMass="15" />
        <FixedConstraint indices="0 1 2 3 4 5 6 7 8 9 10 11 12 13 14 15 16 17 18 19 20 21 22 23 24 25 26 27 28 29 30 31 32 33 34 35 36 37 38 39 40 41 42 43 44 45 46 47 268 269 270 271 343 345" />
        <MeshSpringForceField name="Spring" tetrasStiffness="1870" tetrasDamping="0" />
        <Node>
            <MeshObjLoader name="meshLoader_0" filename="mesh/truthcylinder1.obj" handleSeams="1" />
            <OglModel name="Visual" src="@meshLoader_0" color="yellow" dx="15" />
            <BarycentricMapping input="@.." output="@Visual" />
        </Node>
    </Node>
    <Node name="CoFEM">
        <EulerImplicitSolver name="cg_odesolver" />
        <CGLinearSolver iterations="100" tolerance="1e-5" threshold="1e-5"/>
        <MeshGmshLoader name="loader" filename="mesh/truthcylinder1.msh" />
        <Mesh src="@loader" />
        <MechanicalObject src="@loader" dx="30" />
        <UniformMass totalMass="15" />
        <FixedConstraint indices="0 1 2 3 4 5 6 7 8 9 10 11 12 13 14 15 16 17 18 19 20 21 22 23 24 25 26 27 28 29 30 31 32 33 34 35 36 37 38 39 40 41 42 43 44 45 46 47 268 269 270 271 343 345" />
        <TetrahedronFEMForceField name="FEM" youngModulus="1116" poissonRatio="0.49" method="polar" />
        <Node>
            <MeshObjLoader name="meshLoader_4" filename="mesh/truthcylinder1.obj" handleSeams="1" />
            <OglModel name="Visual" src="@meshLoader_4" color="cyan" dx="30" />
            <BarycentricMapping input="@.." output="@Visual" />
        </Node>
    </Node>
    <Node name="CoFEM_firstOrder">
        <EulerImplicitSolver name="cg_odesolver" firstOrder="1" />
        <CGLinearSolver iterations="100" tolerance="1e-5" threshold="1e-5"/>
        <MeshGmshLoader name="loader" filename="mesh/truthcylinder1.msh" />
        <Mesh src="@loader" />
        <MechanicalObject src="@loader" dx="45" />
        <UniformMass totalMass="15" />
        <FixedConstraint indices="0 1 2 3 4 5 6 7 8 9 10 11 12 13 14 15 16 17 18 19 20 21 22 23 24 25 26 27 28 29 30 31 32 33 34 35 36 37 38 39 40 41 42 43 44 45 46 47 268 269 270 271 343 345" />
        <TetrahedronFEMForceField name="FEM" youngModulus="1116" poissonRatio="0.49" method="polar" />
        <Node>
            <MeshObjLoader name="meshLoader_1" filename="mesh/truthcylinder1.obj" handleSeams="1" />
            <OglModel name="Visual" src="@meshLoader_1" color="blue" dx="45" />
            <BarycentricMapping input="@.." output="@Visual" />
        </Node>
    </Node>
    <Node name="LinearFEM">
        <EulerImplicitSolver name="cg_odesolver" />
        <CGLinearSolver iterations="100" tolerance="1e-5" threshold="1e-5"/>
        <MeshGmshLoader name="loader" filename="mesh/truthcylinder1.msh" />
        <Mesh src="@loader" />
        <MechanicalObject src="@loader" dx="60" />
        <UniformMass totalMass="15" />
        <FixedConstraint indices="0 1 2 3 4 5 6 7 8 9 10 11 12 13 14 15 16 17 18 19 20 21 22 23 24 25 26 27 28 29 30 31 32 33 34 35 36 37 38 39 40 41 42 43 44 45 46 47 268 269 270 271 343 345" />
        <TetrahedronFEMForceField name="FEM" youngModulus="1116" poissonRatio="0.49" method="small" />
        <Node>
            <MeshObjLoader name="meshLoader_2" filename="mesh/truthcylinder1.obj" handleSeams="1" />
            <OglModel name="Visual" src="@meshLoader_2" color="red" dx="60" />
            <BarycentricMapping input="@.." output="@Visual" />
        </Node>
    </Node>
</Node>
