<?xml version="1.0"?>
<Node name="root" gravity="0 -9.81 0" dt="0.01">
    <RequiredPlugin name="Sofa.Component.LinearSolver.Iterative"/> <!-- Needed to use components [CGLinearSolver] -->
    <RequiredPlugin name="Sofa.Component.Mapping.Linear"/> <!-- Needed to use components [IdentityMapping] -->
    <RequiredPlugin name="Sofa.Component.Mass"/> <!-- Needed to use components [UniformMass] -->
    <RequiredPlugin name="Sofa.Component.ODESolver.Backward"/> <!-- Needed to use components [EulerImplicitSolver] -->
    <RequiredPlugin name="Sofa.Component.SolidMechanics.FEM.Elastic"/> <!-- Needed to use components [TetrahedronFEMForceField] -->
    <RequiredPlugin name="Sofa.Component.StateContainer"/> <!-- Needed to use components [MechanicalObject] -->
    <RequiredPlugin name="Sofa.Component.Topology.Container.Grid"/> <!-- Needed to use components [RegularGridTopology] -->
    <RequiredPlugin name="Sofa.Component.Visual"/> <!-- Needed to use components [VisualStyle] -->
    <RequiredPlugin name="Sofa.GL.Component.Rendering3D"/> <!-- Needed to use components [OglModel] -->
    <RequiredPlugin name="SofaBoundaryCondition"/> <!-- Needed to use components [FixedConstraint] -->
    <RequiredPlugin name="SofaEngine"/> <!-- Needed to use components [BoxROI] -->
    <RequiredPlugin name="SofaMiscCollision"/> <!-- Needed to use components [DefaultCollisionGroupManager] -->
    <VisualStyle displayFlags="showBehaviorModels showVisual" />
    <DefaultPipeline name="default21" verbose="0" />
    <BruteForceBroadPhase/>
    <BVHNarrowPhase/>
    <DefaultContactManager name="default22" response="PenalityContactForceField" />
    <MinProximityIntersection name="Proximity" alarmDistance="0.8" contactDistance="0.5" />
    <DefaultCollisionGroupManager name="default23" />
    <Node name="Cube" gravity="0 -9.81 0">
        <EulerImplicitSolver name="cg_odesolver" printLog="0"  rayleighStiffness="0.1" rayleighMass="0.1" />
        <CGLinearSolver template="GraphScattered" name="linear solver" iterations="25" tolerance="1e-09" threshold="1e-09" />
        <RegularGridTopology name="grid" n="6 6 6" min="-10 -10 -10" max="10 10 10" p0="-10 -10 -10" />
        <MechanicalObject template="Vec3d" name="default24" />
        <UniformMass template="Vec3d,double" name="default25" vertexMass="0.25" />
        <TetrahedronFEMForceField template="Vec3d" name="FEM" method="large" poissonRatio="0.4" youngModulus="1000" assembling="0" />
        <BoxROI template="Vec3d" name="box_roi" box="-11 -11 -11 11 -9 11" indices="0" drawSize="0" />
        <FixedConstraint template="Vec3d" name="default27" indices="@box_roi.indices" drawSize="0" />
        <Node name="Tetra" gravity="0 -9.81 0">
            <TetrahedronSetTopologyContainer name="Container" />
            <TetrahedronSetTopologyModifier name="Modifier" />
            <TetrahedronSetGeometryAlgorithms template="Vec3d" name="GeomAlgo" />
            <Hexa2TetraTopologicalMapping name="default28" input="@../grid" output="@Container" />
            <Node name="Triangles" gravity="0 -9.81 0">
                <TriangleSetTopologyContainer name="Container" />
                <TriangleSetTopologyModifier name="Modifier" />
                <TriangleSetGeometryAlgorithms template="Vec3d" name="GeomAlgo" />
                <Tetra2TriangleTopologicalMapping name="default29" input="@../Container" output="@Container" />
                <TriangleCollisionModel name="default30" />
                <LineCollisionModel name="default31" />
                <PointCollisionModel name="default32" />
                <Node name="Visu" gravity="0 -9.81 0">
                    <OglModel template="Vec3d" name="Visual" material="Default Diffuse 1 1 0 0 1 Ambient 1 0.2 0 0 1 Specular 0 1 0 0 1 Emissive 0 1 0 0 1 Shininess 0 45" />
                    <IdentityMapping template="Vec3d,Vec3d" name="default33" input="@.." output="@Visual" />
                </Node>
            </Node>
        </Node>
    </Node>
</Node>
