<?xml version="1.0"?>
<Node name="root" gravity="0 0 -9" dt="0.02">
    <RequiredPlugin name="SofaOpenglVisual"/>
    <RequiredPlugin name="SofaMiscCollision" />
    <RequiredPlugin name='SofaNonUniformFem'/>
    <RequiredPlugin name='SofaEngine'/>
    <RequiredPlugin name='SofaLoader'/>

    <VisualStyle displayFlags="showVisual showBehaviorModels showForceFields" />
    <DefaultPipeline depth="6" verbose="0" draw="0" />
    <BruteForceDetection name="N2" />
    <MinProximityIntersection name="Proximity" alarmDistance="0.5" contactDistance="0.3" />
    <DefaultContactManager name="Response" response="default" />
    <DefaultCollisionGroupManager name="Group" />
    <Node name="UniformC Rough">
        <SparseGridRamificationTopology n="5 2 2" fileTopology="mesh/c.obj" nbVirtualFinerLevels="3" finestConnectivity="0" />
        <EulerImplicitSolver rayleighStiffness="0.1" rayleighMass="0.1" />
        <CGLinearSolver iterations="10" tolerance="1e-5" threshold="1e-5"/>
        <MechanicalObject />
        <HexahedronFEMForceFieldAndMass youngModulus="100000" poissonRatio="0.3" method="large" density="3" updateStiffnessMatrix="false" printLog="0" />
        <BoxConstraint box="-16 -10 -3 -14 10 3" />
        <Node name="Visu">
            <MeshObjLoader name="meshLoader_1" filename="mesh/c.obj" handleSeams="1" />
            <OglModel name="Visual" src="@meshLoader_1" color="blue" />
            <BarycentricMapping input="@.." output="@Visual" />
        </Node>
        <Node name="Surf">
            <MeshObjLoader name="loader" filename="mesh/c.obj" />
            <MeshTopology src="@loader" />
            <MechanicalObject src="@loader" />
            <TriangleCollisionModel />
            <PointCollisionModel />
            <LineCollisionModel />
            <BarycentricMapping />
        </Node>
    </Node>
    <Node name="UniformC">
        <SparseGridRamificationTopology n="5 2 2" fileTopology="mesh/c.obj" nbVirtualFinerLevels="3" finestConnectivity="0" />
        <EulerImplicitSolver rayleighStiffness="0.1" rayleighMass="0.1" />
        <CGLinearSolver iterations="10" tolerance="1e-5" threshold="1e-5"/>
        <MechanicalObject dx="40" />
        <HexahedronFEMForceFieldAndMass youngModulus="100000" poissonRatio="0.3" method="large" density="3" updateStiffnessMatrix="false" printLog="0" />
        <BoxConstraint box="24 -10 -3 26 10 3" />
        <Node name="Visu">
            <MeshObjLoader name="meshLoader_0" filename="mesh/c.obj" handleSeams="1" />
            <OglModel name="Visual" src="@meshLoader_0" color="red" />
            <BarycentricMapping input="@.." output="@Visual" />
        </Node>
        <Node name="Surf">
            <MeshObjLoader name="loader" filename="mesh/c.obj" />
            <MeshTopology src="@loader" />
            <MechanicalObject src="@loader" />
            <TriangleCollisionModel />
            <PointCollisionModel />
            <LineCollisionModel />
            <BarycentricMapping />
        </Node>
    </Node>
    <Node name="UniformC and finestConnectivity">
        <SparseGridRamificationTopology n="5 3 3" fileTopology="mesh/c.obj" nbVirtualFinerLevels="0" finestConnectivity="1" />
        <EulerImplicitSolver rayleighStiffness="0.1" rayleighMass="0.1" />
        <CGLinearSolver iterations="10" tolerance="1e-5" threshold="1e-5"/>
        <MechanicalObject dx="80" />
        <HexahedronFEMForceFieldAndMass youngModulus="100000" poissonRatio="0.3" method="large" density="3" updateStiffnessMatrix="false" printLog="0" />
        <BoxConstraint box="64 -10 -3 66 10 3" />
        <Node name="Visu">
            <MeshObjLoader name="meshLoader_2" filename="mesh/c.obj" handleSeams="1" />
            <OglModel name="Visual" src="@meshLoader_2" color="yellow" />
            <BarycentricMapping input="@.." output="@Visual" />
        </Node>
        <Node name="Surf">
            <MeshObjLoader name="loader" filename="mesh/c.obj" />
            <MeshTopology src="@loader" />
            <MechanicalObject src="@loader" />
            <TriangleCollisionModel />
            <PointCollisionModel />
            <LineCollisionModel />
            <BarycentricMapping />
        </Node>
    </Node>
</Node>
