<?xml version="1.0" ?>
<Node name="root" dt="0.05" showBoundingTree="0" gravity="0 0 0">
    <VisualStyle displayFlags="showBehaviorModels showForceFields showCollisionModels showVisual" />
    <DefaultPipeline verbose="0" name="CollisionPipeline" />
    <BruteForceDetection name="N2" />
    <DefaultContactManager response="default" name="collision response" />
    <DiscreteIntersection />
    <Node name="FullTopology">
        <MeshObjLoader name="loader" filename="mesh/sphere_05.obj" />
        <EulerImplicitSolver name="cg_odesolver" printLog="false"  rayleighStiffness="0.1" rayleighMass="0.1" />
        <CGLinearSolver iterations="25" name="linear solver" tolerance="1.0e-9" threshold="1.0e-9" />
        <TriangleSetTopologyContainer name="Container1" src="@loader" />
        <TriangleSetTopologyModifier />
        <TriangleSetTopologyAlgorithms />
        <TriangleSetGeometryAlgorithms name="GeomAlgo" />
        <MechanicalObject name="dofs" />
        <BoxROI name="roi1" box="-55 -55 -55 55 55 -25" />
        <FixedConstraint name="FixedConstraint" indices="@roi1.indices" />
        <DiagonalMass massDensity="1" name="computed using mass density" />
        <TriangularFEMForceField name="FEM" youngModulus="3000" poissonRatio="0.4" />
        <Node name="SubsetTopology1">
            <BoxROI name="subsetROI" position="@../loader.position" triangles="@../loader.triangles" computeEdges="0" computeTetrahedra="0" box="-55 -55 25 55 55 55" />
            <TriangleSetTopologyContainer name="Container2" position="@../loader.position" triangles="@subsetROI.trianglesInROI" />
            <TriangleSetTopologyModifier />
            <TriangleSetGeometryAlgorithms name="GeomAlgo" />
            <SubsetTopologicalMapping input="@Container1" output="@Container2" samePoints="true" />
            <MechanicalObject />
            <IdentityMapping />
            <TriangleModel color="1 0 0 1" group="1" printLog="1" />
        </Node>
        <Node name="SubsetTopology2">
            <BoxROI name="subsetROI" position="@../loader.position" triangles="@../loader.triangles" computeEdges="0" computeTetrahedra="0" box="-55 -55 -55 55 55 25" />
            <TriangleSetTopologyContainer name="Container2" position="@../loader.position" triangles="@subsetROI.trianglesInROI" />
            <TriangleSetTopologyModifier />
            <TriangleSetGeometryAlgorithms name="GeomAlgo" />
            <SubsetTopologicalMapping input="@Container1" output="@Container2" samePoints="true" />
            <MechanicalObject />
            <IdentityMapping />
            <TriangleModel group="1" printLog="1" />
        </Node>
    </Node>
</Node>
