<!-- Automatic Hexahedron adding example with Hexa2Quad mapping: Element added are define in: ./AddingHexahedraProcess.txt -->
<Node name="root" dt="0.005" showBoundingTree="0" gravity="0 0 0">
    <RequiredPlugin pluginName="SofaMiscCollision" />
    <RequiredPlugin pluginName="SofaOpenglVisual"/>
    <RequiredPlugin pluginName='SofaMiscTopology'/>
    <RequiredPlugin pluginName='SofaTopologyMapping'/>
    <RequiredPlugin pluginName='SofaImplicitOdeSolver'/>
    <RequiredPlugin pluginName='SofaMeshCollision'/>

    <VisualStyle displayFlags="showBehaviorModels" />
    <DefaultPipeline verbose="0" />
    <BruteForceBroadPhase/>
    <BVHNarrowPhase/>
    <DefaultContactManager response="PenalityContactForceField" />
    <MinProximityIntersection name="Proximity" alarmDistance="0.8" contactDistance="0.5" />
    <DefaultCollisionGroupManager />
    <Node name="H">
        <EulerImplicitSolver name="cg_odesolver" printLog="false"  rayleighStiffness="0.1" rayleighMass="0.1" />
        <CGLinearSolver iterations="25" name="linear solver" tolerance="1.0e-9" threshold="1.0e-9" />
        <MeshGmshLoader name="loader" filename="mesh/cubeDof.msh" />
        <MechanicalObject src="@loader" name="Hexa" />
        <HexahedronSetTopologyContainer src="@loader" name="Hexa_topo" listening="1" />
        <HexahedronSetTopologyModifier name="Modifier" />
        <HexahedronSetGeometryAlgorithms template="Vec3d" name="GeomAlgo" drawHexa="1" />
        <TopologicalChangeProcessor listening="1" filename="AddingHexahedraProcess.txt" />
        <!--		<HexahedralFEMForceField" name="FEM" youngModulus="100" poissonRatio="0.3"  method="large" />-->
        <UniformMass totalMass="1" />
        <!--		<FixedConstraint" indices="12 15 28 31" />     -->
        <Node name="Q">
            <QuadSetTopologyContainer name="Quad_topo" listening="1" />
            <QuadSetTopologyModifier name="Modifier" />
            <QuadSetGeometryAlgorithms template="Vec3d" name="GeomAlgo" drawQuads="1" />
            <Hexa2QuadTopologicalMapping input="@../Hexa_topo" output="@Quad_topo" />
            <!--           		<QuadularBendingSprings name="FEM-Bend" stiffness="3000" damping="1.0"/>-->
            <TriangleCollisionModel />
            <!--			<Node name="Visu">
				<OglModel name="Visual" color="blue" />
				<IdentityMapping input="@../../Hexa" output="@Visual" />
			</Node>-->
        </Node>
    </Node>
</Node>
