<?xml version="1.0"?>
<Node name="root" dt="0.1" gravity="0 -10 0">
    <RequiredPlugin name="Sofa.Component.LinearSolver.Iterative"/> <!-- Needed to use components [CGLinearSolver] -->
    <RequiredPlugin name="Sofa.Component.Mass"/> <!-- Needed to use components [UniformMass] -->
    <RequiredPlugin name="Sofa.Component.ODESolver.Backward"/> <!-- Needed to use components [EulerImplicitSolver] -->
    <RequiredPlugin name="Sofa.Component.SolidMechanics.Spring"/> <!-- Needed to use components [StiffSpringForceField] -->
    <RequiredPlugin name="Sofa.Component.StateContainer"/> <!-- Needed to use components [MechanicalObject] -->
    <RequiredPlugin name="Sofa.Component.Topology.Utility"/> <!-- Needed to use components [TopologicalChangeProcessor] -->
    <RequiredPlugin name="Sofa.Component.Visual"/> <!-- Needed to use components [VisualStyle] -->
    <RequiredPlugin name="SofaBoundaryCondition"/> <!-- Needed to use components [FixedConstraint] -->

    <VisualStyle displayFlags="hideVisualModels showBehaviorModels showForceFields showCollisionModels showInteractionForceFields" />

    <OglGrid size="5" nbSubdiv="20"/>
    <OglLineAxis size="1"/>
    <OglSceneFrame/>

    <EulerImplicitSolver/>
    <CGLinearSolver iterations="3000" tolerance="1e-9" threshold="1e-9"/>

    <Node name="FixedPointNode">
        <MechanicalObject name="dof" position="0 2 0  1 2 0  2 2 0  3 2 0" showIndices="true" showIndicesScale="0.1"/>
        <FixedConstraint indices="0 1 2 3"/>
    </Node>

    <Node name="MassNode">
        <PointSetTopologyContainer name="container" position="2 1 0  0 1 0  1 1 0  3 1 0"/>
        <PointSetTopologyModifier name="modifier" />
        <MechanicalObject name="dof" showIndices="true" showIndicesScale="0.1"/>
        <UniformMass name="mass" vertexMass="10"/>
        <TopologicalChangeProcessor useDataInputs="true" pointsToRemove="0 1" timeToRemove="1.2"/>
    </Node>

    <StiffSpringForceField object1="@FixedPointNode/dof" object2="@MassNode/dof" spring="
        2 0 100 0 1
        1 2 100 0 1
        3 3 100 0 1
        0 1 100 0 1
        1 0 100 0 1
        0 2 100 0 1
        " drawMode="1" printLog="1"/>

</Node>
