<!-- Automatic Quad removing with Quad2Triangle mapping example: Element removed are define in: ./RemovingQuad2TriangleProcess.txt -->
<Node name="root" dt="0.01" showBoundingTree="0" gravity="0 -9.81 0">
    <RequiredPlugin pluginName="SofaOpenglVisual"/>
    <RequiredPlugin pluginName="SofaMiscCollision" />
    <RequiredPlugin pluginName='SofaMiscTopology'/>
    <RequiredPlugin pluginName='SofaTopologyMapping'/>
    <RequiredPlugin pluginName='SofaMiscFem'/>
    <RequiredPlugin pluginName='SofaImplicitOdeSolver'/>
    <RequiredPlugin pluginName='SofaBoundaryCondition'/>
    <RequiredPlugin pluginName='SofaGeneralDeformable'/>
    <RequiredPlugin pluginName='SofaMeshCollision'/>

    <VisualStyle displayFlags="showBehaviorModels showVisual" />
    <DefaultPipeline verbose="0" />
    <BruteForceBroadPhase/>
    <BVHNarrowPhase/>
    <DefaultContactManager response="PenalityContactForceField" />
    <MinProximityIntersection name="Proximity" alarmDistance="0.8" contactDistance="0.5" />
    <DefaultCollisionGroupManager />
    <Node name="Q">
        <EulerImplicitSolver name="cg_odesolver" printLog="false"  rayleighStiffness="0.1" rayleighMass="0.1" />
        <CGLinearSolver iterations="25" name="linear solver" tolerance="1.0e-9" threshold="1.0e-9" />
        <MeshGmshLoader name="loader" filename="mesh/nine_quads.msh" />
        <MechanicalObject src="@loader" name="Quads" />
        <QuadSetTopologyContainer name="Quad_topo" src="@loader" />
        <QuadSetTopologyModifier name="Modifier" />
        <QuadSetGeometryAlgorithms name="GeomAlgo" template="Vec3d" />
        <TopologicalChangeProcessor listening="1" filename="RemovingQuad2TriangleProcess.txt" />
        <QuadularBendingSprings name="FEM-Bend" stiffness="3000" damping="1.0" />
        <DiagonalMass massDensity="0.5" />
        <FixedConstraint indices="12 15" />
<!--         <BoxConstraint box="0 3 0 0 3 0 3 3 0 3 3 0" /> -->
        <Node name="T">
            <TriangleSetTopologyContainer name="Triangle_topo" />
            <TriangleSetTopologyModifier name="Modifier" />
            <TriangleSetGeometryAlgorithms name="GeomAlgo" template="Vec3d" />
            <Quad2TriangleTopologicalMapping input="@../Quad_topo" output="@Triangle_topo" name="mapping_topo" />
            <TriangularFEMForceField name="FEM" youngModulus="1000" poissonRatio="0.3" method="large" />
            <TriangularBendingSprings name="FEM-Bend" stiffness="3000" damping="1.0" />
            <TriangleCollisionModel />
            <Node name="Visu">
                <OglModel name="Visual" color="red" />
                <IdentityMapping input="@../../Quads" output="@Visual" />
            </Node>
        </Node>
    </Node>
</Node>
