<!-- Automatic Tetrahedron removing with Tetra2Triangle mapping example: Element removed are define in: ./RemovingTetra2TriangleProcess_performanceTest.txt -->
<Node name="root" dt="0.01" showBoundingTree="0" gravity="0 0 0">
    <VisualStyle displayFlags="showBehaviorModels showVisual" />
    <CollisionPipeline verbose="0" />
    <BruteForceDetection name="N2" />
    <CollisionResponse response="default" />
    <MinProximityIntersection name="Proximity" alarmDistance="0.8" contactDistance="0.5" />
    <InteractiveCamera name="camera" position ="-43.0916 -14.6777 18.7712" orientation ="0.150872 -0.594478 -0.286645 0.735981" fieldOfView ="45" distance ="34.729" zNear ="0" zFar ="0" projectionType ="0" minBBox="-2.11554 -0.250372 0.88082"  maxBBox="2.10716 6.97043 16.8875" widthViewport="800" heightViewport="600" zoomSpeed="250" panSpeed="0.1" pivot="0" fixedLookAt="0" activated="1" listening="0" />

    <CollisionGroup />
    <Node name="TT">
        <EulerImplicit name="cg_odesolver" printLog="false"  rayleighStiffness="0.1" rayleighMass="0.1" />
        <CGLinearSolver iterations="25" name="linear solver" tolerance="1.0e-9" threshold="1.0e-9" />
        <MeshVTKLoader name="meshLoader" filename="mesh/raptorTetra_19409.vtu" translation=" -19 -22 12" />
        <MechanicalObject name="Volume" src="@meshLoader" translation="0 0 0" />
        <TetrahedronSetTopologyContainer name="Container" tetrahedra="@meshLoader.tetrahedra" />
        <TetrahedronSetTopologyModifier name="Modifier" />
        <TetrahedronSetTopologyAlgorithms template="Vec3d" name="TopoAlgo" />
        <TetrahedronSetGeometryAlgorithms template="Vec3d" name="GeomAlgo" />
        <TopologicalChangeProcessor listening="1" filename="RemovingTetra2TriangleProcess_performanceTest.txt" />
        <DiagonalMass massDensity="0.5" />
        <FixedPlaneConstraint direction="0 0 1" dmin="-0.1" dmax="0.1" />
        <FixedConstraint indices="0" />
        <TetrahedralCorotationalFEMForceField name="FEM" youngModulus="360" poissonRatio="0.3" method="large" />
        <Node name="T">
            <include href="Objects/TriangleSetTopology.xml" />
            <Tetra2TriangleTopologicalMapping input="@../Container" output="@Container" />
            <TriangularFEMForceField name="FEM" youngModulus="60" poissonRatio="0.3" method="large" />
            <TriangularBendingSprings name="FEM-Bend" stiffness="300" damping="1.0" />
            <TrianglePressureForceField normal="0 0 1" dmin="0.9" dmax="1.1" pressure="0.4 0 0" />
            <TriangleSet />
            <Node name="Visu">
                <OglModel name="Visual" color="blue" />
                <IdentityMapping input="@../../Volume" output="@Visual" />
            </Node>
        </Node>
    </Node>
</Node>
