<?xml version="1.0" ?>
<!-- Automatic Triangle removal on a simple Triangle topology with FEM: Element removed are define in: ./RemovingTrianglesProcess.txt -->
<Node name="root" gravity="0 -9 0" dt="0.01">
    <RequiredPlugin pluginName="SofaOpenglVisual"/>
    <RequiredPlugin pluginName='SofaMiscFem'/>
    <RequiredPlugin pluginName='SofaMiscTopology'/>
    <RequiredPlugin pluginName='SofaImplicitOdeSolver'/>
    <RequiredPlugin pluginName='SofaGeneralSimpleFem'/>
    <RequiredPlugin pluginName='SofaGeneralDeformable'/>
    <RequiredPlugin pluginName='SofaBoundaryCondition'/>
    <RequiredPlugin pluginName='SofaMeshCollision'/>

    <VisualStyle displayFlags="showVisual showBehaviorModels" />
    <DefaultPipeline verbose="0" />
    <BruteForceDetection name="N2" />
    <DefaultContactManager response="default" />
    <MinProximityIntersection name="Proximity" alarmDistance="0.8" contactDistance="0.5" />
    <Node name="SquareGravity">
        <EulerImplicitSolver name="cg_odesolver" rayleighStiffness="0.1" rayleighMass="0.1" />
        <CGLinearSolver iterations="25" name="linear solver" />
        <MeshGmshLoader name="loader" filename="mesh/square3.msh" createSubelements="true" />
        <MechanicalObject name="dofs" src="@loader" template="Vec3d" />
        <TriangleSetTopologyContainer name="Triangle_topo" src="@loader"/>
        <TriangleSetTopologyModifier name="Modifier" />
        <TriangleSetGeometryAlgorithms template="Vec3d" name="GeomAlgo" />
        <DiagonalMass template="Vec3d,double" name="mass" massDensity="1.0" />
        <!--<BoxROI template="Vec3d" name="box_roi" box="0 0 0 0.5 1 0.5" indices="0" drawSize="0" drawBoxes="1" />-->
        <FixedConstraint template="Vec3d" name="fix" indices="0 1 2 3 4 5 6 7 8 9 10 11 12 13 14 15 16 17 18 19 20 21 22 23 24 25 26 27 28 29 30" />
        <TriangularFEMForceField template="Vec3d" name="FEM" method="large" poissonRatio="0.3" youngModulus="60" />
        <TriangularBendingSprings template="Vec3d" name="FEM-Bend" stiffness="300" damping="1" />
        <TriangleCollisionModel name="CollisionModel" />
        <Node name="Visu">
            <OglModel template="Vec3d" name="Visual" color="red" />
            <IdentityMapping template="Vec3d,Vec3d" input="@.." output="@Visual" />
        </Node>

        <TopologicalChangeProcessor listening="1" filename="RemovingTrianglesProcess.txt" />
    </Node>
</Node>
