<Node name="root" dt="0.01" gravity="0 0 -10" showBoundingTree="0">

	<RequiredPlugin pluginName='SofaImplicitOdeSolver'/>
	<RequiredPlugin pluginName='SofaLoader'/>
	<RequiredPlugin pluginName='SofaMeshCollision'/>
	<RequiredPlugin pluginName='SofaMiscCollision'/>
	<RequiredPlugin pluginName='SofaOpenglVisual'/>
	<RequiredPlugin pluginName='SofaRigid'/>

    <DefaultPipeline verbose="0" />
    <BruteForceDetection name="N2" />
    <DefaultContactManager response="default" />
    <MinProximityIntersection name="Proximity" alarmDistance="0.02" contactDistance="0.02" />
    <DefaultCollisionGroupManager />
    <ClipPlane name="Clip" normal="1 0 0" />
    <include href="Objects/SaladBowl.xml" />
    <include href="Objects/TorusRigid.xml" scale="0.05" rx="30" ry="15" dz="1" />
</Node>
