<?xml version="1.0"?>
<Node name="root" dt="0.02">

    <VisualStyle displayFlags="showVisual" />

     <MechanicalObject  template="Vec3d" position="0 0 0   10 0 0 " name="dofs" />
     <MeshTopology src="@dofs" edges="0 1" />
     <OglCylinderModel  />

     </Node>
