<Node name="root" dt="0.01">
    <RequiredPlugin name="SofaOpenglVisual"/>
    <MeshObjLoader name="meshLoader_0" filename="mesh/liver-smooth.obj" handleSeams="1" />
    <OglModel name="VisualModel" src="@meshLoader_0" color="red" />
    <OglGrid name="grid"/>
    <OglLineAxis size="@grid.size"/>
</Node>
