<Node name="root" dt="0.01">
    <RequiredPlugin name="SofaOpenglVisual"/>
    <MeshObjLoader name="meshLoader_0" filename="mesh/liver-smooth.obj" handleSeams="1" />
    <OglModel name="VisualModel" src="@meshLoader_0" color="red" />
    <!-- <OglSceneFrame style="0"/> -->
    <OglSceneFrame style="1"/>
    <!-- <OglSceneFrame style="2"/> -->
</Node>
