<Node name="root" dt="0.01" gravity="0 0 -10" showBoundingTree="0">
    <RequiredPlugin pluginName='SofaImplicitOdeSolver'/>
    <RequiredPlugin pluginName='SofaLoader'/>
    <RequiredPlugin pluginName='SofaMeshCollision'/>
    <RequiredPlugin pluginName='SofaMiscCollision'/>
    <RequiredPlugin pluginName='SofaOpenglVisual'/>
    <RequiredPlugin pluginName='SofaRigid'/>
    <DefaultPipeline verbose="0" />
    <BruteForceDetection name="N2" />
    <DefaultContactManager response="default" />
    <MinProximityIntersection name="Proximity" alarmDistance="0.02" contactDistance="0.02" />
    <DefaultCollisionGroupManager />
    <LightManager />
    <PositionalLight name="light1" color="1 0 0" attenuation="0.4" position="0.5 0.7 2" />
    <PositionalLight name="light2" color="0 1 0" attenuation="0.4" position="0.5 -0.7 2" />
    <PositionalLight name="light3" color="0 0 1" attenuation="0.4" position="-0.8 0 2" />
    <include href="Objects/SaladBowl.xml" />
    <include href="Objects/TorusRigid.xml" scale="0.05" rx="30" ry="15" dz="0.5" />
</Node>
