<Node name="root" dt="0.01" gravity="0 0 -10" showBoundingTree="0">
    <RequiredPlugin name="Sofa.Component.IO.Mesh"/> <!-- Needed to use components [MeshOBJLoader] -->
    <RequiredPlugin name="Sofa.Component.LinearSolver.Iterative"/> <!-- Needed to use components [CGLinearSolver] -->
    <RequiredPlugin name="Sofa.Component.Mapping.NonLinear"/> <!-- Needed to use components [RigidMapping] -->
    <RequiredPlugin name="Sofa.Component.Mass"/> <!-- Needed to use components [UniformMass] -->
    <RequiredPlugin name="Sofa.Component.ODESolver.Backward"/> <!-- Needed to use components [EulerImplicitSolver] -->
    <RequiredPlugin name="Sofa.Component.StateContainer"/> <!-- Needed to use components [MechanicalObject] -->
    <RequiredPlugin name="Sofa.Component.Topology.Container.Constant"/> <!-- Needed to use components [MeshTopology] -->
    <RequiredPlugin name="Sofa.GL.Component.Rendering3D"/> <!-- Needed to use components [OglModel] -->
    <RequiredPlugin name="SofaMiscCollision"/> <!-- Needed to use components [DefaultCollisionGroupManager] -->

    <DefaultPipeline verbose="0" />
    <BruteForceBroadPhase/>
    <BVHNarrowPhase/>
    <DefaultContactManager response="PenalityContactForceField" />
    <MinProximityIntersection name="Proximity" alarmDistance="0.02" contactDistance="0.02" />
    <DefaultCollisionGroupManager />
    <LightManager />
    <SpotLight name="light1" color="1 0 0" position="0.5 0.7 2" cutoff="25" exponent="1" drawSource="false" />
    <SpotLight name="light2" color="0 1 0" position="0.5 -0.7 2" cutoff="25" exponent="1"  drawSource="false"/>
    <SpotLight name="light3" color="0 0 1" position="-0.8 0 2" cutoff="25" exponent="1"  drawSource="false"/>
    <SpotLight name="light4" color="1 1 1" position="0 0 2" cutoff="10" exponent="1000" drawSource="false" />
    <include href="Objects/SaladBowl.xml" />
    <include href="Objects/TorusRigid.xml" scale="0.05" rx="30" ry="15" dz="1" />
</Node>
