<?xml version="1.0" ?>
<Node name="root" >
    <RequiredPlugin name="SofaOpenglVisual"/>
	<VisualStyle displayFlags="showVisualModels"/>
        <Visual3DText text="hello world!" position="1 1 1" color="red" scale="2" depthTest="false"/>

        <OglModel fileMesh="mesh/dragon.obj"/>
</Node>
