<?xml version="1.0" ?>
<Node name="lroot" gravity="0 -9.81 0" dt="0.02">
    <RequiredPlugin name="Sofa.Component.Constraint.Projective"/> <!-- Needed to use components [FixedConstraint] -->
    <RequiredPlugin name="Sofa.Component.LinearSolver.Iterative"/> <!-- Needed to use components [CGLinearSolver] -->
    <RequiredPlugin name="Sofa.Component.Mapping.Linear"/> <!-- Needed to use components [BarycentricMapping] -->
    <RequiredPlugin name="Sofa.Component.Mass"/> <!-- Needed to use components [DiagonalMass] -->
    <RequiredPlugin name="Sofa.Component.ODESolver.Backward"/> <!-- Needed to use components [EulerImplicitSolver] -->
    <RequiredPlugin name="Sofa.Component.SolidMechanics.FEM.Elastic"/> <!-- Needed to use components [TetrahedralCorotationalFEMForceField] -->
    <RequiredPlugin name="Sofa.Component.StateContainer"/> <!-- Needed to use components [MechanicalObject] -->
    <RequiredPlugin name="Sofa.GL.Component.Rendering3D"/> <!-- Needed to use components [OglModel] -->

	<DefaultPipeline name="CollisionPipeline" verbose="0" />
    <BruteForceBroadPhase/>
    <BVHNarrowPhase/>
    <DefaultContactManager name="collision response" response="PenalityContactForceField" />
    <DiscreteIntersection/>

    <MeshOBJLoader name="LiverSurface" filename="mesh/liver-smooth.obj" />

    <Node name="Liver" gravity="0 -9.81 0">
        <EulerImplicitSolver name="cg_odesolver"   rayleighStiffness="0.1" rayleighMass="0.1" />
        <CGLinearSolver name="linear solver" iterations="25" tolerance="1e-09" threshold="1e-09" />
        <MeshGmshLoader name="meshLoader" filename="mesh/liver.msh" />
        <TetrahedronSetTopologyContainer name="topo" src="@meshLoader" />
        <MechanicalObject name="dofs" src="@meshLoader" />
        <TetrahedronSetGeometryAlgorithms template="Vec3d" name="GeomAlgo" />
        <DiagonalMass  name="computed using mass density" massDensity="1" />
        <TetrahedralCorotationalFEMForceField template="Vec3d" name="FEM" method="large" poissonRatio="0.3" youngModulus="3000" computeGlobalMatrix="0" />
        <FixedConstraint  name="FixedConstraint" indices="3 39 64" />
        <Node name="Visu" tags="Visual" gravity="0 -9.81 0">
            <OglModel  name="VisualModel" src="@../../LiverSurface" />
            <BarycentricMapping name="visual mapping" input="@../dofs" output="@VisualModel" />
        </Node>
        <Node name="Surf" gravity="0 -9.81 0">
            <SphereLoader filename="mesh/liver.sph" />
            <MechanicalObject name="spheres" position="@[-1].position" />
            <SphereCollisionModel name="CollisionModel" listRadius="@[-2].listRadius"/>
            <BarycentricMapping name="sphere mapping" input="@../dofs" output="@spheres" />
        </Node>
    </Node>
</Node>
