<Node name="root" gravity="0.0 -2.0 0.0" dt="0.04" showBehaviorModels="0" showCollisionModels="0" showMappings="0" showForceFields="0">

	<Node name="Floor">
		<RegularGrid nx="2" ny="1" nz="2" xmin="20" xmax="-20" ymin="-3.05" ymax="-3.05" zmin="-20" zmax="20" />
		<MechanicalObject />

		<Node name="Visu">
			<OglModel name="Visual" color="red"/>
			<IdentityMapping object1="../.." object2="Visual"/>
		</Node>
	</Node>

	<Node name="SquareCloth1">
		<EulerImplicit rayleighMass="0.05"/>
		<CGLinearSolver iterations="10" threshold="0.000001"/>

		<MechanicalObject template="OpenCLVec3f" />
		<!-- <WriteState filename="spereCUDA.state" /> -->

		<UniformMass totalmass="100" />

		<RegularGrid nx="100" ny="1" nz="100" xmin="12" xmax="-12" ymin="7" ymax="7" zmin="-12" zmax="12" />

		<BoxConstraint box="-12 7 12 -10 7 12    10 7 12 12 7 12"/>

		<MeshSpringForceField name="Springs" stiffness="1000" damping="0"/>

		<QuadBendingSprings name="Bend" stiffness="2000" damping="1"/>
		<SphereForceField stiffness="1000" damping="1" center="0 1 3" radius="4" />
		<PlaneForceField stiffness="1000" damping="20" normal="0 1 0" d="-3" />

		<Node name="Visu">
			<OglModel name="Visual" color="green"/>
			<IdentityMapping object1="../.." object2="Visual"/>
		</Node>
	</Node>

	<Node name="Sphere">
		<OglModel name="Visual" fileMesh="mesh/sphere.obj" scale="3.95" dx="0" dy="1" dz="3" color="blue"/>
	</Node>
</Node>
