<Node name="InstrumentEdgeSet">
    <EulerImplicit rayleighStiffness="0" printLog="false"  rayleighMass="0.1" />
    <BTDLinearSolver template="BTDMatrix6d" printLog="false" verbose="false"/>

    <MechanicalObject name="MechanicalDOFs" template="Rigid" scale="1"  dx="0" dy="0" dz="0" rx="0" ry="0" rz="0" position="0 0 0 0 0 0 1  1 0 0 0 0 0 1  2 0 0 0 0 0 1"/>

    <EdgeSetTopologyContainer  name="Container" position="0 0 0  1 0 0  2 0 0" edges="0 1  1 2" />
    <EdgeSetTopologyModifier   name="Modifier" />
    <EdgeSetTopologyAlgorithms name="TopoAlgo"   template="Rigid" />
    <EdgeSetGeometryAlgorithms name="GeomAlgo"   template="Rigid" />

    <MechanicalStateController template="Rigid" listening="true" mainDirection="-1.0 0.0 0.0" handleEventTriggersUpdate="true"/>
    <EdgeSetController template="Rigid" listening="true" mainDirection="-1.0 0.0 0.0" speed="-1"/>

    <FixedConstraint name="FixedConstraint" indices="0" />
    <UniformMass vertexMass="1 1 0.01 0 0 0 0.1 0 0 0 0.1" printLog="false" />
    <BeamFEMForceField name="FEM" radius="0.1" youngModulus="50000000" />

    <Node name="CM">
        <MechanicalObject name="CollisionDOFs" template="Vec3d" size="3"/>
        <LineSet />
        <PointSet />
        <IdentityMapping/>
    </Node>

    <Node name="VM">
        <MechanicalObject name="TubularDOFs" />
        <include href="Objects/QuadSetTopology.xml"/>
        <Edge2QuadTopologicalMapping name="TopoMapping" nbPointsOnEachCircle="10" radius="0.3" input="@../Container" output="@Container"/>
        <TubularMapping name="TubularMapping"  nbPointsOnEachCircle="10" radius="0.3" input="@../MechanicalDOFs" output="@TubularDOFs" />

        <Node name="Visu">
            <OglModel name="Visual" color="1.0 0.0 0.0 1.0" />
            <IdentityMapping input="@../TubularDOFs" output="@Visual" />
        </Node>
    </Node>

</Node>
