<Node name="FEM" processor="0">
	<EulerImplicitSolver rayleighStiffness="0.01"  rayleighMass="0.1" />
	<ParallelCGLinearSolver iterations="25" threshold="0.00000001"  />

	<SparseGridTopology name="sparse" n="6 6 6" filename="file"/>
	<MechanicalObject dx="0" dy="0" dz="0" rx="0" ry="0" rz="0" scale="1.0" template="CudaVec3f"/>
	<UniformMass totalmass="5" />
	<TetrahedronFEMForceField name="FEM" youngModulus="5000" poissonRatio="0.3"  method="large"/>

	<Node name="VisualNode">
    <MeshLoader name="loader"  filename="file" />
    <MeshTopology src="@loader"/>
    <MappedObject name="Mapped" template="CudaVec3f" />
		<CudaVisualModel computeNormals="true"   template="CudaVec3f"   name="Visual"   diffuse="0.8 0.8 0.8 1.0"    />
		<BarycentricMapping   input="@.." output="@Mapped" />
	</Node>

	<Node name="CollisionNode">
	  <SparseGridTopology name="sparse" n="6 6 6" filename="file"/>
		<MechanicalObject   />
		<SphereCollisionModel />
		<BarycentricMapping />
	</Node>
</Node>
