<Node name="FEM">
	<ParrallelCGImplicit rayleighStiffness="0.01" iterations="25" threshold="0.00000001"  />
	<MeshLoader name="loader" filename="file"/>
	<Mesh src="@loader"/>
	<MechanicalObject src="@loader" translation="0 0 0" rotation="0 0 0" scale3d="1.0 1.0 1.0"/>
	<UniformMass totalmass="1" />
	<TetrahedronFEMForceField name="FEM" youngModulus="1000" poissonRatio="0.3"  method="polar"/>
	<Node name="VisualNode">
		<OglModel name="Visual" filename="file" color="red"/>
		<BarycentricMapping input="@.." output="@Visual" />
	</Node>
	<Node name="CollisionNode">
    <MeshLoader name="loader"  filename="file"/>
		<Mesh src="@loader"/>
		<MechanicalObject src="@loader" useMask="true"/>
		<TriangleCollisionModel />
		<BarycentricMapping />
	</Node>
</Node>
