<Node name="MeshSpring">
	<EulerImplicitSolver rayleighStiffness="0.01"  rayleighMass="0.1" />
	<ParallelCGLinearSolver iterations="25" threshold="0.00000001" />
	<MeshLoader name="loader" filename="file"/>
	<Mesh src="@loader"/>
	<MechanicalObject src="@loader" translation="0 0 0" rotation="0 0 0" scale3d="1.0 1.0 1.0"/>
	<UniformMass totalmass="1" />
	<MeshSpringForceField name="Springs" stiffness="400" damping="4"/>
	<Node name="VisualNode">
		<OglModel name="Visual" filename="file"  color="green"   translation="0 0 0" rotation="0 0 0" scale3d="1.0 1.0 1.0"/>
		<BarycentricMapping input="@.." output="@Visual" />
	</Node>
	<Node name="CollisionNode">
    <MeshLoader name="loader"  filename="file"/>
		<Mesh src="@loader"/>
		<MechanicalObject src="@loader" useMask="true"  translation="0 0 0" rotation="0 0 0" scale3d="1.0 1.0 1.0"/>
		<TriangleCollisionModel />
		<LineCollisionModel />
		<PointCollisionModel />
		<BarycentricMapping />
	</Node>
</Node>
