<Node name="TorusFEM" processor="0">
    <RequiredPlugin name="SofaGeneralMeshCollision"/>

	<EulerImplicitSolver rayleighStiffness="0.1" rayleighMass="0" />
  <ParallelCGLinearSolver iterations="25" threshold="0.000000000001" tolerance="0.000001" />
	<MeshObjLoader name="meshLoader" filename="mesh/torus_low_res.msh"/>
	<MeshTopology src="@meshLoader" />
	<MechanicalObject dx="0" dy="0" dz="0" rx="0" ry="0" rz="0" scale="1.0" />
	<UniformMass totalmass="5" />
	<TetrahedronFEMForceField name="FEM" youngModulus="1000" poissonRatio="0.3" computeGlobalMatrix="false" method="polar"/>
	<Node name="Visu">
		<OglModel name="Visual" fileMesh="mesh/torus.obj" color="red" dx="0" dy="0" dz="0" rx="0" ry="0" rz="0" scale="1.0"/>
		<BarycentricMapping input="@.." output="@Visual" />
	</Node>
	<Node name="Surf2">
		<MeshObjLoader name="loader" filename="mesh/torus_for_collision.obj"/>
		<MeshTopology src="@loader" />
		<MechanicalObject src="@loader" dx="0" dy="0" dz="0" rx="0" ry="0" rz="0" scale="1.0"/>
		<TriangleOctree />
		<BarycentricMapping />
	</Node>
</Node>
