<Node name="TorusFFD" processor="0">
	<EulerImplicitSolver rayleighStiffness="0.1" rayleighMass="0" />
  <ParallelCGLinearSolver iterations="25" threshold="0.000000000001" tolerance="0.000001" />
	<RegularGrid
			nx="6" ny="2" nz="5"
			xmin="-2.5" xmax="2.5"
			ymin="-0.5" ymax="0.5"
			zmin="-2" zmax="2"
		/>
	<MechanicalObject dx="0" dy="0" dz="0" rx="0" ry="0" rz="0" scale="1.0" />
	<UniformMass totalMass="5" />
	<RegularGridSpringForceField name="Springs" stiffness="200" damping="2" />
	<Node name="Visu">
		<OglModel name="Visual" fileMesh="mesh/torus.obj" color="yellow"  dx="0" dy="0" dz="0" scale="1.0"/>
		<BarycentricMapping input="@.." output="@Visual" />
	</Node>
	<Node name="Surf2">
    <MeshObjLoader name="collisionLoader" filename="mesh/torus_for_collision.obj"/>
		<MeshTopology src="@collisionLoader" />
		<MechanicalObject dx="0" dy="0" dz="0" scale="1.0"/>
		<TriangleCollisionModel />
		<LineCollisionModel />
		<PointCollisionModel />
		<BarycentricMapping />
	</Node>
</Node>
