<Node name="TorusRigid" processor="0">
	<EulerImplicitSolver rayleighStiffness="0.1" rayleighMass="0" />
  <ParallelCGLinearSolver iterations="25" threshold="0.000000000001" tolerance="0.000001" />
	<MechanicalObject template="Rigid3d"  dx="0" dy="0" dz="0" rx="0" ry="0" rz="0" scale="1.0"  />
	<UniformMass />
	<Node name="Visu">
		<OglModel name="Visual" fileMesh="mesh/torus.obj" color="gray" scale="1.0"/>
		<RigidMapping input="@.." output="@Visual" />
	</Node>
	<Node name="Surf2">
		<MeshObjLoader name="meshLoader" filename="mesh/torus_for_collision.obj"/>
		<MeshTopology src="@meshLoader"/>
		<MechanicalObject scale="1.0" />
		<TriangleCollisionModel />
		<LineCollisionModel />
		<PointCollisionModel />
		<RigidMapping />
	</Node>
</Node>
