<Node name="TorusSpring" processor="0">
	<EulerImplicitSolver rayleighStiffness="0.1" rayleighMass="0" />
  <ParallelCGLinearSolver iterations="25" threshold="0.000000000001" tolerance="0.000001" />
	<MeshGmshLoader name="meshLoader" filename="mesh/torus_low_res.msh"/>
	<Mesh src="@meshLoader" />
	<MechanicalObject  dx="0" dy="0" dz="0" rx="0" ry="0" rz="0" scale="1.0"/>
	<UniformMass totalmass="5" />
	<MeshSpringForceField name="Springs" tetrasStiffness="400" tetrasDamping="4"/>
	<Node name="Visu">
		<OglModel name="Visual" fileMesh="mesh/torus.obj"  color="green"  dx="0" dy="0" dz="0" rx="0" ry="0" rz="0" scale="1.0"/>
		<BarycentricMapping object1="../.." object2="Visual" />
	</Node>
	<Node name="Surf2">
	  <MeshObjLoader name="loader" filename="mesh/torus_for_collision.obj"/>
		<Mesh src="@loader"src="@meshLoader" />
		<MechanicalObject src="@loader" dx="0" dy="0" dz="0" rx="0" ry="0" rz="0" scale="1.0" />
		<Triangle />
		<BarycentricMapping />
	</Node>
</Node>
