<Node 	name="root" gravity="0 0 0" dt="0.005" showBehaviorModels="1"
	showCollisionModels="0" showMappings="0" showForceFields="0" showWireFrame="0"  >
	<DefaultPipeline name="DefaultCollisionPipeline"  verbose="0"  draw="0"  depth="6" />
	<BruteForceDetection name="Detection" />
	<MinProximityIntersection name="Proximity"  alarmDistance="3"  contactDistance="2" />
	<DefaultContactManager name="Response"  response="default" />
	<Node 	name="SquareGravity" gravity="0 -9.81 0"  >
	  <EulerImplicitSolver name="cg_odesolver"/>
	  <CGLinearSolver iterations="100"/>
	  <MeshGmshLoader name="meshLoader"  filename="mesh/truthcylinder1.msh"/>

	  <SubsetTopology template="Vec3d" box="-5 -20 -5 5 -10 5"
		  drawROI="1" src="@meshLoader" rest_position="@meshLoader.position"
		  name="Subset" localIndices="1"/>

		<Node name="in">
		  <MechanicalObject template="Vec3d" name="mecaObj1" position="@../Subset.pointsInROI" />
		  <TetrahedronSetTopologyContainer name="Container"
						   position="@mecaObj1.position" tetrahedra="@../Subset.tetrahedraInROI"/>

		  <TetrahedronSetTopologyModifier name="Modifier" />
		  <TetrahedronSetTopologyAlgorithms template="Vec3d" name="TopoAlgo" />
		  <TetrahedronSetGeometryAlgorithms template="Vec3d" name="GeomAlgo" drawTetrahedra="0"/>

		  <UniformMass totalmass="15" />
		  <TetrahedronFEMForceField name="FEM" youngModulus="1116"
  					    poissonRatio="0.49"  />
		  <TriangleModel template="Vec3d" name="default7" />

                  <Node>
		    <TriangleSetTopologyContainer name="ContainerTri"/>
		    <TriangleSetTopologyModifier name="Modifier"/>
		    <TriangleSetTopologyAlgorithms template="Vec3d" name="TopoAlgo"/>
		    <TriangleSetGeometryAlgorithms template="Vec3d" name="GeomAlgo"/>
		    <Tetra2TriangleTopologicalMapping name="Mapping" object1="../../Container" object2="ContainerTri" />

		    <OglModel name="Visual"  color="red" dx="60" />
		    <IdentityMapping object1=".." object2="Visual" />
		  </Node>
		</Node>


		<Node name="Out">
		  <MechanicalObject template="Vec3d" name="mecaObj2" position="@../Subset.pointsOutROI" />
		  <SparseGridTopology	n="5 10 5" 		  vertices="@mecaObj2.position"
		   name="name" drawHexahedra="1"/>
		  <UniformMass totalmass="15" />
		  <TetrahedronFEMForceField name="FEM" youngModulus="110"
  			  poissonRatio="0.49"  />

		  <Node name="grid">

		    <TetrahedronSetTopologyContainer name="Container"
						   position="@../mecaObj2.position" tetrahedra="@../../Subset.tetrahedraOutROI"/>

		    <TetrahedronSetTopologyModifier name="Modifier" />
		    <TetrahedronSetTopologyAlgorithms template="Vec3d" name="TopoAlgo" />
		    <TetrahedronSetGeometryAlgorithms template="Vec3d" name="GeomAlgo"
						      drawTetrahedra="0"/>

		    <MechanicalObject name="collisionVertices"/>
		    <BarycentricMapping object1="../.." object2=".."/>


		    <TriangleModel template="Vec3d" name="default7" />
		  </Node>
                  <Node>
		    <TriangleSetTopologyContainer name="ContainerTri"/>
		    <TriangleSetTopologyModifier name="Modifier"/>
		    <TriangleSetTopologyAlgorithms template="Vec3d" name="TopoAlgo"/>
		    <TriangleSetGeometryAlgorithms template="Vec3d" name="GeomAlgo"/>
		    <Tetra2TriangleTopologicalMapping name="Mapping" object1="../../grid/Container" object2="ContainerTri" />

		    <OglModel name="Visual"  color="blue" dx="60" />
		    <IdentityMapping object1=".." object2="Visual" />
		  </Node>


		</Node>


		<StiffSpringForceField name="Spring" object1="../in/mecaObj1"
		object2="../Out/mecaObj2" tags="extraSpring"
				       spring="0 0 10000 0 0
					       1 1 10000 0 0
					       2 2 10000 0 0
					       3 3 10000 0 0
					       4 4 10000 0 0
					       5 5 10000 0 0
					       6 6 10000 0 0
					       7 7 10000 0 0
					       8 8 10000 0 0
					       9 9 10000 0 0
					       10 10 10000 0 0
					       11 11 10000 0 0
					       12 12 10000 0 0
					       13 13 10000 0 0
					       14 14 10000 0 0
					       15 15 10000 0 0
					       16 16 10000 0 0
					       17 17 10000 0 0
					       18 18 10000 0 0
					       19 19 10000 0 0
					       20 20 10000 0 0
					       21 21 10000 0 0
					       22 22 10000 0 0"

/>
	</Node>

</Node>
