<?xml version="1.0" ?>
<!-- See http://wiki.sofa-framework.org/mediawiki/TutorialBasicCube -->
<Node name="root" dt="0.01" gravity="0 0 -9.81" showBehavior="1">

  <EulerImplicitSolver name="EulerImplicit" />
  <CGLinearSolver name="CG Solver" />

  <MechanicalObject name="Particles" template="Vec3d"
		    position="0 0 1  1 0 1  0 1 1  1 1 1  0 0 2  1 0 2  0 1 2  1 1 2" />
  <MeshTopology name="Topology" hexas="0 4 6 2 1 5 7 3" />

  <UniformMass name="Mass" totalmass="1" />
  <MeshSpringForceField name="Springs" stiffness="100" damping="1" />

  <PlaneForceField name="Floor" normal="0 0.2 1" stiffness="100" damping="1" draw="1" />
  <PlaneForceField name="Wall" normal="0 -1 0" d="-4" stiffness="100" damping="1" draw="1" color="1 1 1" />

  <Node name="Dragon" >

    <Object type="OglModel" name="DragonParticles" fileMesh="mesh/dragon.obj" scale="0.2" dz="1.5"/>

    <Object type="BarycentricMapping" object1="../../Particles" object2="DragonParticles"/>

  </Node>

</Node>
