<!-- Mechanical MassSpring Group Basic Example -->
<Node name="root" dt="0.005">
    <VisualStyle displayFlags="showBehaviorModels showForceFields showCollisionModels showMappings" />
    <Node name="Poutre1">
        <EulerImplicit />
        <CGLinearSolver />
        <Node name="M1">
            <MechanicalObject filename="BehaviorModels/smCube27.xs3" />
            <DiagonalMass filename="BehaviorModels/smCube27.xs3" />
            <StiffSpringForceField name="Springs" filename="BehaviorModels/smCube27.xs3" />
            <FixedConstraint indices="0 3 6 9 12 15 18 21 24" />
        </Node>
        <Node name="M2">
            <MechanicalObject filename="BehaviorModels/smCube27.xs3" dz="10.5" />
            <DiagonalMass filename="BehaviorModels/smCube27.xs3" />
            <StiffSpringForceField name="Springs" filename="BehaviorModels/smCube27.xs3" />
        </Node>
        <Node name="M3">
            <MechanicalObject filename="BehaviorModels/smCube27.xs3" dz="21" />
            <DiagonalMass filename="BehaviorModels/smCube27.xs3" />
            <StiffSpringForceField name="Springs" filename="BehaviorModels/smCube27.xs3" />
        </Node>
        <Node name="M4">
            <MechanicalObject filename="BehaviorModels/smCube27.xs3" dz="31.5" />
            <DiagonalMass filename="BehaviorModels/smCube27.xs3" />
            <StiffSpringForceField name="Springs" filename="BehaviorModels/smCube27.xs3" />
        </Node>
        <Node name="M5">
            <MechanicalObject filename="BehaviorModels/smCube27.xs3" dz="42" />
            <DiagonalMass filename="BehaviorModels/smCube27.xs3" />
            <StiffSpringForceField name="Springs" filename="BehaviorModels/smCube27.xs3" />
        </Node>
        <StiffSpringForceField name="ExternalSprings1" filename="BehaviorModels/linkSmCube27.xs3" object1="M1" object2="M2" />
        <StiffSpringForceField name="ExternalSprings2" filename="BehaviorModels/linkSmCube27.xs3" object1="M2" object2="M3" />
        <StiffSpringForceField name="ExternalSprings3" filename="BehaviorModels/linkSmCube27.xs3" object1="M3" object2="M4" />
        <StiffSpringForceField name="ExternalSprings4" filename="BehaviorModels/linkSmCube27.xs3" object1="M4" object2="M5" />
    </Node>
</Node>
