<Node name="root" dt="0.005">
    <RequiredPlugin name="SofaOpenglVisual"/>
    <VisualStyle displayFlags="showForceFields" />
    <DefaultPipeline verbose="0" draw="1" />
    <BruteForceDetection name="N2" />
    <MinProximityIntersection name="Proximity" alarmDistance="1.0" contactDistance="0.75" />
    <DefaultContactManager name="Response" response="default" />
    <DefaultCollisionGroupManager name="Group" />
    <Node name="M1">
        <EulerImplicitSolver  rayleighStiffness="0.1" rayleighMass="0.1" />
        <CGLinearSolver iterations="100" threshold="0.000001" tolerance="1e-5"/>
        <MechanicalObject dx="0" dy="-10.5" dz="0" />
        <UniformMass vertexMass="0.05" />
        <RegularGridTopology nx="3" ny="3" nz="3" xmin="-3.5" xmax="3.5" ymin="-3.5" ymax="3.5" zmin="-3.5" zmax="3.5" />
        <RegularGridSpringForceField name="Springs" stiffness="800" damping="8" />
        <Node name="Visu">
            <OglModel name="Visual" filename="mesh/smCube27.obj" color="yellow"/>
            <BarycentricMapping input="@.." output="@Visual" />
        </Node>
        <Node name="Surf">
            <MeshObjLoader filename="mesh/smCube27.obj" name="loader" />
            <MeshTopology src="@loader" />
            <MechanicalObject src="@loader"/>
            <TriangleCollisionModel />
            <LineCollisionModel />
            <PointCollisionModel />
            <BarycentricMapping />
        </Node>
    </Node>
    <Node name="M2">
        <EulerImplicitSolver />
        <CGLinearSolver iterations="100" threshold="0.000001" tolerance="1e-5"/>
        <MechanicalObject dx="2" dy="0" dz="0" />
        <UniformMass vertexMass="0.05" />
        <RegularGridTopology nx="4" ny="4" nz="4" xmin="-3.5" xmax="3.5" ymin="-3.5" ymax="3.5" zmin="-3.5" zmax="3.5" />
        <RegularGridSpringForceField name="Springs" stiffness="560" damping="5.6" />
        <Node name="Visu">
            <OglModel name="Visual" filename="mesh/smCube27.obj" color="#ff8000"/>
            <BarycentricMapping input="@.." output="@Visual" />
        </Node>
        <Node name="Surf">
            <MeshObjLoader filename="mesh/smCube27.obj" name="loader" />
            <MeshTopology src="@loader" />
            <MechanicalObject src="@loader"/>
            <TriangleCollisionModel />
            <LineCollisionModel />
            <PointCollisionModel />
            <BarycentricMapping />
        </Node>
    </Node>
    <Node name="M3">
        <EulerImplicitSolver />
        <CGLinearSolver iterations="100" threshold="0.000001" tolerance="1e-5"/>
        <MechanicalObject dx="0" dy="10.5" dz="-4" />
        <UniformMass vertexMass="0.05" />
        <RegularGridTopology nx="5" ny="5" nz="5" xmin="-3.5" xmax="3.5" ymin="-3.5" ymax="3.5" zmin="-3.5" zmax="3.5" />
        <RegularGridSpringForceField name="Springs" stiffness="400" damping="4" />
        <Node name="Visu">
            <OglModel name="Visual" filename="mesh/smCube27.obj" color="red"/>
            <BarycentricMapping input="@.." output="@Visual" />
        </Node>
        <Node name="Surf">
            <MeshObjLoader filename="mesh/smCube27.obj" name="loader" />
            <MeshTopology src="@loader" />
            <MechanicalObject src="@loader"/>
            <TriangleCollisionModel />
            <LineCollisionModel />
            <PointCollisionModel />
            <BarycentricMapping />
        </Node>
    </Node>
    <Node name="M4">
        <EulerImplicitSolver />
        <CGLinearSolver iterations="100" threshold="0.000001" tolerance="1e-5"/>
        <MechanicalObject dx="0" dy="21" dz="0" />
        <UniformMass vertexMass="0.05" />
        <RegularGridTopology nx="6" ny="6" nz="6" xmin="-3.5" xmax="3.5" ymin="-3.5" ymax="3.5" zmin="-3.5" zmax="3.5" />
        <RegularGridSpringForceField name="Springs" stiffness="400" damping="4" />
        <Node name="Visu">
            <OglModel name="Visual" filename="mesh/smCube27.obj" color="#801080"/>
            <BarycentricMapping input="@.." output="@Visual" />
        </Node>
        <Node name="Surf">
            <MeshObjLoader filename="mesh/smCube27.obj" name="loader" />
            <MeshTopology src="@loader" />
            <MechanicalObject src="@loader"/>
            <TriangleCollisionModel />
            <LineCollisionModel />
            <PointCollisionModel />
            <BarycentricMapping />
        </Node>
    </Node>
    <!--
	<Node name="M5">
		<EulerImplicitSolver />
		<CGLinearSolver iterations="100" threshold="0.000001" tolerance="1e-5"/>
		<MechanicalObject dx="-4" dy="31.5" dz="-4"/>
		<UniformMass mass="0.05"/>
		<RegularGridTopology
			nx="7" ny="7" nz="7"
			xmin="-3.5" xmax="3.5"
			ymin="-3.5" ymax="3.5"
			zmin="-3.5" zmax="3.5"
			/>
		<RegularGridSpringForceField name="Springs" stiffness="400" damping="4" />
		<Node name="Visu">
			<OglModel name="Visual" filename="mesh/smCube27.obj" color="cyan" />
			<BarycentricMapping input="@.." output="@Visual" />
		</Node>
		<Node name="Surf">
			<MeshObjLoader filename="mesh/smCube27.obj"  name="loader"/>
			<MeshTopology src="@loader" />
			<MechanicalObject src="@loader" />
			<TriangleCollisionModel />
			<LineCollisionModel />
			<PointCollisionModel />
			<BarycentricMapping />
		</Node>
	</Node>
	-->
    <Node name="Floor">
        <MeshObjLoader filename="mesh/floor3.obj" name="loader" />
        <MeshTopology src="@loader" />
        <MechanicalObject src="@loader" dy="-20" />
        <TriangleCollisionModel name="Floor" simulated="0" moving="0" />
        <LineCollisionModel name="Floor" simulated="0" moving="0" />
        <PointCollisionModel name="Floor" simulated="0" moving="0" />
        <OglModel name="FloorV" filename="mesh/floor3.obj" texturename="textures/floor.bmp" dy="-20" />
    </Node>
</Node>
