<!-- Hierarchical Group Basic Test -->
<Node name="root" dt="0.01">
    <RequiredPlugin name="SofaOpenglVisual"/>
    <VisualStyle displayFlags="showForceFields" />
    <DefaultPipeline verbose="0" draw="0" />
    <BruteForceBroadPhase/>
    <BVHNarrowPhase/>
    <MinProximityIntersection name="Proximity" alarmDistance="1.0" contactDistance="0.5" />
    <DefaultContactManager name="Response" response="default" />
    <MeshGmshLoader name="meshLoader" filename="mesh/smCube27.msh" />
    <Node name="M1">
        <EulerImplicitSolver  rayleighStiffness="0.1" rayleighMass="0.1" />
        <CGLinearSolver iterations="100" tolerance="1e-5" threshold="1e-5"/>
        <MechanicalObject src="@../meshLoader" dz="-21.0" />
        <DiagonalMass filename="BehaviorModels/smCube27.xs3" />
        <StiffSpringForceField name="Springs" filename="BehaviorModels/smCube27.xs3" />
        <Node name="Visu">
            <OglModel name="Visual" filename="mesh/smCube27.obj" color="yellow" />
            <IdentityMapping input="@.." output="@Visual" />
        </Node>
        <Node name="Surf">
            <MeshOBJLoader filename="mesh/smCube27.obj" name="loader" />
            <MeshTopology src="@loader" />
            <MechanicalObject src="@loader" />
            <TriangleCollisionModel />
            <LineCollisionModel />
            <PointCollisionModel />
            <IdentityMapping />
        </Node>
    </Node>
    <Node name="M2">
        <EulerImplicitSolver />
        <CGLinearSolver iterations="100" tolerance="1e-5" threshold="1e-5"/>
        <MechanicalObject template="Rigid3d" dz="-10.5" />
        <UniformMass filename="BehaviorModels/rigid.xs3" />
        <Node name="Points">
            <MechanicalObject template="Vec3d" src="@../../meshLoader"/>
            <RigidMapping />
        </Node>
        <Node name="Surf">
            <MeshOBJLoader filename="mesh/smCube27.obj" name="loader" />
            <MeshTopology src="@loader" />
            <MechanicalObject src="@loader" />
            <TriangleCollisionModel />
            <LineCollisionModel />
            <PointCollisionModel />
            <RigidMapping />
        </Node>
        <Node name="Visu">
            <OglModel name="Visual" filename="mesh/smCube27.obj" />
            <RigidMapping input="@.." output="@Visual" />
        </Node>
    </Node>
    <Node name="M3">
        <EulerImplicitSolver />
        <CGLinearSolver iterations="100" tolerance="1e-5" threshold="1e-5"/>
        <MechanicalObject src="@../meshLoader" />
        <DiagonalMass filename="BehaviorModels/smCube27.xs3" />
        <StiffSpringForceField name="Springs" filename="BehaviorModels/smCube27.xs3" />
        <Node name="Visu">
            <OglModel name="Visual" filename="mesh/smCube27.obj" color="red" />
            <IdentityMapping input="@.." output="@Visual" />
        </Node>
        <Node name="Surf">
            <MeshOBJLoader filename="mesh/smCube27.obj" name="loader" />
            <MeshTopology src="@loader" />
            <MechanicalObject src="@loader" />
            <TriangleCollisionModel />
            <LineCollisionModel />
            <PointCollisionModel />
            <IdentityMapping />
        </Node>
    </Node>
    <Node name="M4">
        <EulerImplicitSolver />
        <CGLinearSolver iterations="100" tolerance="1e-5" threshold="1e-5"/>
        <MechanicalObject template="Rigid3d" dz="10.5" />
        <UniformMass filename="BehaviorModels/rigid.xs3" />
        <Node name="Points">
            <MechanicalObject template="Vec3d" src="@../../meshLoader"/>
            <RigidMapping />
            <Node name="Visu">
                <OglModel name="Visual" filename="mesh/smCube27.obj" />
                <IdentityMapping input="@.." output="@Visual" />
            </Node>
        </Node>
        <Node name="Surf">
            <MeshOBJLoader filename="mesh/smCube27.obj" name="loader" />
            <MeshTopology src="@loader" />
            <MechanicalObject src="@loader" />
            <TriangleCollisionModel />
            <LineCollisionModel />
            <PointCollisionModel />
            <RigidMapping />
        </Node>
    </Node>
    <Node name="M5">
        <EulerImplicitSolver />
        <CGLinearSolver iterations="100" tolerance="1e-5" threshold="1e-5" />
        <MechanicalObject src="@../meshLoader" dz="21" />
        <DiagonalMass filename="BehaviorModels/smCube27.xs3" />
        <StiffSpringForceField name="Springs" filename="BehaviorModels/smCube27.xs3" />
        <Node name="Visu">
            <OglModel name="Visual" filename="mesh/smCube27.obj" color="cyan" />
            <IdentityMapping input="@.." output="@Visual" />
        </Node>
        <Node name="Surf">
            <MeshOBJLoader filename="mesh/smCube27.obj" name="loader" />
            <MeshTopology src="@loader" />
            <MechanicalObject src="@loader" />
            <TriangleCollisionModel />
            <LineCollisionModel />
            <PointCollisionModel />
            <IdentityMapping />
        </Node>
    </Node>
    <Node name="M6">
        <EulerImplicitSolver />
        <CGLinearSolver iterations="100" tolerance="1e-5" threshold="1e-5"/>
        <MechanicalObject template="Rigid3d" dz="31.5" />
        <UniformMass filename="BehaviorModels/rigid.xs3" />
        <Node name="Points">
            <MechanicalObject template="Vec3d" src="@../../meshLoader"/>
            <RigidMapping />
        </Node>
        <Node name="Visu">
            <OglModel name="Visual" filename="mesh/dragon.obj" color="gray" />
            <RigidMapping input="@.." output="@Visual" />
        </Node>
        <Node name="Surf">
            <MeshOBJLoader filename="mesh/dragon.obj" name="loader" />
            <MeshTopology src="@loader" />
            <MechanicalObject src="@loader" />
            <TriangleCollisionModel />
            <LineCollisionModel />
            <PointCollisionModel />
            <RigidMapping />
        </Node>
    </Node>
    <Node name="Floor">
        <MeshOBJLoader filename="mesh/floor.obj" name="loader" />
        <MeshTopology src="@loader" />
        <MechanicalObject src="@loader" dy="-20" />
        <TriangleCollisionModel name="Floor" simulated="0" moving="0" />
        <LineCollisionModel name="Floor" simulated="0" moving="0" />
        <PointCollisionModel name="Floor" simulated="0" moving="0" />
        <OglModel name="FloorV" filename="mesh/floor.obj" texturename="textures/floor.bmp" dy="-20" />
    </Node>
</Node>
