<Node name="root" dt="0.01">
    <RequiredPlugin name="SofaOpenglVisual"/>
    <VisualStyle displayFlags="showBehaviorModels showForceFields" />
    <DefaultPipeline verbose="0" draw="1" />
    <BruteForceDetection name="N2" />
    <MinProximityIntersection name="Proximity" alarmDistance="0.75" contactDistance="0.5" />
    <DefaultContactManager name="Response" response="default" />
    <DefaultCollisionGroupManager name="Group" />
    <Node name="M1">
        <EulerImplicitSolver  rayleighStiffness="0.1" rayleighMass="0.1" />
        <CGLinearSolver iterations="25" tolerance="0.01" threshold="0.000001" />
        <MechanicalObject dx="18" dy="17" dz="29" />
        <UniformMass totalMass="10" />
        <RegularGridTopology nx="5" ny="5" nz="5" xmin="-3.5" xmax="3.5" ymin="-3.5" ymax="3.5" zmin="-3.5" zmax="3.5" />
        <RegularGridSpringForceField name="Springs" stiffness="200" damping="1" />
        <Node name="Visu">
            <OglModel name="Visual" filename="mesh/smCube125.obj" color="green"/>
            <BarycentricMapping input="@.." output="@Visual" />
        </Node>
        <Node name="Surf">
            <MeshObjLoader filename="mesh/smCube125.obj" name="loader" />
            <MeshTopology src="@loader" />
            <MechanicalObject src="@loader"/>
            <TriangleCollisionModel />
            <LineCollisionModel />
            <PointCollisionModel />
            <BarycentricMapping />
        </Node>
    </Node>
    <Node name="M3">
        <EulerImplicitSolver />
        <CGLinearSolver iterations="25" tolerance="0.01" threshold="0.000001" />
        <MechanicalObject dx="0" dy="17" dz="29" />
        <UniformMass totalMass="10" />
        <RegularGridTopology nx="5" ny="5" nz="5" xmin="-3.5" xmax="3.5" ymin="-3.5" ymax="3.5" zmin="-3.5" zmax="3.5" />
        <TetrahedronFEMForceField name="FEM" youngModulus="300" poissonRatio="0.3" method="polar" />
        <Node name="Visu">
            <OglModel name="Visual" filename="mesh/smCube125.obj" color="cyan"/>
            <BarycentricMapping input="@.." output="@Visual" />
        </Node>
        <Node name="Surf">
            <MeshObjLoader filename="mesh/smCube125.obj" name="loader" />
            <MeshTopology src="@loader" />
            <MechanicalObject src="@loader"/>
            <TriangleCollisionModel />
            <LineCollisionModel />
            <PointCollisionModel />
            <BarycentricMapping />
        </Node>
    </Node>
    <Node name="M4">
        <EulerImplicitSolver />
        <CGLinearSolver iterations="25" tolerance="0.00001" threshold="0.000001" />
        <!--
		<RungeKutta4Solver />
		<EulerExplicitSolver />
		-->
        <MechanicalObject template="Rigid" dx="-17" dy="16" dz="29" />
        <UniformMass filename="BehaviorModels/smCube125.rigid" />
        <Node name="Visu">
            <OglModel name="Visual" filename="mesh/smCube125.obj" color="white" />
            <RigidMapping input="@.." output="@Visual" />
        </Node>
        <Node name="Surf">
            <MeshObjLoader filename="mesh/smCube125.obj" name="loader" />
            <MeshTopology src="@loader" />
            <MechanicalObject src="@loader" />
            <TriangleCollisionModel />
            <LineCollisionModel />
            <PointCollisionModel />
            <RigidMapping />
        </Node>
    </Node>
    <Node name="Floor">
        <MeshObjLoader filename="mesh/floor2b.obj" name="loader" />
        <MeshTopology src="@loader" />
        <MechanicalObject src="@loader" dy="-10.25" scale="0.5" />
        <TriangleCollisionModel name="Floor" simulated="0" moving="0" />
        <LineCollisionModel name="Floor" simulated="0" moving="0" />
        <PointCollisionModel name="Floor" simulated="0" moving="0" />
        <OglModel name="FloorV" filename="mesh/floor2b.obj" scale="0.5" texturename="textures/floor.bmp" color="gray" dy="-10" />
    </Node>
</Node>
