<!-- This is the simplest example possible:
   + the first line defines global parameters for the scene which are attached to the root node of the scene
   + then we load the OBJ model of the tooth and display it (using a white color)
-->
<Node name="root" dt="0.01">
    <RequiredPlugin name="SofaOpenglVisual"/>
    <BackgroundSetting color="0.901960784 0.925490196 0.964705882" />
    <Node name="Head">
        <MeshObjLoader name="meshLoader_0" filename="data/mesh/head.obj" handleSeams="1" />
        <OglModel name="HeadVisualModel" src="@meshLoader_0" texturename="Tutorials/StepByStep/Dentistry_Haptics/data/pics/head_baseTexBaked.png" />
        <Node name="Tongue">
            <MeshObjLoader name="meshLoader_1" filename="data/mesh/tongue.obj" handleSeams="1" />
            <OglModel name="TongueVisualModel" src="@meshLoader_1" texturename="Tutorials/StepByStep/Dentistry_Haptics/data/pics/tongue_color.png" />
        </Node>
        <Node name="Teeth">
            <MeshObjLoader name="meshLoader_2" filename="data/mesh/teeth.obj" handleSeams="1" />
            <OglModel name="TeethVisualModel" src="@meshLoader_2" texturename="Tutorials/StepByStep/Dentistry_Haptics/data/pics/teeth_color.png" />
        </Node>
    </Node>
</Node>
