<!--
 + Added the visual model for the instrument in a separate node of the graph
-->
<Node name="root" dt="0.01">
    <RequiredPlugin name="SofaOpenglVisual"/>
    <BackgroundSetting color="0.901960784 0.925490196 0.964705882" />
    <Node name="Head">
        <OglModel name="HeadVisualModel" fileMesh="data/mesh/head.obj" texturename="Tutorials/StepByStep/Dentistry_Haptics/data/pics/head_baseTexBaked.png" />
        <Node name="Tongue">
            <OglModel name="TongueVisualModel" fileMesh="data/mesh/tongue.obj" texturename="Tutorials/StepByStep/Dentistry_Haptics/data/pics/tongue_color.png" />
        </Node>
        <Node name="Teeth">
            <OglModel name="TeethVisualModel" fileMesh="data/mesh/teeth.obj" texturename="Tutorials/StepByStep/Dentistry_Haptics/data/pics/teeth_color.png" />
        </Node>
    </Node>
    <Node name="Instrument">
        <OglModel name="InstrumentVisualModel" fileMesh="data/mesh/dental_instrument.obj" color="0.8 0.8 0.8 1.0" dz="-10" />
    </Node>
</Node>
