<Node 	name="root" gravity="0 0 -9.81" dt="0.01" showVisualModels="1" showBehaviorModels="1" showCollisionModels="1" showBoundingCollisionModels="0" showMappings="0" showMechanicalMappings="0" showForceFields="0" showInteractionForceFields="1" showWireFrame="0" showNormals="0"  >
	<DefaultPipeline name="DefaultCollisionPipeline"  verbose="0"  draw="0"  depth="6" />
	<BruteForceDetection name="Detection" />
	<MinProximityIntersection name="Proximity"  alarmDistance="3"  contactDistance="2" />
	<DefaultContactManager name="Response"  response="default" />
	<Node 	name="Object" gravity="0 -9.81 0" showVisualModels="1" showBehaviorModels="1" showCollisionModels="1" showBoundingCollisionModels="0" showMappings="0" showMechanicalMappings="0" showForceFields="0" showInteractionForceFields="1" showWireFrame="0" showNormals="0"  >
		<EulerImplicitSolver name="Implicit Euler Solver" />
		<CGLinearSolver template="GraphScattered" name="Conjugate Gradient" />
		<SparseGridTopology name="Embedded Sparse Grid"  fileTopology="mesh/dragon.obj"  n="7 6 5" />
		<MechanicalObject template="Vec3d" name="Particles"  restScale="1"  position="0 0 0" />
		<UniformMass template="Vec3d" name="Mass" />
		<HexahedronFEMForceField template="Vec3d" name="FEM"  youngModulus="200" />
		<Node 	name="VisualNode" gravity="0 -9.81 0" showVisualModels="1" showBehaviorModels="1" showCollisionModels="1" showBoundingCollisionModels="0" showMappings="0" showMechanicalMappings="0" showForceFields="0" showInteractionForceFields="1" showWireFrame="0" showNormals="0"  >
			<OglModel template="ExtVec3f" name="Objective"  fileMesh="mesh/dragon.obj" />
			<BarycentricMapping template="Mapping&lt;Vec3d,ExtVec3f&gt;" name="Visual Mapping"  object2="Objective"  hexamap="0 " />
		</Node>
		<Node 	name="CollisionNode" gravity="0 -9.81 0" showVisualModels="1" showBehaviorModels="1" showCollisionModels="1" showBoundingCollisionModels="0" showMappings="0" showMechanicalMappings="0" showForceFields="0" showInteractionForceFields="1" showWireFrame="0" showNormals="0"  >
			<MeshTopology name="Mesh"  fileTopology="mesh/dragon.obj" />
			<MechanicalObject template="Vec3d" name="CollisionObject"  scale3d="1 1 1"  restScale="1" />
			<PointModel name="Points" />
			<LineModel name="Lines" />
			<TTriangleModel template="Vec3d" name="Triangles" />
			<BarycentricMapping template="MechanicalMapping&lt;Vec3d,Vec3d&gt;" name="MechanicalMapping"  hexamap="0 " />
		</Node>
	</Node>
	<Node 	name="Obstacle" gravity="0 -9.81 0" showVisualModels="1" showBehaviorModels="1" showCollisionModels="1" showBoundingCollisionModels="0" showMappings="0" showMechanicalMappings="0" showForceFields="0" showInteractionForceFields="1" showWireFrame="0" showNormals="0"  >
		<MeshTopology name="Mesh"  fileTopology="mesh/cube.obj" />
		<MechanicalObject template="Vec3d" name="Obstacle"  translation="0 0 -10"  rotation="0 0 0"  scale3d="40 40 0.1"  restScale="1" />
		<TTriangleModel template="Vec3d" name="Triangles"  moving="0"  simulated="0"  contactStiffness="500"  contactFriction="0.01" />
		<LineModel name="Lines"  moving="0"  simulated="0"  contactStiffness="500"  contactFriction="0.01" />
		<PointModel name="Points"  moving="0"  simulated="0"  contactStiffness="500"  contactFriction="0.01" />
		<OglModel template="ExtVec3f" name="Visual"  fileMesh="mesh/cube.obj"  translation="0 0 -10"  rotation="0 0 0"  scale3d="40 40 0.1"  material="Default Diffuse 1 0.5 0.5 0.5 1 Ambient 1 0.1 0.1 0.1 1 Specular 0 0.5 0.5 0.5 1 Emissive 0 0.5 0.5 0.5 1 Shininess 0 45" />
	</Node>
</Node>
