<Node 	name="root" gravity="0 0 -9.81" dt="0.01" showBehaviorModels="1" showForceFields="1" showInteractionForceFields="1"  >
	<EulerSolver name="Explicit Euler Solver" />
        <Node name="FirstObject">
	  	<MechanicalObject template="Vec3d" name="Particles" position="0 0 0 1 0 0" />
	  	<UniformMass template="Vec3d" name="Mass" />
	        <FixedConstraint template="Vec3d" name="Fix Particles"  indices="0" />
        </Node>
</Node>
