<?xml version="1.0"?>
<Node name="root" gravity="0 0 -9.81" dt="0.01">

    <RequiredPlugin pluginName="Sofa.Component.Constraint.Projective"/> <!-- Needed to use components [FixedProjectiveConstraint] -->
    <RequiredPlugin pluginName="Sofa.Component.LinearSolver.Iterative"/> <!-- Needed to use components [CGLinearSolver] -->
    <RequiredPlugin pluginName="Sofa.Component.Mass"/> <!-- Needed to use components [UniformMass] -->
    <RequiredPlugin pluginName="Sofa.Component.IntegrationScheme.Backward"/> <!-- Needed to use components [EulerImplicitIntegrationScheme] -->
    <RequiredPlugin pluginName="Sofa.Component.SolidMechanics.Spring"/> <!-- Needed to use components [SpringForceField] -->
    <RequiredPlugin pluginName="Sofa.Component.StateContainer"/> <!-- Needed to use components [MechanicalObject] -->
    <RequiredPlugin pluginName="Sofa.Component.Visual"/> <!-- Needed to use components [VisualGrid VisualStyle] -->
    <RequiredPlugin pluginName="Sofa.GL.Component.Rendering3D"/> <!-- Needed to use components [OglSceneFrame] -->

    <VisualGrid/>
    <OglSceneFrame/>

    <DefaultAnimationLoop/>
    <VisualStyle displayFlags="showBehavior" />
    <EulerImplicitIntegrationScheme name="Implicit Euler Solver"  rayleighStiffness="0.1" rayleighMass="0.1" />
    <CGLinearSolver template="GraphScattered" name="Conjugate Gradient" iterations="25" tolerance="1e-5" threshold="1e-5"/>
    <Node name="FirstObject" gravity="0 -9.81 0">
        <MechanicalObject template="Vec3" name="Particles" restScale="1" position="0 0 0 1 0 0" showObject="1" showObjectScale="10"/>
        <UniformMass template="Vec3" name="Mass" totalMass="1.0"/>
        <FixedProjectiveConstraint template="Vec3" name="Fix Particles" indices="0" />
        <SpringForceField template="Vec3" name="Internal Spring" spring="0 1 100 0.1 1&#x0A;" />
    </Node>
    <Node name="SecondObject" gravity="0 -9.81 0">
        <VisualStyle displayFlags="showVisual hideBehavior hideCollision hideMapping hideOptions" />
        <MechanicalObject template="Vec3" name="Particles" restScale="1" position="2 0 0" showObject="1" showObjectScale="10"/>
        <UniformMass template="Vec3" name="Mass" totalMass="1.0"/>
    </Node>
    <SpringForceField template="Vec3" name="Interaction Spring" object1="@FirstObject" object2="@SecondObject" spring="1 0 10 0.1 1&#x0A;" />
</Node>
