<Node name="root" gravity="0 -9.81 0" dt="0.01">
    <RequiredPlugin name="Sofa.Component.IO.Mesh"/> <!-- Needed to use components [MeshGmshLoader] -->
    <RequiredPlugin name="Sofa.Component.LinearSolver.Iterative"/> <!-- Needed to use components [CGLinearSolver] -->
    <RequiredPlugin name="Sofa.Component.Mapping.Linear"/> <!-- Needed to use components [IdentityMapping] -->
    <RequiredPlugin name="Sofa.Component.Mass"/> <!-- Needed to use components [DiagonalMass] -->
    <RequiredPlugin name="Sofa.Component.ODESolver.Backward"/> <!-- Needed to use components [EulerImplicitSolver] -->
    <RequiredPlugin name="Sofa.Component.SolidMechanics.FEM.Elastic"/> <!-- Needed to use components [TetrahedralCorotationalFEMForceField] -->
    <RequiredPlugin name="Sofa.Component.SolidMechanics.Spring"/> <!-- Needed to use components [TriangularBendingSprings] -->
    <RequiredPlugin name="Sofa.Component.StateContainer"/> <!-- Needed to use components [MechanicalObject] -->
    <RequiredPlugin name="Sofa.Component.Topology.Mapping"/> <!-- Needed to use components [Tetra2TriangleTopologicalMapping] -->
    <RequiredPlugin name="Sofa.Component.Visual"/> <!-- Needed to use components [VisualStyle] -->
    <RequiredPlugin name="Sofa.GL.Component.Rendering3D"/> <!-- Needed to use components [OglModel] -->
    <RequiredPlugin name="SofaMeshCollision"/> <!-- Needed to use components [TriangleCollisionModel] -->
    <VisualStyle displayFlags="showBehavior" />
    <DefaultPipeline name="DefaultCollisionPipeline" verbose="0" draw="0" depth="6" />
    <BruteForceBroadPhase/>
    <BVHNarrowPhase/>
    <MinProximityIntersection name="Proximity" alarmDistance="3" contactDistance="2" />
    <DefaultContactManager name="Response" response="PenalityContactForceField" />
    <Node name="Tetrahedrons Mesh">
        <MeshGmshLoader name="loader" filename="mesh/cylinder.msh" />
        <MechanicalObject  name="Volume" src="@loader" />
        <EulerImplicitSolver name="cg_odesolver" printLog="0"  rayleighStiffness="0.1" rayleighMass="0.1" />
        <CGLinearSolver  name="linear solver" iterations="25" tolerance="1e-09" threshold="1e-09" />
        <TetrahedronSetTopologyContainer name="Container" filename="mesh/cylinder.msh" tetrahedra="@loader.tetrahedra" />
        <TetrahedronSetGeometryAlgorithms  name="GeomAlgo" drawTetrahedra="0" drawColorTetrahedra="1.0 1.0 0.3 1.0" />
        <TetrahedralCorotationalFEMForceField name="FEM" method="large" poissonRatio="0.3" youngModulus="360" assembling="0" />
        <DiagonalMass  massDensity="0.5" />
        <FixedPlaneConstraint  direction="0 0 1" dmin="-0.1" dmax="0.1" />
        <FixedConstraint  indices="0" />
        <Node name="Triangles Mesh">
            <TriangleSetTopologyContainer name="Container" />
            <TriangleSetTopologyModifier name="Modifier" />
            <TriangleSetGeometryAlgorithms  name="GeomAlgo" />
            <Tetra2TriangleTopologicalMapping name="Mapping" input="@../Container" output="@Container" />
            <TriangularBendingSprings  name="FEM-Bend" stiffness="10" damping="1" />
            <TriangleCollisionModel name="Models" />
            <Node name="Visu">
                <OglModel  name="Visual" material="Default Diffuse 1 0 0 1 1 Ambient 1 0 0 0.2 1 Specular 0 0 0 1 1 Emissive 0 0 0 1 1 Shininess 0 45" />
                <IdentityMapping input="@../../Volume" output="@Visual" />
            </Node>
        </Node>
    </Node>
</Node>
