<Node name="root">
    <RequiredPlugin pluginName="Sofa.Component.IO.Mesh"/> <!-- Needed to use components [MeshOBJLoader] -->
    <RequiredPlugin pluginName="Sofa.GL.Component.Rendering3D"/> <!-- Needed to use components [OglModel] -->
    <DefaultAnimationLoop/>
    <MeshOBJLoader name="loader" filename="mesh/dragon.obj"/>
    <OglModel name="dragon" src="@loader" />
</Node>
