<Node name="root" gravity="0 -9.81 0" dt="0.01">
    <RequiredPlugin name="Sofa.Component.IO.Mesh"/> <!-- Needed to use components [MeshVTKLoader] -->
    <RequiredPlugin name="Sofa.Component.Visual"/> <!-- Needed to use components [VisualStyle] -->
    <RequiredPlugin name="Sofa.GL.Component.Rendering3D"/> <!-- Needed to use components [OglModel] -->
    <VisualStyle displayFlags="showBehavior" />
    <MeshVTKLoader name="vtkloader" filename="mesh/Armadillo_Tetra_4406.vtu" />
    <OglModel name="bunny" src="@vtkloader" />
</Node>
