<Node name="root">
    <RequiredPlugin name="Sofa.GL.Component.Rendering3D"/> <!-- Needed to use components [OglModel] -->
    <LightManager name="lightManager" />
    <SpotLight name="sideLight" position="0 10 20" direction="0 -0.2 -1" cutoff="45" shadowTextureSize="128" />
    <SpotLight name="upLight" position="0.0 60.0 0.0" direction="0 -1 0.01" cutoff="60" shadowTextureSize="2048" />
    <OglShadowShader />
    <Node name="oglModels">
        <OglModel name="dragon" filename="mesh/dragon.obj" dy="5.0" color="green" />
        <OglModel name="floor" filename="mesh/floor.obj" color="0.5 0.5 0.5" dy="-2.5" />
    </Node>
</Node>
