<?xml version="1.0" ?>
<!-- See https://wiki.sofa-framework.org/wiki/TutorialSurfacesTopologicalMapping -->
<Node name="root" gravity="0 -9.81 1" dt="0.05">
    <RequiredPlugin name="SofaOpenglVisual"/>
    <!-- Basic Components to perform the collision detection -->
    <VisualStyle displayFlags="showBehaviorModels showVisual showWireframe" />
    <DefaultPipeline name="DefaultCollisionPipeline" depth="6" />
    <BruteForceDetection name="Detection" />
    <MinProximityIntersection name="Proximity" alarmDistance="0.8" contactDistance="0.5" />
    <DefaultContactManager name="Response" />
    <DefaultCollisionGroupManager name="Group" />
    <Node name="Quads Mesh">
        <MeshObjLoader name="loader" filename="mesh/cubeQuad.obj" />
        <MechanicalObject src="@loader" template="Vec3d" name="Quads" />
        <EulerImplicitSolver name="cg_odesolver" printLog="0"  rayleighStiffness="0.1" rayleighMass="0.1" />
        <CGLinearSolver name="linear solver" template="GraphScattered" iterations="40" tolerance="1e-09" threshold="1e-09" />
        <QuadSetTopologyContainer src="@loader" name="Container" />
        <QuadSetTopologyModifier name="Topology Modifier" />
        <QuadSetTopologyAlgorithms template="Vec3d" name="TopoAlgo" />
        <QuadSetGeometryAlgorithms template="Vec3d" name="GeomAlgo" />
        <!--<QuadularBendingSprings name="FEM-Bend" template="Vec3d" stiffness="3000" damping="1"/>-->
        <DiagonalMass name="Mass" template="Vec3d" massDensity="0.5" />
        <FixedConstraint name="Fixed dof" template="Vec3d" indices="4 5 6 7" />
        <Node name="Visu">
            <OglModel name="Visual" template="ExtVec3f" color="green" />
            <IdentityMapping name="Mapping" template="Vec3d,ExtVec3f" input="@../Quads" output="@Visual" />
        </Node>
        <Node name="Triangles Mesh">
            <TriangleSetTopologyContainer name="Container" />
            <TriangleSetTopologyModifier name="Topology Modifier" />
            <TriangleSetTopologyAlgorithms name="TopoAlgo" template="Vec3d" />
            <TriangleSetGeometryAlgorithms name="GeomAlgo" template="Vec3d" drawEdges="1" drawColorEdges="1.0 1.0 0.3" />
            <Quad2TriangleTopologicalMapping name="Topological Mapping" input="@../Container" output="@Container" />
            <TriangularFEMForceField name="FEM" template="Vec3d" method="large" poissonRatio="0.3" youngModulus="1000" />
            <TriangularBendingSprings name="FEM-Bend" template="Vec3d" stiffness="3000" damping="1" />
            <TriangleCollisionModel name="Models" />
        </Node>
    </Node>
</Node>
