<Node name="Group">

    <Node name="plugins">
        <RequiredPlugin pluginName="Sofa.Component.Constraint.Projective"/> <!-- Needed to use components [FixedProjectiveConstraint] -->
        <RequiredPlugin pluginName="Sofa.Component.Engine.Select"/> <!-- Needed to use components [BoxROI] -->
        <RequiredPlugin pluginName="Sofa.Component.LinearSolver.Direct"/> <!-- Needed to use components [SparseLDLSolver] -->
        <RequiredPlugin pluginName="Sofa.Component.LinearSolver.Iterative"/> <!-- Needed to use components [CGLinearSolver] -->
        <RequiredPlugin pluginName="Sofa.Component.LinearSolver.Ordering"/> <!-- Needed to use components [NaturalOrderingMethod] -->
        <RequiredPlugin pluginName="Sofa.Component.LinearSystem"/> <!-- Needed to use components [ConstantSparsityPatternSystem] -->
        <RequiredPlugin pluginName="Sofa.Component.Mass"/> <!-- Needed to use components [MeshMatrixMass] -->
        <RequiredPlugin pluginName="Sofa.Component.IntegrationScheme.Backward"/> <!-- Needed to use components [EulerImplicitSolver] -->
        <RequiredPlugin pluginName="Sofa.Component.SolidMechanics.FEM.Elastic"/>
        <RequiredPlugin pluginName="Sofa.Component.StateContainer"/> <!-- Needed to use components [MechanicalObject] -->
        <RequiredPlugin pluginName="Sofa.Component.Topology.Container.Dynamic"/> <!-- Needed to use components [TetrahedronSetGeometryAlgorithms,TetrahedronSetTopologyContainer,TetrahedronSetTopologyModifier] -->
        <RequiredPlugin pluginName="Sofa.Component.Topology.Container.Grid"/> <!-- Needed to use components [RegularGridTopology] -->
        <RequiredPlugin pluginName="Sofa.Component.Topology.Mapping"/> <!-- Needed to use components [Hexa2TetraTopologicalMapping] -->
        <RequiredPlugin pluginName="Sofa.Component.Visual"/> <!-- Needed to use components [LineAxis,VisualGrid,VisualStyle] -->
        <RequiredPlugin pluginName="Sofa.GL.Component.Rendering3D"/> <!-- Needed to use components [OglSceneFrame] -->
    </Node>

    <DefaultAnimationLoop/>
    <VisualStyle displayFlags="hideBehaviorModels showForceFields" />

    <VisualGrid size="0.1"/>
    <LineAxis size="0.1"/>

    <EulerImplicitIntegrationScheme name="backward_Euler" rayleighStiffness="0.1" rayleighMass="0.1" />

    <RegularGridTopology name="grid" min="-0.05 -0.01 -0.01" max="0.05 0.01 0.01" n="20 5 5"/>
    <MechanicalObject template="Vec3" name="state" showObject="true"/>

    <NodalMassDensity property="1100"/>
    <FEMMass template="Vec3,Hexahedron"/>

    <BoxROI template="Vec3" name="box_roi_left" box="-0.051 -0.011 -0.011   -0.049 0.011 0.011" drawBoxes="1" />
    <LinearMovementProjectiveConstraint template="Vec3" keyTimes="0 1 3 4 1e12" movements="0 0 0  -0.02 0 0  0.02 0 0  0 0 0  0 0 0" indices="@box_roi_left.indices" />

    <BoxROI template="Vec3" name="box_roi_right" box="0.049 -0.011 -0.011   0.051 0.011 0.011" drawBoxes="1" />
    <LinearMovementProjectiveConstraint template="Vec3" keyTimes="0 1 3 4 1e12" movements="0 0 0  0.02 0 0  -0.02 0 0  0 0 0  0 0 0" indices="@box_roi_right.indices" />

</Node>
