<Node name="Group">

    <Node name="plugins">
        <RequiredPlugin name="Sofa.Component.Constraint.Projective"/> <!-- Needed to use components [FixedProjectiveConstraint] -->
        <RequiredPlugin name="Sofa.Component.Engine.Select"/> <!-- Needed to use components [BoxROI] -->
        <RequiredPlugin name="Sofa.Component.LinearSolver.Direct"/> <!-- Needed to use components [SparseLDLSolver] -->
        <RequiredPlugin name="Sofa.Component.LinearSolver.Iterative"/> <!-- Needed to use components [CGLinearSolver] -->
        <RequiredPlugin name="Sofa.Component.LinearSolver.Ordering"/> <!-- Needed to use components [NaturalOrderingMethod] -->
        <RequiredPlugin name="Sofa.Component.LinearSystem"/> <!-- Needed to use components [ConstantSparsityPatternSystem] -->
        <RequiredPlugin name="Sofa.Component.Mass"/> <!-- Needed to use components [MeshMatrixMass] -->
        <RequiredPlugin name="Sofa.Component.ODESolver.Backward"/> <!-- Needed to use components [EulerImplicitSolver] -->
        <RequiredPlugin name="Sofa.Component.SolidMechanics.FEM.Elastic"/>
        <RequiredPlugin name="Sofa.Component.StateContainer"/> <!-- Needed to use components [MechanicalObject] -->
        <RequiredPlugin name="Sofa.Component.Topology.Container.Dynamic"/> <!-- Needed to use components [TetrahedronSetGeometryAlgorithms,TetrahedronSetTopologyContainer,TetrahedronSetTopologyModifier] -->
        <RequiredPlugin name="Sofa.Component.Topology.Container.Grid"/> <!-- Needed to use components [RegularGridTopology] -->
        <RequiredPlugin name="Sofa.Component.Topology.Mapping"/> <!-- Needed to use components [Hexa2TetraTopologicalMapping] -->
        <RequiredPlugin name="Sofa.Component.Visual"/> <!-- Needed to use components [LineAxis,VisualGrid,VisualStyle] -->
        <RequiredPlugin name="Sofa.GL.Component.Rendering3D"/> <!-- Needed to use components [OglSceneFrame] -->
    </Node>

    <DefaultAnimationLoop/>
    <VisualStyle displayFlags="showBehaviorModels showForceFields" />

    <VisualGrid size="0.1"/>
    <LineAxis size="0.1"/>
    <OglSceneFrame/>

    <EulerImplicitSolver name="backward Euler" rayleighStiffness="0.1" rayleighMass="0.1" />

    <RegularGridTopology name="grid" min="-0.01 -0.01 0" max="0.01 0.01 0.2" n="5 5 30"/>
    <MechanicalObject template="Vec3" name="state" showObject="true"/>

<!--    <MeshMatrixMass massDensity="1100" topology="@grid"/>-->
    <NodalMassDensity property="1100"/>
    <HexahedronFEMMass/>

    <BoxROI template="Vec3" name="box_roi" box="-0.011 -0.011 -0.0001   0.011 0.011 0.0001" drawBoxes="1" />
    <FixedProjectiveConstraint template="Vec3" indices="@box_roi.indices" />
</Node>
