<Node name="Group">
    <Node name="preprocessing">
        <RegularGridTopology name="grid" min="-0.01 -0.01 0" max="0.01 0.01 0.2" n="3 3 20" computeTriangleList="false"/>
        <MechanicalObject name="state" template="Vec3"/>

        <LinearToHigherOrderElements name="engine" computeFromEdges="false" computeFromTriangles="false" computeFromQuads="false"/>
    </Node>
</Node>
