<?xml version="1.0"?>
<Node name="root" dt="0.001" gravity="0 -9.81 0">

    <Node name="plugins">
        <RequiredPlugin pluginName="Sofa.Component.Constraint.Projective"/> <!-- Needed to use components [FixedProjectiveConstraint] -->
        <RequiredPlugin pluginName="Sofa.Component.Engine.Generate"/> <!-- Needed to use components [LinearToHigherOrderElements] -->
        <RequiredPlugin pluginName="Sofa.Component.Engine.Select"/> <!-- Needed to use components [BoxROI] -->
        <RequiredPlugin pluginName="Sofa.Component.LinearSolver.Direct"/> <!-- Needed to use components [SparseLDLSolver] -->
        <RequiredPlugin pluginName="Sofa.Component.LinearSolver.Ordering"/> <!-- Needed to use components [NaturalOrderingMethod] -->
        <RequiredPlugin pluginName="Sofa.Component.LinearSystem"/> <!-- Needed to use components [ConstantSparsityPatternSystem] -->
        <RequiredPlugin pluginName="Sofa.Component.Mass"/> <!-- Needed to use components [FEMMass,NodalMassDensity] -->
        <RequiredPlugin pluginName="Sofa.Component.ODESolver.Backward"/> <!-- Needed to use components [EulerImplicitSolver] -->
        <RequiredPlugin pluginName="Sofa.Component.SolidMechanics.FEM.Elastic"/> <!-- Needed to use components [LinearSmallStrainFEMForceField] -->
        <RequiredPlugin pluginName="Sofa.Component.StateContainer"/> <!-- Needed to use components [MechanicalObject] -->
        <RequiredPlugin pluginName="Sofa.Component.Topology.Container.Constant"/> <!-- Needed to use components [MeshTopology] -->
        <RequiredPlugin pluginName="Sofa.Component.Topology.Container.Grid"/> <!-- Needed to use components [RegularGridTopology] -->
        <RequiredPlugin pluginName="Sofa.Component.Visual"/> <!-- Needed to use components [LineAxis,VisualGrid,VisualMesh,VisualPointCloud,VisualStyle] -->
        <RequiredPlugin pluginName="Sofa.GL.Component.Rendering3D"/> <!-- Needed to use components [OglSceneFrame] -->
    </Node>

    <DefaultAnimationLoop/>
    <VisualStyle displayFlags="showBehaviorModels showForceFields" />

    <VisualGrid size="0.1"/>
    <LineAxis size="0.1"/>
    <OglSceneFrame/>

    <Node name="preprocessing">
        <RegularGridTopology name="grid" min="-0.01 -0.01 0" max="0.01 0.01 0.2" n="3 3 20" computeTriangleList="false"/>
        <MechanicalObject name="state" template="Vec3"/>

        <Node name="tetrahedra">
            <TetrahedronSetTopologyContainer name="Tetra_topo"/>
            <Hexa2TetraTopologicalMapping input="@../grid" output="@Tetra_topo" swapping="true"/>

            <LinearToHigherOrderElements name="engine" computeFromEdges="false" computeFromTriangles="false" computeFromQuads="false"/>
        </Node>
    </Node>

    <Node name="simulation">
        <EulerImplicitSolver name="backward_Euler" rayleighStiffness="0.1" rayleighMass="0.1" />

        <ConstantSparsityPatternSystem template="CompressedRowSparseMatrix" name="A" checkIndices="false"/>
        <SparseLDLSolver name="linear_solver" template="CompressedRowSparseMatrix"/>

        <Node name="beam">
            <MeshTopology name="topology"
                          position="@../../preprocessing/tetrahedra/engine.position"
                          quadratic_tetrahedra="@../../preprocessing/tetrahedra/engine.quadratic_tetrahedra"/>
            <MechanicalObject template="Vec3" name="state" position="@../../preprocessing/tetrahedra/engine.position"/>

            <VisualPointCloud position="@state.position" drawMode="Sphere" sphereRadius="0.0005" color="orange"/>
            <VisualMesh position="@state.position" topology="@topology"/>

            <NodalMassDensity property="1100"/>
            <FEMMass template="Vec3,QuadraticTetrahedron"/>

            <BoxROI template="Vec3" name="box_roi" box="-0.011 -0.011 -0.0001   0.011 0.011 0.0001" drawBoxes="1" />
            <FixedProjectiveConstraint template="Vec3" indices="@box_roi.indices" />

            <LinearSmallStrainFEMForceField name="FEM" template="Vec3,QuadraticTetrahedron"
                                            youngModulus="2e6" poissonRatio="0.45" topology="@topology"
                                            computeForceStrategy="parallel" computeForceDerivStrategy="parallel"/>
        </Node>
    </Node>

</Node>
