<?xml version="1.0" ?>

<Node name="root" dt="0.05" showBoundingTree="0" gravity="0 -10 0">
<RequiredPlugin name="SofaCombinatorialMaps" />
    <Node name="nine">
        <MeshObjLoader filename="mesh/square_2594_triangles.obj" name="loader"/>
        <SurfaceTopologyContainer src="@loader"/>
        <MapTriangleSetTopologyContainer src="@loader"/>
    </Node>
</Node>
