<?xml version="1.0" ?>

<Node name="root" dt="0.05" showBoundingTree="0" gravity="0 -10 0">
<RequiredPlugin name="SofaCombinatorialMaps" />
    <Node name="nine">
        <MeshGmshLoader filename="mesh/nine_hexa.msh" name="loader"/>
        <VolumeTopologyContainer src="@loader"/>
        <MapTetrahedronSetTopologyContainer name="test" src="@loader"/>
    </Node>
</Node>
