import unittest
import Sofa

class TestBaseObject(unittest.TestCase):
        def __init__(self,a):
                unittest.TestCase.__init__(self,a)

        def test_createObjectWithParam(self):
                root = Sofa.Node("rootNode")
                c = root.createObject("MechanicalObject", name="t", position=[[0,0,0],[1,1,1],[2,2,2]])
                self.assertTrue( c is not None )

        def test_createObjectWithInvalidParamName(self):
                ## This one should raise an error because of 'v' should rise a type error.
                root = Sofa.Node("rootNode")
                root.createObject("MechanicalObject", name="tt", v=[[0,0,0],[1,1,1],[2,2,2]])
                self.fail()

        def test_createObjectWithInvalidParamValue(self):
                ## This one should raise an error because of 'v' should rise a type error.
                root = Sofa.Node("rootNode")
                root.createObject("MechanicalObject", name="tt", v="xmoi")
                self.fail()

        def test_data_property(self):
                root = Sofa.Node("rootNode")
                c = root.createObject("MechanicalObject", name="t", position=[[0,0,0],[1,1,1],[2,2,2]])
                self.assertTrue(hasattr(c, "__data__"))
                self.assertGreater(len(c.__data__), 0)
                self.assertTrue("name" in c.__data__)
                self.assertTrue("position" in c.__data__)
                self.assertFalse(hasattr(c.__data__, "invalidEntry"))
                self.assertTrue( isinstance(c.__data__, Sofa.DataDict))


def createScene(rootNode):
        suite = unittest.TestLoader().loadTestsFromTestCase(TestBaseObject)
        return unittest.TextTestRunner(verbosity=2).run(suite).wasSuccessful()
