<?xml version="1.0"?>
<Node 	name="Root" gravity="0 0 0" time="0" animate="0"  dt="0.02" >
  <RequiredPlugin pluginName="Flexible"/>
  <RequiredPlugin pluginName="Compliant"/>
  <VisualStyle displayFlags="showVisualModels showBehaviorModels showForceFields" />

  <Node name="Patch" >
    <AssembledSolver/>
    <LDLTSolver projectH="1"/>

    <!--Nodes-->
    <MechanicalObject name="defoDOF" showObject="1"  showObjectScale="5"  showIndices="1"  showIndicesScale="0.0001" />
	<RegularGrid name ="loader" nx="4" ny="4" nz="4" xmin="0" xmax="1" ymin="0" ymax="1" zmin="0" zmax="1" position="@defoDOF.position" drawHexahedra="true" />

    <!--Constraint and roi-->
    <BoxROI name="Box" box="-0.1 -0.1 -0.1  1.1 1.1 1.1"/>
    <PairBoxROI name="PairBox" inclusiveBox="-0.1 -0.1 -0.1  1.1 1.1 1.1" includedBox="0.1 0.1 0.1 0.9 0.9 0.9"/>
    <AffineMovementConstraint name="bilinearConstraint" indices="@PairBox.indices" meshIndices = "@Box.indices" translation="0.1 0 -0.3" rotation="[1 0 0,0 1 0,1 0 1]"  drawConstrainedPoints="1"/>

    <!--Mass-->
    <UniformMass  name="mass" totalMass="1"/>

    <!--Shape function-->
    <BarycentricShapeFunction template="ShapeFunctiond" />

    <!--Elasticity-->
    <Node 	name="Elasticity" >
      <TopologyGaussPointSampler name="sampler" inPosition="@../loader.position" showSamplesScale="0" method="0" order="1" />
      <MechanicalObject template="F332"  name="MoElasticity" showObject="1" showObjectScale="5"/>
      <LinearMapping template="Mapping&lt;Vec3d,F332&gt;" showDeformationGradientScale="0.05"  showDeformationGradientStyle="0 - All axis"  showColorOnTopology="2 - sqrt(det(F^T.F))-1"/>

      <!--Material-->
      <Node 	name="Material" >
        <MechanicalObject  template="E332" name="E"  />
        <GreenStrainMapping template="Mapping&lt;F332,E332&gt;"/>
        <HookeForceField  template="E332" name="ff" youngModulus="1000.0" poissonRatio="0" viscosity="0"/>
      </Node>

    </Node>

    <!--Visualisation-->
    <Node 	name="Visualisation" >
    </Node>

  </Node>

</Node>
