<?xml version="1.0" ?>
<Node name="root" dt="0.05" showBoundingTree="0" gravity="0 0 0">
		<GenerateCylinder template="Vec3d" name="Cylinder" radius="0.3" height="1" />
        <TetrahedronSetTopologyContainer name="Container1" tetrahedra="@[-1].tetrahedra" position="@[-1].output_position"/>
        <TetrahedronSetGeometryAlgorithms  drawEdges="1"/>
        <MechanicalObject name="dofs" position="@[-3].output_position"/>
        <Node name="BezierTetrahedronTopology">
        	<BezierTetrahedronSetTopologyContainer name="ContainerBezier"/>
			<Mesh2BezierTopologicalMapping object1="Container1" object2="ContainerBezier" bezierTetrahedronDegree="2" />
			<MechanicalObject name="BezierMechanicalObject"/>
			<BezierTetrahedronSetGeometryAlgorithms name="GeomAlgo" drawControlPointsEdges="true"/>
        	<MeshMatrixMass name="mass" lumping="0"  massDensity="1"  integrationMethod="analytical" numericalIntegrationMethod="0" integrationOrder="6"/>
        </Node>
</Node>
