<?xml version="1.0"?>

<Node 	name="Root" gravity="0 0 0" time="0" animate="0"  dt="0.5" showAxis="true">

<!--Mechanical Object-->
<MechanicalObject name="DOFs" showObject="1"  showObjectScale="5"  showIndices="1"  showIndicesScale="0.0003" position="0 0 0 1 0 0 0.5 0.86602540378443864676 0 0.5 0.288675134594812882254 1" />

<!--Topology Tetrahedra-->
<MeshTopology name="tetra"  tetrahedra="0 1 2 3"  drawTetrahedra="1" position="@DOFs.position"/>

</Node>
