<Node name="root" dt="0.01">
    <RequiredPlugin name="SofaOpenglVisual"/>
    <RequiredPlugin pluginName="SofaStereo"/>
    <StereoCamera enabled="true" mode="3" strategy="0" baseline="10" />

    <MeshObjLoader name="meshLoader_0" filename="mesh/floor2.obj" handleSeams="1" />
    <StereoOglModel name="VisualModel" src="@meshLoader_0" textureleft="textures/floor.bmp" textureright="textures/floor2.bmp" />
</Node>
