<Node name="CollisionNode">
  <MeshLoader name="loader" filename="file"/>
  <Mesh src="@loader"/>
  <MechanicalObject src="@loader" />
  <TriangleCollisionModel contactStiffness="200"/>
  <LineCollisionModel     contactStiffness="@[-1].contactStiffness"/>
  <PointCollisionModel    contactStiffness="@[-1].contactStiffness" />
  <BarycentricMapping />
</Node>
